Thu Aug  1 08:54:59 CEST 2013
$PROBLEM    MOXONIDINE PK,FINAL ESTIMATES,ALL DATA
;;

;; run 1, FOCEI, Lag model, all data

;;
$INPUT      ID VISI XAT2=DROP DGRP=DROP DOSE=DROP FLAG=DROP ONO=DROP
            XIME=DROP DVO=DROP NEUY=DROP SCR=DROP AGE SEX NYH=DROP WT
            DROP ACE DIG DIU NUMB=DROP TAD TIME VIDD=DROP CRCL AMT SS
            II DROP CMT=DROP CONO=DROP DV EVID=DROP OVID=DROP DROP
            SHR2=DROP NYHA
$DATA       mx19.csv IGNORE=@
$SUBROUTINE ADVAN2 TRANS1
$PK

;-----------OCCASIONS----------
   VIS3               = 0
   IF(VISI.EQ.3) VIS3 = 1
   VIS8               = 0
   IF(VISI.EQ.8) VIS8 = 1

;----------IOV--------------------

   KPCL  = VIS3*ETA(4)+VIS8*ETA(5)
   KPKA  = VIS3*ETA(6)+VIS8*ETA(7)

;---------- PK model ------------------

   TVCL  = THETA(1)*(1+THETA(6)*(CRCL-65))
   TVV   = THETA(2)*WT

   CL    = TVCL*EXP(ETA(1)+KPCL)
   V     = TVV*EXP(ETA(2))
   KA    = THETA(3)*EXP(ETA(3)+KPKA)
   ALAG1 = THETA(4)
   K     = CL/V
   S2    = V

$ERROR

     IPRED = LOG(.025)
     WA     = THETA(5)
     W      = WA
     IF(F.GT.0) IPRED = LOG(F)
     IRES  = IPRED-DV
     IWRES = IRES/W
     Y     = IPRED+ERR(1)*W

$THETA  (0,26.6) ; TVCL
$THETA  (0,1.43) ; TVV
$THETA  (0,4.45) ; TVKA
$THETA  (0,.240) ; LAG
$THETA  (0,.33) ; RES ERR
$THETA  (0,.00758,.02941) ; CRCL on CL
$OMEGA  BLOCK(2)
 0.0404
 0.027 0.0270  ; IIV (CL-V)
$OMEGA  BLOCK(1)
 2.56  ;     IIV KA
$OMEGA  BLOCK(1)
 0.017  ;     IOV CL
$OMEGA  BLOCK(1) SAME

$OMEGA  BLOCK(1)
 0.435  ;     IOV KA
$OMEGA  BLOCK(1) SAME

$SIGMA  1  FIX
$ESTIMATION METHOD=1 MAXEVALS=9999
;$COVARIANCE PRINT=E

NM-TRAN MESSAGES
 WARNINGS AND ERRORS (IF ANY) FOR PROBLEM    1
 (WARNING  2) NM-TRAN INFERS THAT THE DATA ARE POPULATION.

1NONLINEAR MIXED EFFECTS MODEL PROGRAM (NONMEM) VERSION 7.2.0
 ORIGINALLY DEVELOPED BY STUART BEAL, LEWIS SHEINER, AND ALISON BOECKMANN
 CURRENT DEVELOPERS ARE ROBERT BAUER, ICON DEVELOPMENT SOLUTIONS,
 AND ALISON BOECKMANN. IMPLEMENTATION, EFFICIENCY, AND STANDARDIZATION
 PERFORMED BY NOUS INFOSYSTEMS.
 PROBLEM NO.:         1
 MOXONIDINE PK,FINAL ESTIMATES,ALL DATA
 TOT. NO. OF OBS RECS:     1022
 TOT. NO. OF INDIVIDUALS:     74
 ONE COMPARTMENT MODEL WITH FIRST-ORDER ABSORPTION (ADVAN2)
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 #TBLN:      1
 #METH: First Order Conditional Estimation
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
 #TERM:
0MINIMIZATION SUCCESSFUL
 NO. OF FUNCTION EVALUATIONS USED:      230
 NO. OF SIG. DIGITS IN FINAL EST.:  3.8

 ETABAR IS THE ARITHMETIC MEAN OF THE ETA-ESTIMATES,
 AND THE P-VALUE IS GIVEN FOR THE NULL HYPOTHESIS THAT THE TRUE MEAN IS 0.

 ETABAR:        -2.8966E-03 -1.2346E-02 -2.1207E-01  1.1073E-02  5.6545E-03  5.1183E-02 -9.0275E-02
 SE:             1.9362E-02  1.2944E-02  1.5630E-01  8.6168E-03  1.0480E-02  3.7381E-02  3.8302E-02

 P VAL.:         8.8108E-01  3.4021E-01  1.7485E-01  1.9876E-01  5.8952E-01  1.7093E-01  1.8427E-02

 ETAshrink(%):   1.7719E+01  2.4893E+01  1.7730E+01  4.4330E+01  3.2290E+01  5.4173E+01  5.3044E+01
 EPSshrink(%):   1.0612E+01

 #TERE:
 Elapsed estimation time in seconds:    13.48

 ********************                        FIRST ORDER CONDITIONAL ESTIMATION                      ********************
 #OBJT:**************                       MINIMUM VALUE OF OBJECTIVE FUNCTION                      ********************
 #OBJV:********************************************     -753.901       **************************************************

 ********************                        FIRST ORDER CONDITIONAL ESTIMATION                      ********************
 ********************                             FINAL PARAMETER ESTIMATE                           ********************

 THETA - VECTOR OF FIXED EFFECTS PARAMETERS   *********
         TH 1      TH 2      TH 3      TH 4      TH 5      TH 6
         2.66E+01  1.43E+00  4.32E+00  2.40E-01  3.30E-01  7.68E-03

 OMEGA - COV MATRIX FOR RANDOM EFFECTS - ETAS  ********
            ETA1      ETA2      ETA3      ETA4      ETA5      ETA6      ETA7
 ETA1
+        4.15E-02
 ETA2
+        2.56E-02  2.23E-02
 ETA3
+        0.00E+00  0.00E+00  2.71E+00
 ETA4
+        0.00E+00  0.00E+00  0.00E+00  1.80E-02
 ETA5
+        0.00E+00  0.00E+00  0.00E+00  0.00E+00  1.80E-02
 ETA6
+        0.00E+00  0.00E+00  0.00E+00  0.00E+00  0.00E+00  4.99E-01
 ETA7
+        0.00E+00  0.00E+00  0.00E+00  0.00E+00  0.00E+00  0.00E+00  4.99E-01

 SIGMA - COV MATRIX FOR RANDOM EFFECTS - EPSILONS  ****
            EPS1
 EPS1
+        1.00E+00

 OMEGA - CORR MATRIX FOR RANDOM EFFECTS - ETAS  *******
            ETA1      ETA2      ETA3      ETA4      ETA5      ETA6      ETA7
 ETA1
+        2.04E-01
 ETA2
+        8.41E-01  1.49E-01
 ETA3
+        0.00E+00  0.00E+00  1.65E+00
 ETA4
+        0.00E+00  0.00E+00  0.00E+00  1.34E-01
 ETA5
+        0.00E+00  0.00E+00  0.00E+00  0.00E+00  1.34E-01
 ETA6
+        0.00E+00  0.00E+00  0.00E+00  0.00E+00  0.00E+00  7.06E-01
 ETA7
+        0.00E+00  0.00E+00  0.00E+00  0.00E+00  0.00E+00  0.00E+00  7.06E-01

 SIGMA - CORR MATRIX FOR RANDOM EFFECTS - EPSILONS  ***
            EPS1
 EPS1
+        1.00E+00
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