$PROBLEM Digoxin PK-HR-CONVERSION DATA
$INPUT ID TRET SEX AGE WT CRCL TIME DV AMT RATE FLG EVID
; TRET is treatment, 1=Digoxin, 0=placebo
; FLG is, 0=HR data, 1=Digoxin conc, 2=dosing, 3=Conversion, 4=Censored

;Sim_start : remove from simulation model
$DATA dig_all1.csv IGNORE=@
;Sim_end

;Sim_start : add for simulation
;$DATA dig_all1_sim.csv IGNORE=@
;Sim_end

$SUBROUTINES ADVAN6 TRANS1 TOL=5
$MODEL COMP = CENT
       COMP = PERI
       COMP = EFF
       COMP = HAZ
$PK
 DV1 = 0
 ;---------PK (parameters hardcoded)---------------
       CRC  = CRCL
         IF(CRCL.EQ.-99) CRC = 70     ;missing in treatment group
         IF(CRCL.EQ.0)   CRC = 70     ;missing in placebo group
       FCRC = 1+.01985*(CRC-70)
       CL   = 9.87*FCRC*EXP(ETA(3))
       V1   = 27.8
       Q    = 71.8
       V2   = 444
       S1   = V1
       K12  = Q/V1
       K21  = Q/V2
       K10  = CL/V1
 ;--------- Effect compartment--------------
       K13  = K10*.001
       K31  = THETA(5)
       S3   = S1*K13/K31

 ;---------Heart rate (HR)------------------
       BASE = THETA(1)*EXP(ETA(2))
       TEFF = THETA(6)*EXP(ETA(1))
       SLOP = THETA(4)
 ;---------Sinus conversion-----------------
       LAM = THETA(7)
       SHP = THETA(8)


$DES
 DADT(1) = K21*A(2) - (K12+K10) * A(1) ; 2-comp kinetic model
 DADT(2) =-K21*A(2) +  K12      * A(1)
 DADT(3) =-K31*A(3) +  K13      * A(1) ; Effect compartment

 HR   = BASE*(1+TEFF*T)*(1+SLOP*A(3)/S3)  ; Model for heart rate
                       ; Heart rate depends on time from start of study
                       ; and digoxin concentration in effect compartment

 DEL= 1E-6
 DADT(4) = LAM*SHP*(T+DEL)**(SHP-1)     ; Integrate hazard

$ERROR
 ;-------------PK and HR-----------------
 CONC = A(1)/S1  ; Conc in central compartment
 CE   = A(3)/S3  ; Conc in effect compartment

 IHR   = BASE*(1+TEFF*TIME)*(1+SLOP*CE)  ; HR prediction
 IPRED = IHR       ; For FLG=0  (HR)
 W = THETA(3)*IPRED

 IF(FLG.EQ.1) IPRED = CONC  ; For FLG=1, i.e. digoxin conc
 IF(FLG.EQ.1) W = THETA(2)

 IRES = DV-IPRED
 IWRES= IRES/W

 IF(FLG.LT.2) THEN          ; Digoxin conc and HR cont variables
    ;Sim_start : remove for simulation
    F_FLAG= 0
    Y  = IPRED+EPS(1)*W
    ;Sim_end

    ;Sim_start : add for simulation
    ;Y  = IPRED
    ;Sim_end
 ENDIF

 ;------------TIME TO EVENT--------------
 CHZ   = A(4)              ; Cumulative hazard
 SUR   = EXP(-CHZ)         ; Survival

 DELX = 1E-6
 HAZNOW = LAM*SHP*(TIME+DELX)**(SHP-1)

 IF(FLG.EQ.3) THEN
   IPRED = SUR*HAZNOW  ; Survival * hazard (S*h), conversion
   DV1 = 1
 ENDIF
 IF(FLG.EQ.4) THEN
   IPRED = SUR       ; Censored, no conversion during study interval
   DV1=0
 ENDIF
 IF(FLG.GT.2) THEN
    ;Sim_start : remove for simulation
    F_FLAG= 1      ; Conversion and censoring events are categorical
    ;Sim_end
    Y     = IPRED  ; Y is probability for TTE data
 ENDIF

 ;for TTE simulation
 IF(ICALL.EQ.4) THEN
   IF(NEWIND.NE.2) THEN        ; for each new individual
     CALL RANDOM (2,R)         ; call a random number
     TMP=R                     ; store the random number
     FLAG1=0                   ; initialize event counter
   ENDIF
   DV1=0                       ; initialize the censoring variable
   RTTE=0                      ; initialize the event variable
   IF(FLG.GT.2)THEN
     DV=0                      ; set all categorical DV's to 0
     FLG=-1                    ; initialize FLG variable, filter on this for estimation after simulation
   ENDIF
   IF(TMP.GT.SUR.AND.FLAG1.EQ.0.AND.FLG.EQ.-1) THEN ; an event
     DV=1
     FLG=3
     RTTE = 1
     DV1 = 1
     FLAG1 = 1
   ENDIF
   IF(FLAG1.EQ.0.AND.TIME.EQ.16.AND.FLG.EQ.-1)THEN   ; A censored event
     DV=1
     FLG=4
     RTTE = 1
     DV1 = 0
   ENDIF
 ENDIF

$THETA  (0,117.0000) FIX ; 1 BASE HR
$THETA  (0,1.420000) FIX ; 2 W CONC
$THETA  (0,0.100000) FIX ; 3 W HR
$THETA  -0.10300     FIX ; 4 SLOP
$THETA  (0,0.174000) FIX ; 5 KEO
$THETA  -0.00175     FIX ; 6 TIME-EFFECT
$THETA  (0,0.0400)       ; 7 LAMBDA FOR CONVERSION
$THETA  (0,.001)         ; 8 SHAPE
$OMEGA  1.510000  FIX    ; 1 TIME ON BASE IIV
$OMEGA  0.031300  FIX    ; 2 BASE IIV
$OMEGA  0.970000  FIX    ; 3 CL IIV
;Sim_start : remove for simulation
$SIGMA  1.000000  FIX
;Sim_end

;Sim_start : add for simulation
;$SIMULATION (123456789) (12345 UNIFORM) ONLYSIM NOPRED SUB=100
$EST MAX=9990 LAPLACIAN MET=1 PRINT=1 MSFO=msfb811
$COV
;Sim_end

$TAB ID TIME IPRED IWRES IPRED FLG CHZ SUR EVID DV1 ONEHEADER
     NOPRINT FILE=sdtab811
