Thu Aug 25 13:26:08 CEST 2016
;; 1. Based on: 2
$PROBLEM    PHENOBARB SIMPLE MODEL
$INPUT      ID TIME AMT WGT APGR DV
$DATA      pheno.dta IGNORE=@
$SUBROUTINE ADVAN1 TRANS2
$PK

      CLWGT = ( 1 + THETA(3)*(WGT - 1.3))
      TVCL=THETA(1)
      TVCL = CLWGT*TVCL
      TVV=THETA(2)
      CL=TVCL*EXP(ETA(1))
      V=TVV*EXP(ETA(2))
      S1=V
$ERROR

      W=F
      Y=F+W*EPS(1)

      IPRED=F         ;  individual-specific prediction
      IRES=DV-IPRED   ;  individual-specific residual
      IWRES=IRES/W    ;  individual-specific weighted residual

$THETA  (0,0.00563997) ; CL
$THETA  (0,1.35134) ; V
$THETA  (-0.435,1.13,1.429) ; CLWGT
$OMEGA  0.0487546  ;       IVCL
 0.129957  ;        IVV
$SIGMA  0.0174894
$ESTIMATION METHOD=COND MAXEVALS=9997
$COVARIANCE PRINT=E
$TABLE      ID CL V ETA1 ETA2 NOPRINT ONEHEADER FILE=patab3
$TABLE      ID TIME IPRED IWRES CWRES NOPRINT ONEHEADER FILE=sdtab3
$TABLE      ID WGT APGR NOPRINT ONEHEADER FILE=cotab3

NM-TRAN MESSAGES
 WARNINGS AND ERRORS (IF ANY) FOR PROBLEM    1
 (WARNING  2) NM-TRAN INFERS THAT THE DATA ARE POPULATION.

1NONLINEAR MIXED EFFECTS MODEL PROGRAM (NONMEM) VERSION 7.3.0
 ORIGINALLY DEVELOPED BY STUART BEAL, LEWIS SHEINER, AND ALISON BOECKMANN
 CURRENT DEVELOPERS ARE ROBERT BAUER, ICON DEVELOPMENT SOLUTIONS,
 AND ALISON BOECKMANN. IMPLEMENTATION, EFFICIENCY, AND STANDARDIZATION
 PERFORMED BY NOUS INFOSYSTEMS.
 PROBLEM NO.:         1
 PHENOBARB SIMPLE MODEL
 TOT. NO. OF OBS RECS:      155
 TOT. NO. OF INDIVIDUALS:     59
 ONE COMPARTMENT MODEL (ADVAN1)
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 #TBLN:      1
 #METH: First Order Conditional Estimation
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
 #TERM:
0MINIMIZATION SUCCESSFUL
 NO. OF FUNCTION EVALUATIONS USED:      123
 NO. OF SIG. DIGITS IN FINAL EST.:  4.2

 ETABAR IS THE ARITHMETIC MEAN OF THE ETA-ESTIMATES,
 AND THE P-VALUE IS GIVEN FOR THE NULL HYPOTHESIS THAT THE TRUE MEAN IS 0.

 ETABAR:        -3.8085E-03  2.3814E-04
 SE:             1.5843E-02  4.3926E-02
 N:                      59          59

 P VAL.:         8.1003E-01  9.9567E-01

 ETAshrink(%):   4.3223E+01  5.8096E+00
 EBVshrink(%):   4.3409E+01  5.4252E+00
 EPSshrink(%):   2.6022E+01

 #TERE:
 Elapsed estimation time in seconds:     0.50
 Elapsed covariance time in seconds:     0.41

 ********************                        FIRST ORDER CONDITIONAL ESTIMATION                      ********************
 #OBJT:**************                       MINIMUM VALUE OF OBJECTIVE FUNCTION                      ********************
 #OBJV:********************************************      687.764       **************************************************

 ********************                        FIRST ORDER CONDITIONAL ESTIMATION                      ********************
 ********************                             FINAL PARAMETER ESTIMATE                           ********************

 THETA - VECTOR OF FIXED EFFECTS PARAMETERS   *********
         TH 1      TH 2      TH 3
         6.19E-03  1.35E+00  1.13E+00

 OMEGA - COV MATRIX FOR RANDOM EFFECTS - ETAS  ********
            ETA1      ETA2
 ETA1
+        4.67E-02
 ETA2
+        0.00E+00  1.31E-01

 SIGMA - COV MATRIX FOR RANDOM EFFECTS - EPSILONS  ****
            EPS1
 EPS1
+        1.66E-02

 OMEGA - CORR MATRIX FOR RANDOM EFFECTS - ETAS  *******
            ETA1      ETA2
 ETA1
+        2.16E-01
 ETA2
+        0.00E+00  3.61E-01

 SIGMA - CORR MATRIX FOR RANDOM EFFECTS - EPSILONS  ***
            EPS1
 EPS1
+        1.29E-01

 ********************                        FIRST ORDER CONDITIONAL ESTIMATION                      ********************
 ********************                            STANDARD ERROR OF ESTIMATE                          ********************

 THETA - VECTOR OF FIXED EFFECTS PARAMETERS   *********
         TH 1      TH 2      TH 3
         3.07E-04  7.29E-02  2.15E-01

 OMEGA - COV MATRIX FOR RANDOM EFFECTS - ETAS  ********
            ETA1      ETA2
 ETA1
+        2.16E-02
 ETA2
+       .........  4.03E-02

 SIGMA - COV MATRIX FOR RANDOM EFFECTS - EPSILONS  ****
            EPS1
 EPS1
+        3.43E-03

 OMEGA - CORR MATRIX FOR RANDOM EFFECTS - ETAS  *******
            ETA1      ETA2
 ETA1
+        5.01E-02
 ETA2
+       .........  5.57E-02

 SIGMA - CORR MATRIX FOR RANDOM EFFECTS - EPSILONS  ***
            EPS1
 EPS1
+        1.33E-02

 ********************                        FIRST ORDER CONDITIONAL ESTIMATION                      ********************
 ********************                          COVARIANCE MATRIX OF ESTIMATE                         ********************

            TH 1      TH 2      TH 3      OM11      OM12      OM22      SG11
 TH 1
+        9.42E-08
 TH 2
+       -5.80E-06  5.32E-03
 TH 3
+       -1.84E-05 -5.58E-04  4.62E-02
 OM11
+        1.32E-07 -2.84E-04  2.04E-03  4.69E-04
 OM12
+       ......... ......... ......... ......... .........
 OM22
+        1.42E-06  1.63E-03 -2.02E-03 -8.79E-05 .........  1.62E-03
 SG11
+        3.62E-07 -2.35E-05  3.23E-04  2.87E-05 ......... -2.28E-05  1.17E-05

 ********************                        FIRST ORDER CONDITIONAL ESTIMATION                      ********************
 ********************                          CORRELATION MATRIX OF ESTIMATE                        ********************

            TH 1      TH 2      TH 3      OM11      OM12      OM22      SG11
 TH 1
+        3.07E-04
 TH 2
+       -2.59E-01  7.29E-02
 TH 3
+       -2.79E-01 -3.56E-02  2.15E-01
 OM11
+        1.99E-02 -1.80E-01  4.38E-01  2.16E-02
 OM12
+       ......... ......... ......... ......... .........
 OM22
+        1.15E-01  5.53E-01 -2.33E-01 -1.01E-01 .........  4.03E-02
 SG11
+        3.44E-01 -9.39E-02  4.39E-01  3.87E-01 ......... -1.65E-01  3.43E-03
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
 ********************                        FIRST ORDER CONDITIONAL ESTIMATION                      ********************
 ********************                      EIGENVALUES OF COR MATRIX OF ESTIMATE                     ********************

             1         2         3         4         5         6
         2.24E-01  3.67E-01  6.58E-01  1.28E+00  1.41E+00  2.07E+00
 #CPUT: Total CPU Time in Seconds,        0.984
