Mon Aug 29 10:58:06 CEST 2016
$PROBLEM    MOXONIDINE PK,FINAL ESTIMATES,SIMULATED DATA
;;

;; run 1, FOCEI, Lag model, all data

;;
$INPUT      ID VISI DROP DGRP DOSE DROP DROP DROP DROP NEUY SCR AGE
            SEX NYH WT DROP ACE DIG DIU DROP TAD TIME DROP CRCL AMT SS
            II DROP DROP DROP DV DROP DROP MDV FREMTYPE
$DATA      ../../frem_dataset.dta IGNORE=@
$SUBROUTINE ADVAN2 TRANS1
$PK

;---------- PK model ------------------

   TVCL  = THETA(1)
   TVV   = THETA(2)

   CL    = TVCL*EXP(ETA(1))
   V     = TVV*EXP(ETA(2))
   KA    = THETA(3)*EXP(ETA(3))
   ALAG1 = THETA(4)
   K     = CL/V
   S2    = V

$ERROR

     IPRED = LOG(.025)
     WA     = THETA(5)
     W      = WA
     IF(F.GT.0) IPRED = LOG(F)
     IRES  = IPRED-DV
     IWRES = IRES/W
     Y     = IPRED+ERR(1)*W

;;;FREM CODE BEGIN COMPACT
;;;DO NOT MODIFY
     IF (FREMTYPE.EQ.100) THEN
;       AGE  7.82226906804
        Y = THETA(6) + ETA(4)*7.82226906804 + EPS(2)
        IPRED = THETA(6) + ETA(4)*7.82226906804
     END IF
     IF (FREMTYPE.EQ.200) THEN
;       NEUY  1854.50594596
        Y = THETA(7) + ETA(5)*1854.50594596 + EPS(2)
        IPRED = THETA(7) + ETA(5)*1854.50594596
     END IF
     IF (FREMTYPE.EQ.300) THEN
;       CRCL  21.8088189384
        Y = THETA(8) + ETA(6)*21.8088189384 + EPS(2)
        IPRED = THETA(8) + ETA(6)*21.8088189384
     END IF
     IF (FREMTYPE.EQ.400) THEN
;       SEX  0.404756978659
        Y = THETA(9) + ETA(7)*0.404756978659 + EPS(2)
        IPRED = THETA(9) + ETA(7)*0.404756978659
     END IF
;;;FREM CODE END COMPACT
$THETA  (0,32.8662) ; TVCL
$THETA  (0,21.0303) ; TVV
$THETA  (0,0.291996) ; TVKA
$THETA  (0,0.0991633) ; LAG
$THETA  (0,0.33452) ; RES ERR
$THETA  65.1756756757 FIX ; TV_AGE
 2698.56756757 FIX ; TV_NEUY
 67.7297297297 FIX ; TV_CRCL
 1.2027027027 FIX ; TV_SEX
$OMEGA  BLOCK(7)
 0.408722  ;     IIV CL
 0.00671112 1.10195  ;      IIV V
 0.00291392 0.0047846 0.207744  ;     IIV KA
 -0.0799948 -0.211593 0.0256951 0.986456  ;    BSV_AGE
 -0.0455003 -0.100835 -0.0722142 0.214764 0.986516  ;   BSV_NEUY
 0.00639171 -0.0385912 0.0503848 -0.463915 -0.158876 0.986506  ;   BSV_CRCL
 0.0883424 0.21761 0.04196 -0.11369 -0.312661 -0.224976 0.986635  ;    BSV_SEX
$SIGMA  1  FIX
$SIGMA  1e-07  FIX  ;     EPSCOV
$ESTIMATION METHOD=1 MAXEVALS=9999 NONINFETA=1
$COVARIANCE PRINT=E

NM-TRAN MESSAGES
 WARNINGS AND ERRORS (IF ANY) FOR PROBLEM    1
 (WARNING  2) NM-TRAN INFERS THAT THE DATA ARE POPULATION.

1NONLINEAR MIXED EFFECTS MODEL PROGRAM (NONMEM) VERSION 7.3.0
 ORIGINALLY DEVELOPED BY STUART BEAL, LEWIS SHEINER, AND ALISON BOECKMANN
 CURRENT DEVELOPERS ARE ROBERT BAUER, ICON DEVELOPMENT SOLUTIONS,
 AND ALISON BOECKMANN. IMPLEMENTATION, EFFICIENCY, AND STANDARDIZATION
 PERFORMED BY NOUS INFOSYSTEMS.
 PROBLEM NO.:         1
 MOXONIDINE PK,FINAL ESTIMATES,SIMULATED DATA
 TOT. NO. OF OBS RECS:     1318
 TOT. NO. OF INDIVIDUALS:     74
 ONE COMPARTMENT MODEL WITH FIRST-ORDER ABSORPTION (ADVAN2)
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 #TBLN:      1
 #METH: First Order Conditional Estimation
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
 #TERM:
0MINIMIZATION SUCCESSFUL
 NO. OF FUNCTION EVALUATIONS USED:      440
 NO. OF SIG. DIGITS IN FINAL EST.:  3.6

 ETABAR IS THE ARITHMETIC MEAN OF THE ETA-ESTIMATES,
 AND THE P-VALUE IS GIVEN FOR THE NULL HYPOTHESIS THAT THE TRUE MEAN IS 0.

 ETABAR:         7.0362E-04  2.0505E-02  1.3338E-02 -1.6025E-11 -1.3120E-12 -1.2639E-12 -2.1301E-09
 SE:             7.3946E-02  1.2087E-01  5.0722E-02  1.1546E-01  1.1546E-01  1.1546E-01  1.1546E-01
 N:                      74          74          74          74          74          74          74

 P VAL.:         9.9241E-01  8.6529E-01  7.9257E-01  1.0000E+00  1.0000E+00  1.0000E+00  1.0000E+00

 ETAshrink(%):   4.8202E-01  4.8709E+00  5.7749E+00  1.0000E-10  1.0000E-10  1.0000E-10  1.0000E-10
 EBVshrink(%):   1.1572E+00  4.5934E+00  5.1469E+00  8.2835E-08  1.4766E-12  1.0657E-08  3.0937E-05
 EPSshrink(%):   8.5593E+00  9.9955E+01

 #TERE:
 Elapsed estimation time in seconds:     9.51
 Elapsed covariance time in seconds:     6.74

 ********************                        FIRST ORDER CONDITIONAL ESTIMATION                      ********************
 #OBJT:**************                       MINIMUM VALUE OF OBJECTIVE FUNCTION                      ********************
 #OBJV:********************************************     1334.883       **************************************************

 ********************                        FIRST ORDER CONDITIONAL ESTIMATION                      ********************
 ********************                             FINAL PARAMETER ESTIMATE                           ********************

 THETA - VECTOR OF FIXED EFFECTS PARAMETERS   *********
         TH 1      TH 2      TH 3      TH 4      TH 5      TH 6      TH 7      TH 8      TH 9
         3.29E+01  2.10E+01  2.85E-01  9.63E-02  3.35E-01  6.52E+01  2.70E+03  6.77E+01  1.20E+00

 OMEGA - COV MATRIX FOR RANDOM EFFECTS - ETAS  ********
            ETA1      ETA2      ETA3      ETA4      ETA5      ETA6      ETA7
 ETA1
+        4.14E-01
 ETA2
+        6.49E-01  1.21E+00
 ETA3
+        5.98E-02  8.43E-02  2.17E-01
 ETA4
+       -7.99E-02 -1.88E-01  3.33E-02  9.86E-01
 ETA5
+       -4.74E-02 -1.36E-01 -6.49E-02  2.15E-01  9.86E-01
 ETA6
+        8.34E-03 -5.89E-02  3.40E-02 -4.64E-01 -1.59E-01  9.86E-01
 ETA7
+        8.82E-02  1.72E-01  1.33E-02 -1.14E-01 -3.13E-01 -2.25E-01  9.86E-01

 SIGMA - COV MATRIX FOR RANDOM EFFECTS - EPSILONS  ****
            EPS1      EPS2
 EPS1
+        1.00E+00
 EPS2
+        0.00E+00  1.00E-07

 OMEGA - CORR MATRIX FOR RANDOM EFFECTS - ETAS  *******
            ETA1      ETA2      ETA3      ETA4      ETA5      ETA6      ETA7
 ETA1
+        6.44E-01
 ETA2
+        9.16E-01  1.10E+00
 ETA3
+        1.99E-01  1.64E-01  4.66E-01
 ETA4
+       -1.25E-01 -1.72E-01  7.20E-02  9.93E-01
 ETA5
+       -7.41E-02 -1.24E-01 -1.40E-01  2.18E-01  9.93E-01
 ETA6
+        1.30E-02 -5.38E-02  7.35E-02 -4.70E-01 -1.61E-01  9.93E-01
 ETA7
+        1.38E-01  1.57E-01  2.86E-02 -1.15E-01 -3.17E-01 -2.28E-01  9.93E-01

 SIGMA - CORR MATRIX FOR RANDOM EFFECTS - EPSILONS  ***
            EPS1      EPS2
 EPS1
+        1.00E+00
 EPS2
+        0.00E+00  3.16E-04

 ********************                        FIRST ORDER CONDITIONAL ESTIMATION                      ********************
 ********************                            STANDARD ERROR OF ESTIMATE                          ********************

 THETA - VECTOR OF FIXED EFFECTS PARAMETERS   *********
         TH 1      TH 2      TH 3      TH 4      TH 5      TH 6      TH 7      TH 8      TH 9
         2.27E+00  2.61E+00  1.73E-02  2.04E-02  8.74E-03 ......... ......... ......... .........

 OMEGA - COV MATRIX FOR RANDOM EFFECTS - ETAS  ********
            ETA1      ETA2      ETA3      ETA4      ETA5      ETA6      ETA7
 ETA1
+        6.97E-02
 ETA2
+        1.23E-01  2.89E-01
 ETA3
+        3.97E-02  7.36E-02  4.43E-02
 ETA4
+        8.40E-02  1.42E-01  6.55E-02  1.54E-01
 ETA5
+        7.20E-02  1.16E-01  4.39E-02  1.01E-01  1.92E-01
 ETA6
+        8.61E-02  1.46E-01  5.24E-02  1.25E-01  1.06E-01  1.91E-01
 ETA7
+        5.80E-02  1.11E-01  5.50E-02  1.14E-01  8.88E-02  1.27E-01  1.70E-01

 SIGMA - COV MATRIX FOR RANDOM EFFECTS - EPSILONS  ****
            EPS1      EPS2
 EPS1
+       .........
 EPS2
+       ......... .........

 OMEGA - CORR MATRIX FOR RANDOM EFFECTS - ETAS  *******
            ETA1      ETA2      ETA3      ETA4      ETA5      ETA6      ETA7
 ETA1
+        5.42E-02
 ETA2
+        3.74E-02  1.31E-01
 ETA3
+        1.33E-01  1.33E-01  4.75E-02
 ETA4
+        1.25E-01  1.23E-01  1.42E-01  7.74E-02
 ETA5
+        1.11E-01  1.02E-01  9.31E-02  9.70E-02  9.69E-02
 ETA6
+        1.34E-01  1.33E-01  1.13E-01  8.44E-02  9.43E-02  9.64E-02
 ETA7
+        8.81E-02  9.83E-02  1.19E-01  1.17E-01  6.48E-02  1.26E-01  8.54E-02

 SIGMA - CORR MATRIX FOR RANDOM EFFECTS - EPSILONS  ***
            EPS1      EPS2
 EPS1
+       .........
 EPS2
+       ......... .........
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
 ********************                        FIRST ORDER CONDITIONAL ESTIMATION                      ********************
 ********************                      EIGENVALUES OF COR MATRIX OF ESTIMATE                     ********************

             1         2         3         4         5         6         7         8         9        10        11        12
             13        14        15        16        17        18        19        20        21        22        23        24
            25        26        27        28        29        30        31        32        33
         9.53E-03  3.28E-02  4.81E-02  5.34E-02  6.87E-02  7.34E-02  1.10E-01  1.23E-01  1.37E-01  2.04E-01  2.12E-01  2.43E-01
          2.93E-01  3.18E-01  4.08E-01  5.08E-01  6.13E-01  7.51E-01  7.65E-01  8.17E-01  9.61E-01  1.08E+00  1.20E+00  1.36E+00
         1.41E+00  1.67E+00  1.89E+00  2.05E+00  2.21E+00  2.63E+00  2.95E+00  3.49E+00  4.30E+00
 #CPUT: Total CPU Time in Seconds,       16.292
