Mon Oct 24 15:00:47 CEST 2016
;THIS IS A NMTRAN RECORD FOR THE PEFLOXACIN PK ANALYSIS
;NMTRAN RECORD
$PROBLEM    pefloxacin data intraindividual modeling
$INPUT      ID OCC DV TIME AMT RATE ADDL II WT AGE CLCR SEX CEN BIL
            SBP
$DATA      ../../m1/pefdata.csv IGNORE=@
$SUBROUTINE ADVAN=ADVAN1
$PK

    OCC1=0
    OCC2=0
    OCC3=0
    IF (OCC.EQ.0) OCC1=1
    IF (OCC.EQ.1) OCC2=1
    IF (OCC.EQ.2) OCC3=1

 IF(NEWIND.NE.2) BCLCR=CLCR
 IF(NEWIND.NE.2) BWT  =WT
                 DCLCR=CLCR-BCLCR
                 DWT  =WT-BWT

    TVCL=THETA(1)*(1+THETA(4)*(CLCR-100))
    CL=TVCL*EXP(ETA(1)+OCC1*ETA(3)+OCC2*ETA(5)+OCC3*ETA(7))
    TVV=THETA(2)*(WT/70)
    V =TVV *EXP(ETA(2)+OCC1*ETA(4)+OCC2*ETA(6)+OCC3*ETA(8))
    S1=V
    K=CL/V
$ERROR

    IPRED=F
    W    =THETA(3)*IPRED
    IWRES=(DV-IPRED)/W
    Y=IPRED + W*ERR(1)
$THETA  (0,3.42506) ; 1 TVCL
$THETA  (0,66.1332) ; 2 TVV
$THETA  (0,0.142615) ; 3 RV
$THETA  (0,0.00417958,.0099) ; 4 CRCL on CL
$OMEGA  BLOCK(2)
 0.101483
 0.0562009 0.0550008
$OMEGA  BLOCK(2)
 0.136309
 -0.0122537 0.00811371
$OMEGA  BLOCK(2) SAME
$OMEGA  BLOCK(2) SAME
$SIGMA  1  FIX
$ESTIMATION SIG=3 MAX=3000 PRINT=10 METH=1 INTER
$COVARIANCE
$TABLE      ID TIME IPRED IWRES CWRES NOPRINT FILE=sdtab1
$TABLE      ID ETA1 ETA2 ETA3 ETA4 ETA5 ETA6 ETA7 NOPRINT FILE=patab1
$TABLE      ID CLCR WT NOPRINT FILE=cotab1
$TABLE      ID OCC DV TIME AMT RATE ADDL II WT AGE CLCR SEX CEN BIL
            SBP IPRED PRED NOPRINT NOAPPEND ONEHEADER
            FILE=orig_pred.dta
$TABLE      ID DV MDV TIME CWRES IPRED PRED IWRES NOPRINT NOAPPEND
            ONEHEADER FILE=original_res_table.dta

NM-TRAN MESSAGES
 WARNINGS AND ERRORS (IF ANY) FOR PROBLEM    1
 (WARNING  2) NM-TRAN INFERS THAT THE DATA ARE POPULATION.

1NONLINEAR MIXED EFFECTS MODEL PROGRAM (NONMEM) VERSION 7.3.0
 ORIGINALLY DEVELOPED BY STUART BEAL, LEWIS SHEINER, AND ALISON BOECKMANN
 CURRENT DEVELOPERS ARE ROBERT BAUER, ICON DEVELOPMENT SOLUTIONS,
 AND ALISON BOECKMANN. IMPLEMENTATION, EFFICIENCY, AND STANDARDIZATION
 PERFORMED BY NOUS INFOSYSTEMS.
 PROBLEM NO.:         1
 pefloxacin data intraindividual modeling
 TOT. NO. OF OBS RECS:      337
 TOT. NO. OF INDIVIDUALS:     74
 ONE COMPARTMENT MODEL (ADVAN1)
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 #TBLN:      1
 #METH: First Order Conditional Estimation with Interaction
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
 #TERM:
0MINIMIZATION SUCCESSFUL
 HOWEVER, PROBLEMS OCCURRED WITH THE MINIMIZATION.
 REGARD THE RESULTS OF THE ESTIMATION STEP CAREFULLY, AND ACCEPT THEM ONLY
 AFTER CHECKING THAT THE COVARIANCE STEP PRODUCES REASONABLE OUTPUT.
 NO. OF FUNCTION EVALUATIONS USED:       83
 NO. OF SIG. DIGITS IN FINAL EST.:  3.4

 ETABAR IS THE ARITHMETIC MEAN OF THE ETA-ESTIMATES,
 AND THE P-VALUE IS GIVEN FOR THE NULL HYPOTHESIS THAT THE TRUE MEAN IS 0.

 ETABAR:        -6.3241E-03 -1.1497E-02  4.3231E-02 -6.5556E-03 -1.9720E-02  2.4403E-03 -2.6271E-03 -1.1150E-04
 SE:             2.7916E-02  2.0387E-02  3.4134E-02  4.7364E-03  2.4117E-02  3.8594E-03  2.8378E-03  5.8212E-04
 N:                      74          74          74          74          74          74          74          74

 P VAL.:         8.2078E-01  5.7280E-01  2.0533E-01  1.6633E-01  4.1353E-01  5.2718E-01  3.5457E-01  8.4811E-01

 ETAshrink(%):   2.4092E+01  2.4699E+01  1.9923E+01  5.4465E+01  4.3424E+01  6.2896E+01  9.3343E+01  9.4403E+01
 EBVshrink(%):   2.4164E+01  2.5147E+01  1.9746E+01  5.2786E+01  4.5383E+01  6.5869E+01  8.5971E+01  9.2411E+01
 EPSshrink(%):   2.3357E+01

 #TERE:
 Elapsed estimation time in seconds:     3.67
 Elapsed covariance time in seconds:     4.28

 ********************               FIRST ORDER CONDITIONAL ESTIMATION WITH INTERACTION              ********************
 #OBJT:**************                       MINIMUM VALUE OF OBJECTIVE FUNCTION                      ********************
 #OBJV:********************************************      981.991       **************************************************

 ********************               FIRST ORDER CONDITIONAL ESTIMATION WITH INTERACTION              ********************
 ********************                             FINAL PARAMETER ESTIMATE                           ********************

 THETA - VECTOR OF FIXED EFFECTS PARAMETERS   *********
         TH 1      TH 2      TH 3      TH 4
         3.43E+00  6.61E+01  1.43E-01  4.18E-03

 OMEGA - COV MATRIX FOR RANDOM EFFECTS - ETAS  ********
            ETA1      ETA2      ETA3      ETA4      ETA5      ETA6      ETA7      ETA8
 ETA1
+        1.01E-01
 ETA2
+        5.62E-02  5.50E-02
 ETA3
+        0.00E+00  0.00E+00  1.36E-01
 ETA4
+        0.00E+00  0.00E+00 -1.23E-02  8.12E-03
 ETA5
+        0.00E+00  0.00E+00  0.00E+00  0.00E+00  1.36E-01
 ETA6
+        0.00E+00  0.00E+00  0.00E+00  0.00E+00 -1.23E-02  8.12E-03
 ETA7
+        0.00E+00  0.00E+00  0.00E+00  0.00E+00  0.00E+00  0.00E+00  1.36E-01
 ETA8
+        0.00E+00  0.00E+00  0.00E+00  0.00E+00  0.00E+00  0.00E+00 -1.23E-02  8.12E-03

 SIGMA - COV MATRIX FOR RANDOM EFFECTS - EPSILONS  ****
            EPS1
 EPS1
+        1.00E+00

 OMEGA - CORR MATRIX FOR RANDOM EFFECTS - ETAS  *******
            ETA1      ETA2      ETA3      ETA4      ETA5      ETA6      ETA7      ETA8
 ETA1
+        3.19E-01
 ETA2
+        7.52E-01  2.34E-01
 ETA3
+        0.00E+00  0.00E+00  3.69E-01
 ETA4
+        0.00E+00  0.00E+00 -3.69E-01  9.01E-02
 ETA5
+        0.00E+00  0.00E+00  0.00E+00  0.00E+00  3.69E-01
 ETA6
+        0.00E+00  0.00E+00  0.00E+00  0.00E+00 -3.69E-01  9.01E-02
 ETA7
+        0.00E+00  0.00E+00  0.00E+00  0.00E+00  0.00E+00  0.00E+00  3.69E-01
 ETA8
+        0.00E+00  0.00E+00  0.00E+00  0.00E+00  0.00E+00  0.00E+00 -3.69E-01  9.01E-02

 SIGMA - CORR MATRIX FOR RANDOM EFFECTS - EPSILONS  ***
            EPS1
 EPS1
+        1.00E+00

 ********************               FIRST ORDER CONDITIONAL ESTIMATION WITH INTERACTION              ********************
 ********************                            STANDARD ERROR OF ESTIMATE                          ********************

 THETA - VECTOR OF FIXED EFFECTS PARAMETERS   *********
         TH 1      TH 2      TH 3      TH 4
         1.85E-01  2.47E+00  1.25E-02  8.06E-04

 OMEGA - COV MATRIX FOR RANDOM EFFECTS - ETAS  ********
            ETA1      ETA2      ETA3      ETA4      ETA5      ETA6      ETA7      ETA8
 ETA1
+        3.85E-02
 ETA2
+        1.70E-02  2.28E-02
 ETA3
+       ......... .........  4.01E-02
 ETA4
+       ......... .........  1.01E-02  6.83E-03
 ETA5
+       ......... ......... ......... ......... .........
 ETA6
+       ......... ......... ......... ......... ......... .........
 ETA7
+       ......... ......... ......... ......... ......... ......... .........
 ETA8
+       ......... ......... ......... ......... ......... ......... ......... .........

 SIGMA - COV MATRIX FOR RANDOM EFFECTS - EPSILONS  ****
            EPS1
 EPS1
+       .........

 OMEGA - CORR MATRIX FOR RANDOM EFFECTS - ETAS  *******
            ETA1      ETA2      ETA3      ETA4      ETA5      ETA6      ETA7      ETA8
 ETA1
+        6.05E-02
 ETA2
+        1.88E-01  4.85E-02
 ETA3
+       ......... .........  5.44E-02
 ETA4
+       ......... .........  2.29E-01  3.79E-02
 ETA5
+       ......... ......... ......... ......... .........
 ETA6
+       ......... ......... ......... ......... ......... .........
 ETA7
+       ......... ......... ......... ......... ......... ......... .........
 ETA8
+       ......... ......... ......... ......... ......... ......... ......... .........

 SIGMA - CORR MATRIX FOR RANDOM EFFECTS - EPSILONS  ***
            EPS1
 EPS1
+       .........
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 #CPUT: Total CPU Time in Seconds,        8.228
