Wed Nov 11 09:13:44 CET 2015
; Script generated by the pharmML2Nmtran Converter v.0.1.0
; Source	: PharmML 0.6.0
; Target	: NMTRAN 7.3.0
; Model 	: UseCase8
; Dated 	: Fri Aug 28 11:00:04 BST 2015
$PROBLEM    "UseCase8.mdl - generated by MDL2PharmML v.6.0"
$INPUT      ID TIME WT AGE=DROP SEX=DROP AMT OCC DV MDV
$DATA      warfarin_conc_bov_P4_sort.csv IGNORE=@
$SUBROUTINE ADVAN13 TOL=9
$MODEL      COMP (COMP1) ;GUT
            COMP (COMP2) ;CENTRAL
$ABBREVIATED REPLACE ETA(OCC_ETA_BOV_CL)=ETA(5,9)
$ABBREVIATED REPLACE ETA(OCC_ETA_BOV_V)=ETA(6,10)
$ABBREVIATED REPLACE ETA(OCC_ETA_BOV_KA)=ETA(7,11)
$ABBREVIATED REPLACE ETA(OCC_ETA_BOV_TL)=ETA(8,12)
$PK
POP_CL = THETA(1)
POP_V = THETA(2)
POP_KA = THETA(3)
POP_TL = THETA(4)
RUV_PROP = THETA(5)
RUV_ADD = THETA(6)
BETA_CL_WT = THETA(7)
BETA_V_WT = THETA(8)

ETA_BSV_CL = ETA(1)
ETA_BSV_V = ETA(2)
ETA_BSV_KA = ETA(3)
ETA_BSV_TL = ETA(4)

; Could maybe do something like this:
ETA_BOV_CL = ETA(OCC_ETA_BOV_CL)
ETA_BOV_V = ETA(OCC_ETA_BOV_V)
ETA_BOV_KA = ETA(OCC_ETA_BOV_KA)
ETA_BOV_TL = ETA(OCC_ETA_BOV_TL)

LOGTWT = LOG(WT/70)

MU_1 = LOG(POP_CL)+BETA_CL_WT * LOGTWT;
CL = EXP(MU_1 + ETA(1)+ ETA(OCC_ETA_BOV_CL));

MU_2 = LOG(POP_V)+BETA_V_WT * LOGTWT;
V = EXP(MU_2 + ETA(2)+ ETA(OCC_ETA_BOV_V));

MU_3 = LOG(POP_KA);
KA = EXP(MU_3 + ETA(3)+ ETA(OCC_ETA_BOV_KA));

MU_4 = LOG(POP_TL);
TL = EXP(MU_4 + ETA(4)+ ETA(OCC_ETA_BOV_TL));

A_0(1) = 0
A_0(2) = 0

$DES
GUT_DES = A(1)
CENTRAL_DES = A(2)
IF (T.GE.TL) THEN
	RATEIN_DES = GUT_DES*KA
ELSE
	RATEIN_DES = 0
ENDIF
CC_DES = CENTRAL_DES/V
DADT(1) = -(RATEIN_DES)
DADT(2) = (RATEIN_DES-CL*CENTRAL_DES/V)

$ERROR
GUT = A(1)
CENTRAL = A(2)
IF (TIME.GE.TL) THEN
	RATEIN = GUT*KA
ELSE
	RATEIN = 0
ENDIF
CC = CENTRAL/V
IPRED = CC
W = RUV_ADD+RUV_PROP*IPRED
Y = IPRED+W*EPS(1)
IRES = DV - IPRED
IWRES = IRES/W

$THETA  (0.001,0.1) ; POP_CL
 (0.001,8.0) ; POP_V
 (0.001,2.0) ; POP_KA
 (0.001,1.0) ; POP_TL
 (0.0,0.1) ; RUV_PROP
 (0.0,0.224) ; RUV_ADD
 0.75 FIX ; BETA_CL_WT
 1.0 FIX ; BETA_V_WT
$OMEGA  0.1  ;     BSV_CL
 0.1  ;      BSV_V
 0.1  ;     BSV_KA
 0.1  ;     BSV_TL
$OMEGA  BLOCK(4)
 0.1  ;     BOV_CL
 0 0.1  ;      BOV_V
 0 0 0.1  ;     BOV_KA
 0 0 0 0.1  ;     BOV_TL
$OMEGA  BLOCK(4) SAME
$SIGMA  1.0  FIX
$ESTIMATION METHOD=COND INTER NSIG=3 SIGL=9 MAXEVALS=9999 PRINT=10
            NOABORT
$TABLE      ID TIME WT AMT OCC MDV PRED IPRED RES IRES WRES IWRES Y DV
            NOAPPEND NOPRINT FILE=sdtab
$TABLE      ID CL V KA TL OCC ETA_BSV_CL ETA_BOV_CL ETA_BSV_V
            ETA_BOV_V ETA_BSV_KA ETA_BOV_KA ETA_BSV_TL ETA_BOV_TL
            NOAPPEND NOPRINT FILE=patab
$TABLE      ID WT NOAPPEND NOPRINT FILE=cotab

NM-TRAN MESSAGES
 WARNINGS AND ERRORS (IF ANY) FOR PROBLEM    1
 (WARNING  2) NM-TRAN INFERS THAT THE DATA ARE POPULATION.
 (WARNING  3) THERE MAY BE AN ERROR IN THE ABBREVIATED CODE. THE FOLLOWING
 ONE OR MORE RANDOM VARIABLES ARE DEFINED WITH "IF" STATEMENTS THAT DO NOT
 PROVIDE DEFINITIONS FOR BOTH THE "THEN" AND "ELSE" CASES. IF ALL
 CONDITIONS FAIL, THE VALUES OF THESE VARIABLES WILL BE ZERO.
   ETA(OCC_ETA_BOV_CL) ETA(OCC_ETA_BOV_V) ETA(OCC_ETA_BOV_KA)
 ETA(OCC_ETA_BOV_TL)
 (MU_WARNING 13) MU_001: DOES NOT HAVE ADDITIVE ASSOCIATION WITH ETA(001)
 (MU_WARNING 13) MU_002: DOES NOT HAVE ADDITIVE ASSOCIATION WITH ETA(002)
 (MU_WARNING 26) DATA ITEM(S) USED IN DEFINITION OF MU_(S) SHOULD BE CONSTANT FOR INDIV. REC.:
  WT
Note: The following floating-point exceptions are signalling: IEEE_INVALID_FLAG IEEE_DIVIDE_BY_ZERO

1NONLINEAR MIXED EFFECTS MODEL PROGRAM (NONMEM) VERSION 7.3.0
 ORIGINALLY DEVELOPED BY STUART BEAL, LEWIS SHEINER, AND ALISON BOECKMANN
 CURRENT DEVELOPERS ARE ROBERT BAUER, ICON DEVELOPMENT SOLUTIONS,
 AND ALISON BOECKMANN. IMPLEMENTATION, EFFICIENCY, AND STANDARDIZATION
 PERFORMED BY NOUS INFOSYSTEMS.
 PROBLEM NO.:         1
 "UseCase8.mdl - generated by MDL2PharmML v.6.0"
 TOT. NO. OF OBS RECS:      452
 TOT. NO. OF INDIVIDUALS:     28
 GENERAL NONLINEAR KINETICS MODEL USING LSODA (ADVAN13)
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 #TBLN:      1
 #METH: First Order Conditional Estimation with Interaction
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
 #TERM:
0MINIMIZATION TERMINATED
 DUE TO ROUNDING ERRORS (ERROR=134)
 NO. OF FUNCTION EVALUATIONS USED:      474
 NO. OF SIG. DIGITS UNREPORTABLE
0PARAMETER ESTIMATE IS NEAR ITS BOUNDARY

 ETABAR IS THE ARITHMETIC MEAN OF THE ETA-ESTIMATES,
 AND THE P-VALUE IS GIVEN FOR THE NULL HYPOTHESIS THAT THE TRUE MEAN IS 0.

 ETABAR:         6.6114E-06 -1.8983E-06 -3.0282E-06  0.0000E+00 -8.3394E-02 -1.0613E-02  6.7000E-02  0.0000E+00  9.5659E-02 -2.3867E-02
                -1.5137E-01  0.0000E+00
 SE:             5.3435E-05  5.4063E-06  3.5235E-06  0.0000E+00  7.0857E-02  8.0972E-02  1.0009E-01  0.0000E+00  6.0632E-02  7.0884E-02
                 6.3188E-02  0.0000E+00
 N:                      28          28          28          28          28          28          28          28          28          28
                         28          28

 P VAL.:         9.0153E-01  7.2549E-01  3.9010E-01  1.0000E+00  2.3922E-01  8.9572E-01  5.0324E-01  1.0000E+00  1.1464E-01  7.3634E-01
                 1.6596E-02  1.0000E+00

 ETAshrink(%):   9.6763E+01  9.9079E+01  9.9614E+01  1.0000E+02  3.5317E-01  1.0000E-10  3.4390E+01  1.0000E+02  1.4732E+01  1.0375E+01
                 5.8580E+01  1.0000E+02
 EBVshrink(%):   9.6862E+01  9.9002E+01  9.9525E+01  1.0000E+02  6.1713E+00  3.6512E+00  4.2272E+01  1.0000E+02  3.8883E+00  5.3316E+00
                 4.5766E+01  1.0000E+02
 EPSshrink(%):   1.3707E+01

 #TERE:
 Elapsed estimation time in seconds:   204.38

 ********************               FIRST ORDER CONDITIONAL ESTIMATION WITH INTERACTION              ********************
 #OBJT:**************                       MINIMUM VALUE OF OBJECTIVE FUNCTION                      ********************
 #OBJV:********************************************      916.535       **************************************************

 ********************               FIRST ORDER CONDITIONAL ESTIMATION WITH INTERACTION              ********************
 ********************                             FINAL PARAMETER ESTIMATE                           ********************

 THETA - VECTOR OF FIXED EFFECTS PARAMETERS   *********
         TH 1      TH 2      TH 3      TH 4      TH 5      TH 6      TH 7      TH 8
         1.09E-01  8.45E+00  1.16E+00  9.62E-01  1.08E-01  4.20E-01  7.50E-01  1.00E+00

 OMEGA - COV MATRIX FOR RANDOM EFFECTS - ETAS  ********
            ETA1      ETA2      ETA3      ETA4      ETA5      ETA6      ETA7      ETA8      ETA9      ET10      ET11      ET12
 ETA1
+        7.91E-05
 ETA2
+        0.00E+00  1.00E-05
 ETA3
+        0.00E+00  0.00E+00  2.43E-05
 ETA4
+        0.00E+00  0.00E+00  0.00E+00  1.00E-01
 ETA5
+        0.00E+00  0.00E+00  0.00E+00  0.00E+00  1.47E-01
 ETA6
+        0.00E+00  0.00E+00  0.00E+00  0.00E+00  0.00E+00  1.82E-01
 ETA7
+        0.00E+00  0.00E+00  0.00E+00  0.00E+00  0.00E+00  0.00E+00  6.76E-01
 ETA8
+        0.00E+00  0.00E+00  0.00E+00  0.00E+00  0.00E+00  0.00E+00  0.00E+00  1.00E-01
 ETA9
+        0.00E+00  0.00E+00  0.00E+00  0.00E+00  0.00E+00  0.00E+00  0.00E+00  0.00E+00  1.47E-01
 ET10
+        0.00E+00  0.00E+00  0.00E+00  0.00E+00  0.00E+00  0.00E+00  0.00E+00  0.00E+00  0.00E+00  1.82E-01
 ET11
+        0.00E+00  0.00E+00  0.00E+00  0.00E+00  0.00E+00  0.00E+00  0.00E+00  0.00E+00  0.00E+00  0.00E+00  6.76E-01
 ET12
+        0.00E+00  0.00E+00  0.00E+00  0.00E+00  0.00E+00  0.00E+00  0.00E+00  0.00E+00  0.00E+00  0.00E+00  0.00E+00  1.00E-01

 SIGMA - COV MATRIX FOR RANDOM EFFECTS - EPSILONS  ****
            EPS1
 EPS1
+        1.00E+00

 OMEGA - CORR MATRIX FOR RANDOM EFFECTS - ETAS  *******
            ETA1      ETA2      ETA3      ETA4      ETA5      ETA6      ETA7      ETA8      ETA9      ET10      ET11      ET12
 ETA1
+        8.90E-03
 ETA2
+        0.00E+00  3.16E-03
 ETA3
+        0.00E+00  0.00E+00  4.92E-03
 ETA4
+        0.00E+00  0.00E+00  0.00E+00  3.16E-01
 ETA5
+        0.00E+00  0.00E+00  0.00E+00  0.00E+00  3.83E-01
 ETA6
+        0.00E+00  0.00E+00  0.00E+00  0.00E+00  0.00E+00  4.26E-01
 ETA7
+        0.00E+00  0.00E+00  0.00E+00  0.00E+00  0.00E+00  0.00E+00  8.22E-01
 ETA8
+        0.00E+00  0.00E+00  0.00E+00  0.00E+00  0.00E+00  0.00E+00  0.00E+00  3.16E-01
 ETA9
+        0.00E+00  0.00E+00  0.00E+00  0.00E+00  0.00E+00  0.00E+00  0.00E+00  0.00E+00  3.83E-01
 ET10
+        0.00E+00  0.00E+00  0.00E+00  0.00E+00  0.00E+00  0.00E+00  0.00E+00  0.00E+00  0.00E+00  4.26E-01
 ET11
+        0.00E+00  0.00E+00  0.00E+00  0.00E+00  0.00E+00  0.00E+00  0.00E+00  0.00E+00  0.00E+00  0.00E+00  8.22E-01
 ET12
+        0.00E+00  0.00E+00  0.00E+00  0.00E+00  0.00E+00  0.00E+00  0.00E+00  0.00E+00  0.00E+00  0.00E+00  0.00E+00  3.16E-01

 SIGMA - CORR MATRIX FOR RANDOM EFFECTS - EPSILONS  ***
            EPS1
 EPS1
+        1.00E+00
 #CPUT: Total CPU Time in Seconds,      205.108
