10/02/2015
10:48
; Script generated by the pharmML2Nmtran Converter v.1.0.0
; Source	: PharmML 0.3.1
; Target	: NMTRAN 7.2.0
; Model 	: DelBene_2009_oncology_in_vitro_EPS_in_OBS
; Dated 	: Tue Feb 10 10:48:34 GMT 2015

$PROBLEM "DelBene_2009_oncology_in_vitro_EPS_in_OBS - generated by MDL2PharmML v.6.0"

$INPUT ID TIME DV CONC EVID
$DATA delbene2009_data.csv IGNORE=@
$SUBS ADVAN13 TOL=9

$MODEL
COMP (NP)
COMP (N1)
COMP (N2)
COMP (N3)

$PK
LAMBDA0 = THETA(1)
K1 = THETA(2)
K2 = THETA(3)
N0 = THETA(4)
CV = THETA(5)

A_0(1) = N0
A_0(2) = 0
A_0(3) = 0
A_0(4) = 0

$DES
NP = A(1)
N1 = A(2)
N2 = A(3)
N3 = A(4)

NT_DES =  (((NP+N1)+N2)+N3)
DADT(1) = ((LAMBDA0*NP)-((K2*CONC)*NP))
DADT(2) = (((K2*CONC)*NP)-(K1*N1))
DADT(3) = ((K1*N1)-(K1*N2))
DADT(4) = ((K1*N2)-(K1*N3))

$ERROR
NT =  (((A(1)+A(2))+A(3))+A(4))

IPRED = NT
W = CV*IPRED
Y = IPRED+W*EPS(1)
IRES = DV - IPRED
IWRES = IRES/W

$THETA
( 0.0 , 0.1 )	;LAMBDA0
( 0.0 , 0.1 )	;K1
( 0.0 , 0.1 )	;K2
( 0.0 , 1000.0 )	;N0
( 0.0 , 0.1 )	;CV

$OMEGA 0 FIX

$SIGMA
1.0 FIX	;SIGMA_RES_W

$EST METHOD=COND MAXEVALS=9999 PRINT=10 NOABORT
$COV

$TABLE ID TIME CONC EVID PRED IPRED RES IRES WRES IWRES Y DV NOAPPEND NOPRINT FILE=sdtab

$TABLE ID NOAPPEND NOPRINT FILE=patab

$TABLE ID CONC NOAPPEND NOPRINT FILE=cotab

NM-TRAN MESSAGES
 WARNINGS AND ERRORS (IF ANY) FOR PROBLEM    1
 (WARNING  2) NM-TRAN INFERS THAT THE DATA ARE POPULATION.
 (WARNING  46) ETA VARIABLES ARE NOT USED, BUT DATA ARE POPULATION TYPE.

1NONLINEAR MIXED EFFECTS MODEL PROGRAM (NONMEM) VERSION 7.2.0
 ORIGINALLY DEVELOPED BY STUART BEAL, LEWIS SHEINER, AND ALISON BOECKMANN
 CURRENT DEVELOPERS ARE ROBERT BAUER, ICON DEVELOPMENT SOLUTIONS,
 AND ALISON BOECKMANN. IMPLEMENTATION, EFFICIENCY, AND STANDARDIZATION
 PERFORMED BY NOUS INFOSYSTEMS.
 PROBLEM NO.:         1
 "DelBene_2009_oncology_in_vitro_EPS_in_OBS - generated by MDL2PharmML v.
 TOT. NO. OF OBS RECS:       48
 TOT. NO. OF INDIVIDUALS:      8
 GENERAL NONLINEAR KINETICS MODEL USING LSODA (ADVAN13)
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 #TBLN:      1
 #METH: First Order Conditional Estimation
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
 #TERM:
0MINIMIZATION SUCCESSFUL
 NO. OF FUNCTION EVALUATIONS USED:      257
 NO. OF SIG. DIGITS IN FINAL EST.:  3.6

 ETABAR IS THE ARITHMETIC MEAN OF THE ETA-ESTIMATES,
 AND THE P-VALUE IS GIVEN FOR THE NULL HYPOTHESIS THAT THE TRUE MEAN IS 0.

 ETABAR:         0.0000E+00
 SE:             0.0000E+00

 P VAL.:         1.0000E+00

 ETAshrink(%):   1.0000E+02
 EPSshrink(%):  -2.0547E+02

 #TERE:
 Elapsed estimation time in seconds:     0.45
 Elapsed covariance time in seconds:     0.11

 ********************                        FIRST ORDER CONDITIONAL ESTIMATION                      ********************
 #OBJT:**************                       MINIMUM VALUE OF OBJECTIVE FUNCTION                      ********************
 #OBJV:********************************************      592.613       **************************************************

 ********************                        FIRST ORDER CONDITIONAL ESTIMATION                      ********************
 ********************                             FINAL PARAMETER ESTIMATE                           ********************

 THETA - VECTOR OF FIXED EFFECTS PARAMETERS   *********
         TH 1      TH 2      TH 3      TH 4      TH 5
         2.89E-02  7.37E-02  8.20E-02  2.15E+03  1.09E-01

 OMEGA - COV MATRIX FOR RANDOM EFFECTS - ETAS  ********
            ETA1
 ETA1
+        0.00E+00

 SIGMA - COV MATRIX FOR RANDOM EFFECTS - EPSILONS  ****
            EPS1
 EPS1
+        1.00E+00

 OMEGA - CORR MATRIX FOR RANDOM EFFECTS - ETAS  *******
            ETA1
 ETA1
+        0.00E+00

 SIGMA - CORR MATRIX FOR RANDOM EFFECTS - EPSILONS  ***
            EPS1
 EPS1
+        1.00E+00

 ********************                        FIRST ORDER CONDITIONAL ESTIMATION                      ********************
 ********************                            STANDARD ERROR OF ESTIMATE                          ********************

 THETA - VECTOR OF FIXED EFFECTS PARAMETERS   *********
         TH 1      TH 2      TH 3      TH 4      TH 5
         4.29E-04  6.32E-04  2.31E-03  3.74E+01  1.28E-02

 OMEGA - COV MATRIX FOR RANDOM EFFECTS - ETAS  ********
            ETA1
 ETA1
+       .........

 SIGMA - COV MATRIX FOR RANDOM EFFECTS - EPSILONS  ****
            EPS1
 EPS1
+       .........

 OMEGA - CORR MATRIX FOR RANDOM EFFECTS - ETAS  *******
            ETA1
 ETA1
+       .........

 SIGMA - CORR MATRIX FOR RANDOM EFFECTS - EPSILONS  ***
            EPS1
 EPS1
+       .........

 ********************                        FIRST ORDER CONDITIONAL ESTIMATION                      ********************
 ********************                          COVARIANCE MATRIX OF ESTIMATE                         ********************

            TH 1      TH 2      TH 3      TH 4      TH 5      OM11      SG11
 TH 1
+        1.84E-07
 TH 2
+       -1.24E-07  3.99E-07
 TH 3
+        4.67E-07 -2.31E-07  5.33E-06
 TH 4
+       -5.65E-03  1.53E-02  4.32E-02  1.40E+03
 TH 5
+        2.88E-06  2.21E-06 -6.14E-06 -1.42E-01  1.65E-04
 OM11
+       ......... ......... ......... ......... ......... .........
 SG11
+       ......... ......... ......... ......... ......... ......... .........

 ********************                        FIRST ORDER CONDITIONAL ESTIMATION                      ********************
 ********************                          CORRELATION MATRIX OF ESTIMATE                        ********************

            TH 1      TH 2      TH 3      TH 4      TH 5      OM11      SG11
 TH 1
+        4.29E-04
 TH 2
+       -4.58E-01  6.32E-04
 TH 3
+        4.72E-01 -1.58E-01  2.31E-03
 TH 4
+       -3.53E-01  6.48E-01  5.01E-01  3.74E+01
 TH 5
+        5.24E-01  2.73E-01 -2.07E-01 -2.96E-01  1.28E-02
 OM11
+       ......... ......... ......... ......... ......... .........
 SG11
+       ......... ......... ......... ......... ......... ......... .........
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