09/02/2015
10:49
; Script generated by the pharmML2Nmtran Converter v.1.0.0
; Source	: PharmML 0.3.1
; Target	: NMTRAN 7.2.0
; Model 	: Nock_2013_Carboplatin_PK_MONOLIX
; Dated 	: Mon Feb 09 10:49:11 GMT 2015

$PROBLEM "Nock_2013_Carboplatin_PK_MONOLIX - generated by MDL2PharmML v.6.0"

$INPUT ID TIME TALD AMT DUR RATE DV EVID DOSE AGE HGT KG BSA CLCR CREA TRT LOGTCLCR LOGTKG
$DATA Carbo_DDMoRe_log2.csv IGNORE=#
$SUBS ADVAN13 TOL=9

$MODEL
COMP (AC)
COMP (AP)

$PK
THCL = THETA(1)
THV1 = THETA(2)
THQ = THETA(3)
THV2 = THETA(4)
SDADD = THETA(5)
SDPROP = THETA(6)
CLCLCR_COV = THETA(7)
V1KG_COV = THETA(8)

eta_OMCL = ETA(1)
eta_OMV1 = ETA(2)

MU_1 = LOG(THCL)+CLCLCR_COV * logtCLCR;
CL = EXP(MU_1 + ETA(1));

MU_2 = LOG(THV1)+V1KG_COV * logtKG;
V1 = EXP(MU_2 + ETA(2));

Q =  THQ ;

V2 =  THV2 ;

A_0(1) = 0
A_0(2) = 0

$DES
AC = A(1)
AP = A(2)

IPRED_DES =  (AC/V1)
DADT(1) = (((-((Q/V1))*AC)-((CL/V1)*AC))+((Q/V2)*AP))
DADT(2) = (((Q/V1)*AC)-((Q/V2)*AP))

$ERROR
IPRED =  (A(1)/V1)

IPRED = IPRED
W = SQRT((SDADD*SDADD)+ (SDPROP*SDPROP*IPRED*IPRED))
Y = IPRED+W*EPS(1)
IRES = DV - IPRED
IWRES = IRES/W

$THETA
( 0.0 , 8.3 )	;THCL
( 0.0 , 22.0 )	;THV1
( 0.0 , 0.76 )	;THQ
( 0.0 , 31.0 )	;THV2
( 0.0 , 0.015 )	;SDADD
( 0.0 , 0.2 )	;SDPROP
( -10.0 , 0.69 , 10.0 )	;CLCLCR_COV
( -10.0 , 0.69 , 10.0 )	;V1KG_COV

$OMEGA
( 0.019 )	;OMCL
( 0.0  FIX )	;OMV1

$SIGMA
1.0 FIX	;SIGMA

$EST METHOD=COND INTER MAXEVALS=9999 PRINT=10 NOABORT
$COV

$TABLE ID TIME TALD AMT DUR RATE EVID DOSE AGE HGT KG BSA CLCR CREA TRT LOGTCLCR LOGTKG PRED IPRED RES IRES WRES IWRES Y DV NOAPPEND NOPRINT FILE=sdtab

$TABLE ID CL V1 Q V2 ETA_OMCL ETA_OMV1 NOAPPEND NOPRINT FILE=patab

$TABLE ID AGE HGT KG BSA CLCR CREA LOGTCLCR LOGTKG NOAPPEND NOPRINT FILE=cotab

NM-TRAN MESSAGES
 WARNINGS AND ERRORS (IF ANY) FOR PROBLEM    1
 (WARNING  2) NM-TRAN INFERS THAT THE DATA ARE POPULATION.
 (MU_WARNING 26) DATA ITEM(S) USED IN DEFINITION OF MU_(S) SHOULD BE CONSTANT FOR INDIV. REC.:
  LOGTCLCR LOGTKG

1NONLINEAR MIXED EFFECTS MODEL PROGRAM (NONMEM) VERSION 7.2.0
 ORIGINALLY DEVELOPED BY STUART BEAL, LEWIS SHEINER, AND ALISON BOECKMANN
 CURRENT DEVELOPERS ARE ROBERT BAUER, ICON DEVELOPMENT SOLUTIONS,
 AND ALISON BOECKMANN. IMPLEMENTATION, EFFICIENCY, AND STANDARDIZATION
 PERFORMED BY NOUS INFOSYSTEMS.
 PROBLEM NO.:         1
 "Nock_2013_Carboplatin_PK_MONOLIX - generated by MDL2PharmML v.6.0"
 TOT. NO. OF OBS RECS:      389
 TOT. NO. OF INDIVIDUALS:     19
 GENERAL NONLINEAR KINETICS MODEL USING LSODA (ADVAN13)
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 #TBLN:      1
 #METH: First Order Conditional Estimation with Interaction
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
 #TERM:
0MINIMIZATION SUCCESSFUL
 NO. OF FUNCTION EVALUATIONS USED:      246
 NO. OF SIG. DIGITS IN FINAL EST.:  3.9

 ETABAR IS THE ARITHMETIC MEAN OF THE ETA-ESTIMATES,
 AND THE P-VALUE IS GIVEN FOR THE NULL HYPOTHESIS THAT THE TRUE MEAN IS 0.

 ETABAR:         2.7334E-05  0.0000E+00
 SE:             3.1015E-02  0.0000E+00

 P VAL.:         9.9930E-01  1.0000E+00

 ETAshrink(%):  -1.2975E+00  1.0000E+02
 EPSshrink(%):   2.2493E+00

 #TERE:
 Elapsed estimation time in seconds:    19.04
 Elapsed covariance time in seconds:    33.09

 ********************               FIRST ORDER CONDITIONAL ESTIMATION WITH INTERACTION              ********************
 #OBJT:**************                       MINIMUM VALUE OF OBJECTIVE FUNCTION                      ********************
 #OBJV:********************************************     -879.261       **************************************************

 ********************               FIRST ORDER CONDITIONAL ESTIMATION WITH INTERACTION              ********************
 ********************                             FINAL PARAMETER ESTIMATE                           ********************

 THETA - VECTOR OF FIXED EFFECTS PARAMETERS   *********
         TH 1      TH 2      TH 3      TH 4      TH 5      TH 6      TH 7      TH 8
         6.80E+00  2.14E+01  7.02E-01  2.90E+01  1.24E-02  1.92E-01  1.38E+00  9.92E-01

 OMEGA - COV MATRIX FOR RANDOM EFFECTS - ETAS  ********
            ETA1      ETA2
 ETA1
+        1.88E-02
 ETA2
+        0.00E+00  0.00E+00

 SIGMA - COV MATRIX FOR RANDOM EFFECTS - EPSILONS  ****
            EPS1
 EPS1
+        1.00E+00

 OMEGA - CORR MATRIX FOR RANDOM EFFECTS - ETAS  *******
            ETA1      ETA2
 ETA1
+        1.37E-01
 ETA2
+        0.00E+00  0.00E+00

 SIGMA - CORR MATRIX FOR RANDOM EFFECTS - EPSILONS  ***
            EPS1
 EPS1
+        1.00E+00

 ********************               FIRST ORDER CONDITIONAL ESTIMATION WITH INTERACTION              ********************
 ********************                            STANDARD ERROR OF ESTIMATE                          ********************

 THETA - VECTOR OF FIXED EFFECTS PARAMETERS   *********
         TH 1      TH 2      TH 3      TH 4      TH 5      TH 6      TH 7      TH 8
         2.18E-01  6.24E-01  3.87E-02  1.93E+00  2.11E-03  1.30E-02  2.51E-01  3.82E-01

 OMEGA - COV MATRIX FOR RANDOM EFFECTS - ETAS  ********
            ETA1      ETA2
 ETA1
+        6.06E-03
 ETA2
+       ......... .........

 SIGMA - COV MATRIX FOR RANDOM EFFECTS - EPSILONS  ****
            EPS1
 EPS1
+       .........

 OMEGA - CORR MATRIX FOR RANDOM EFFECTS - ETAS  *******
            ETA1      ETA2
 ETA1
+        2.21E-02
 ETA2
+       ......... .........

 SIGMA - CORR MATRIX FOR RANDOM EFFECTS - EPSILONS  ***
            EPS1
 EPS1
+       .........

 ********************               FIRST ORDER CONDITIONAL ESTIMATION WITH INTERACTION              ********************
 ********************                          COVARIANCE MATRIX OF ESTIMATE                         ********************

            TH 1      TH 2      TH 3      TH 4      TH 5      TH 6      TH 7      TH 8      OM11      OM12      OM22      SG11
 TH 1
+        4.76E-02
 TH 2
+        3.42E-02  3.90E-01
 TH 3
+        1.47E-03  1.32E-02  1.50E-03
 TH 4
+        2.97E-02  7.06E-01  5.49E-02  3.72E+00
 TH 5
+       -5.39E-05  2.08E-05  3.60E-05  6.46E-04  4.45E-06
 TH 6
+        7.12E-04  1.27E-03 -6.47E-05  2.74E-03 -1.26E-05  1.68E-04
 TH 7
+       -6.62E-03 -1.30E-02  2.74E-03 -1.60E-02  1.77E-04 -9.30E-04  6.29E-02
 TH 8
+       -6.94E-03  6.36E-02 -1.21E-03  1.19E-01  1.57E-04  1.24E-03 -1.97E-02  1.46E-01
 OM11
+        2.98E-04  8.38E-04 -6.12E-05  1.57E-04 -7.46E-06  1.63E-05 -1.06E-03 -1.03E-04  3.67E-05
 OM12
+       ......... ......... ......... ......... ......... ......... ......... ......... ......... .........
 OM22
+       ......... ......... ......... ......... ......... ......... ......... ......... ......... ......... .........
 SG11
+       ......... ......... ......... ......... ......... ......... ......... ......... ......... ......... ......... .........

 ********************               FIRST ORDER CONDITIONAL ESTIMATION WITH INTERACTION              ********************
 ********************                          CORRELATION MATRIX OF ESTIMATE                        ********************

            TH 1      TH 2      TH 3      TH 4      TH 5      TH 6      TH 7      TH 8      OM11      OM12      OM22      SG11
 TH 1
+        2.18E-01
 TH 2
+        2.51E-01  6.24E-01
 TH 3
+        1.74E-01  5.44E-01  3.87E-02
 TH 4
+        7.05E-02  5.86E-01  7.35E-01  1.93E+00
 TH 5
+       -1.17E-01  1.58E-02  4.41E-01  1.59E-01  2.11E-03
 TH 6
+        2.52E-01  1.56E-01 -1.29E-01  1.10E-01 -4.60E-01  1.30E-02
 TH 7
+       -1.21E-01 -8.28E-02  2.82E-01 -3.30E-02  3.34E-01 -2.86E-01  2.51E-01
 TH 8
+       -8.32E-02  2.67E-01 -8.16E-02  1.62E-01  1.95E-01  2.51E-01 -2.06E-01  3.82E-01
 OM11
+        2.25E-01  2.21E-01 -2.61E-01  1.34E-02 -5.83E-01  2.08E-01 -6.96E-01 -4.44E-02  6.06E-03
 OM12
+       ......... ......... ......... ......... ......... ......... ......... ......... ......... .........
 OM22
+       ......... ......... ......... ......... ......... ......... ......... ......... ......... ......... .........
 SG11
+       ......... ......... ......... ......... ......... ......... ......... ......... ......... ......... ......... .........
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