10/02/2015
11:36
; Script generated by the pharmML2Nmtran Converter v.1.0.0
; Source	: PharmML 0.3.1
; Target	: NMTRAN 7.2.0
; Model 	: Simeoni_2004_oncology_TGI_ETA
; Dated 	: Tue Feb 10 11:36:49 GMT 2015

$PROBLEM "Simeoni_2004_oncology_TGI_ETA - generated by MDL2PharmML v.6.0"

$INPUT ID TIME DV AMT EVID CMT
$DATA simeoni2004_data.csv IGNORE=@
$SUBS ADVAN13 TOL=9

$MODEL
COMP (Q1)
COMP (Q2)
COMP (X1)
COMP (X2)
COMP (X3)
COMP (X4)

$PK
POP_LAMBDA0 = THETA(1)
LAMBDA1 = THETA(2)
K1 = THETA(3)
K2 = THETA(4)
W0 = THETA(5)
CV = THETA(6)

eta_OMEGA_LAMBDA0 = ETA(1)

K10 =  (0.868*24) ;

K12 =  (0.0060*24) ;

K21 =  (0.0838*24) ;

V1 =  0.81 ;

PSI =  20 ;

MU_1 = LOG(POP_LAMBDA0);
LAMBDA0 = EXP(MU_1 + ETA(1));

A_0(1) = 0
A_0(2) = 0
A_0(3) = W0
A_0(4) = 0
A_0(5) = 0
A_0(6) = 0

$DES
Q1 = A(1)
Q2 = A(2)
X1 = A(3)
X2 = A(4)
X3 = A(5)
X4 = A(6)

C =  (Q1/V1)
WTOT_DES =  (((X1+X2)+X3)+X4)
DADT(1) = ((K21*Q2)-((K10+K12)*Q1))
DADT(2) = ((K12*Q1)-(K21*Q2))
DADT(3) = (((LAMBDA0*X1)/((1+(((WTOT_DES*LAMBDA0)/LAMBDA1)**PSI))**(1/PSI)))-((K2*C)*X1))
DADT(4) = (((K2*C)*X1)-(K1*X2))
DADT(5) = ((K1*X2)-(K1*X3))
DADT(6) = ((K1*X3)-(K1*X4))

$ERROR
WTOT =  (((A(3)+A(4))+A(5))+A(6))

IPRED = WTOT
W = CV*IPRED
Y = IPRED+W*EPS(1)
IRES = DV - IPRED
IWRES = IRES/W

$THETA
( 0.0 , 0.3 )	;POP_LAMBDA0
( 0.0 , 0.3 )	;LAMBDA1
( 0.0 , 0.3 )	;K1
( 0.0 , 0.5 )	;K2
( 0.0 , 0.02 )	;W0
( 0.0 , 0.1 )	;CV

$OMEGA
( 0.0  FIX )	;OMEGA_LAMBDA0

$SIGMA
1.0 FIX	;SIGMA_RES_W

$EST METHOD=COND MAXEVALS=9999 PRINT=10 NOABORT
$COV

$TABLE ID TIME AMT EVID CMT PRED IPRED RES IRES WRES IWRES Y DV NOAPPEND NOPRINT FILE=sdtab

$TABLE ID K10 K12 K21 V1 PSI LAMBDA0 ETA_OMEGA_LAMBDA0 NOAPPEND NOPRINT FILE=patab

NM-TRAN MESSAGES
 WARNINGS AND ERRORS (IF ANY) FOR PROBLEM    1
 (WARNING  2) NM-TRAN INFERS THAT THE DATA ARE POPULATION.

1NONLINEAR MIXED EFFECTS MODEL PROGRAM (NONMEM) VERSION 7.2.0
 ORIGINALLY DEVELOPED BY STUART BEAL, LEWIS SHEINER, AND ALISON BOECKMANN
 CURRENT DEVELOPERS ARE ROBERT BAUER, ICON DEVELOPMENT SOLUTIONS,
 AND ALISON BOECKMANN. IMPLEMENTATION, EFFICIENCY, AND STANDARDIZATION
 PERFORMED BY NOUS INFOSYSTEMS.
 PROBLEM NO.:         1
 "Simeoni_2004_oncology_TGI_ETA - generated by MDL2PharmML v.6.0"
 TOT. NO. OF OBS RECS:       17
 TOT. NO. OF INDIVIDUALS:      2
 GENERAL NONLINEAR KINETICS MODEL USING LSODA (ADVAN13)
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 #TBLN:      1
 #METH: First Order Conditional Estimation
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
 #TERM:
0MINIMIZATION SUCCESSFUL
 NO. OF FUNCTION EVALUATIONS USED:      342
 NO. OF SIG. DIGITS IN FINAL EST.:  3.1

 ETABAR IS THE ARITHMETIC MEAN OF THE ETA-ESTIMATES,
 AND THE P-VALUE IS GIVEN FOR THE NULL HYPOTHESIS THAT THE TRUE MEAN IS 0.

 ETABAR:         0.0000E+00
 SE:             0.0000E+00

 P VAL.:         1.0000E+00

 ETAshrink(%):   1.0000E+02
 EPSshrink(%):  -6.1810E+02

 #TERE:
 Elapsed estimation time in seconds:     1.55
0S MATRIX ALGORITHMICALLY SINGULAR
0S MATRIX IS OUTPUT
0INVERSE COVARIANCE MATRIX SET TO RS*RMAT, WHERE S* IS A PSEUDO INVERSE OF S
 Elapsed covariance time in seconds:     0.38

 ********************                        FIRST ORDER CONDITIONAL ESTIMATION                      ********************
 #OBJT:**************                       MINIMUM VALUE OF OBJECTIVE FUNCTION                      ********************
 #OBJV:********************************************      -39.408       **************************************************

 ********************                        FIRST ORDER CONDITIONAL ESTIMATION                      ********************
 ********************                             FINAL PARAMETER ESTIMATE                           ********************

 THETA - VECTOR OF FIXED EFFECTS PARAMETERS   *********
         TH 1      TH 2      TH 3      TH 4      TH 5      TH 6
         2.99E-01  7.74E-01  7.87E-01  7.15E-01  4.22E-02  1.00E-01

 OMEGA - COV MATRIX FOR RANDOM EFFECTS - ETAS  ********
            ETA1
 ETA1
+        0.00E+00

 SIGMA - COV MATRIX FOR RANDOM EFFECTS - EPSILONS  ****
            EPS1
 EPS1
+        1.00E+00

 OMEGA - CORR MATRIX FOR RANDOM EFFECTS - ETAS  *******
            ETA1
 ETA1
+        0.00E+00

 SIGMA - CORR MATRIX FOR RANDOM EFFECTS - EPSILONS  ***
            EPS1
 EPS1
+        1.00E+00

 ********************                        FIRST ORDER CONDITIONAL ESTIMATION                      ********************
 ********************                            STANDARD ERROR OF ESTIMATE                          ********************

 THETA - VECTOR OF FIXED EFFECTS PARAMETERS   *********
         TH 1      TH 2      TH 3      TH 4      TH 5      TH 6
         1.77E-02  2.00E-02  1.33E-01  4.72E-02  8.84E-03  1.29E-02

 OMEGA - COV MATRIX FOR RANDOM EFFECTS - ETAS  ********
            ETA1
 ETA1
+       .........

 SIGMA - COV MATRIX FOR RANDOM EFFECTS - EPSILONS  ****
            EPS1
 EPS1
+       .........

 OMEGA - CORR MATRIX FOR RANDOM EFFECTS - ETAS  *******
            ETA1
 ETA1
+       .........

 SIGMA - CORR MATRIX FOR RANDOM EFFECTS - EPSILONS  ***
            EPS1
 EPS1
+       .........

 ********************                        FIRST ORDER CONDITIONAL ESTIMATION                      ********************
 ********************                          COVARIANCE MATRIX OF ESTIMATE                         ********************

            TH 1      TH 2      TH 3      TH 4      TH 5      TH 6      OM11      SG11
 TH 1
+        3.14E-04
 TH 2
+        3.55E-04  4.00E-04
 TH 3
+       -2.36E-03 -2.66E-03  1.77E-02
 TH 4
+        8.37E-04  9.45E-04 -6.28E-03  2.23E-03
 TH 5
+       -1.57E-04 -1.77E-04  1.18E-03 -4.17E-04  7.82E-05
 TH 6
+       -2.29E-04 -2.59E-04  1.72E-03 -6.11E-04  1.14E-04  1.68E-04
 OM11
+       ......... ......... ......... ......... ......... ......... .........
 SG11
+       ......... ......... ......... ......... ......... ......... ......... .........

 ********************                        FIRST ORDER CONDITIONAL ESTIMATION                      ********************
 ********************                          CORRELATION MATRIX OF ESTIMATE                        ********************

            TH 1      TH 2      TH 3      TH 4      TH 5      TH 6      OM11      SG11
 TH 1
+        1.77E-02
 TH 2
+        1.00E+00  2.00E-02
 TH 3
+       -1.00E+00 -1.00E+00  1.33E-01
 TH 4
+        1.00E+00  1.00E+00 -1.00E+00  4.72E-02
 TH 5
+       -1.00E+00 -1.00E+00  1.00E+00 -1.00E+00  8.84E-03
 TH 6
+       -1.00E+00 -1.00E+00  1.00E+00 -1.00E+00  1.00E+00  1.29E-02
 OM11
+       ......... ......... ......... ......... ......... ......... .........
 SG11
+       ......... ......... ......... ......... ......... ......... ......... .........
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