Tue Jul 29 10:46:07 CEST 2014
$PROBLEM    PHENOBARB SIMPLE MODEL
$INPUT      ID TIME AMT WGT APGR DV
$DATA      /home/kajsa/kod-psn/PsN4/test/test_files/pheno5.dta
            IGNORE=@
$SUBROUTINE ADVAN1 TRANS2
$PK

      TVCL=THETA(1)
      TVV=THETA(2)
      CL=TVCL*EXP(ETA(1))
      V=TVV*EXP(ETA(2))
      S1=V
$ERROR

      W=F
      Y=F+W*EPS(1)

      IPRED=F         ;  individual-specific prediction
      IRES=DV-IPRED   ;  individual-specific residual
      IWRES=IRES/W    ;  individual-specific weighted residual

$THETA  (0,0.00477584) ; CL
$THETA  (0,1.4176) ; V
$OMEGA  0.182661  ;       IVCL
 0.0825286  ;        IVV
$SIGMA  0.00738437
$ESTIMATION POSTHOC MAXEVALS=0
$TABLE      ID MDV DV ONEHEADER NOPRINT FILE=npctab.dta

NM-TRAN MESSAGES
 WARNINGS AND ERRORS (IF ANY) FOR PROBLEM    1
 (WARNING  2) NM-TRAN INFERS THAT THE DATA ARE POPULATION.

1NONLINEAR MIXED EFFECTS MODEL PROGRAM (NONMEM) VERSION 7.3.0
 ORIGINALLY DEVELOPED BY STUART BEAL, LEWIS SHEINER, AND ALISON BOECKMANN
 CURRENT DEVELOPERS ARE ROBERT BAUER, ICON DEVELOPMENT SOLUTIONS,
 AND ALISON BOECKMANN. IMPLEMENTATION, EFFICIENCY, AND STANDARDIZATION
 PERFORMED BY NOUS INFOSYSTEMS.
 PROBLEM NO.:         1
 PHENOBARB SIMPLE MODEL
 TOT. NO. OF OBS RECS:       14
 TOT. NO. OF INDIVIDUALS:      5
 ONE COMPARTMENT MODEL (ADVAN1)
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 #TBLN:      1
 #METH: First Order (Evaluation)
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
 ********************                             FIRST ORDER (EVALUATION)                           ********************
 #OBJT:**************                       MINIMUM VALUE OF OBJECTIVE FUNCTION                      ********************
 #OBJV:********************************************       51.681       **************************************************

 ********************                             FIRST ORDER (EVALUATION)                           ********************
 ********************                             FINAL PARAMETER ESTIMATE                           ********************

 THETA - VECTOR OF FIXED EFFECTS PARAMETERS   *********
         TH 1      TH 2
         4.78E-03  1.42E+00

 OMEGA - COV MATRIX FOR RANDOM EFFECTS - ETAS  ********
            ETA1      ETA2
 ETA1
+        1.83E-01
 ETA2
+        0.00E+00  8.25E-02

 SIGMA - COV MATRIX FOR RANDOM EFFECTS - EPSILONS  ****
            EPS1
 EPS1
+        7.38E-03

 OMEGA - CORR MATRIX FOR RANDOM EFFECTS - ETAS  *******
            ETA1      ETA2
 ETA1
+        4.27E-01
 ETA2
+        0.00E+00  2.87E-01

 SIGMA - CORR MATRIX FOR RANDOM EFFECTS - EPSILONS  ***
            EPS1
 EPS1
+        8.59E-02
 #CPUT: Total CPU Time in Seconds,        0.019
