Tue May  5 14:15:14 CEST 2015
$PROBLEM    PHENOBARB SIMPLE MODEL
$INPUT      ID TIME AMT WGT APGR DV
$DATA      pheno.dta IGNORE=@ IGNORE(WGT.EQ.23)
$SUBROUTINE ADVAN1 TRANS2
$PK

    ETA_CL = ETA(1)
    ETA_V = ETA(2)

      TVCL=THETA(1)
      TVV=THETA(2)
      CL=TVCL*EXP(ETA(1))
      V=TVV*EXP(ETA(2))
      S1=V
$ERROR

      W=F
      Y=F+W*EPS(1)

      IPRED=F         ;  individual-specific prediction
      IRES=DV-IPRED   ;  individual-specific residual
      IWRES=IRES/W    ;  individual-specific weighted residual

$THETA  (0,0.0105) ; TVCL
$THETA  (0,1.0500) ; TVV
$OMEGA  BLOCK(2) STANDARD CORRELATION
 .4  ;       IVCL
 0.01  ;  CORR_CL_V
 .25  ;        IVV
$SIGMA  .04
$ESTIMATION MAXEVALS=9997 SIGDIGITS=4 POSTHOC MSFO=phenomsf
$COVARIANCE PRINT=E
$TABLE      ID CL V ETA_CL ETA_V NOPRINT ONEHEADER NOAPPEND FILE=patab
$TABLE      ID TIME DV MDV PRED IPRED RES IRES WRES IWRES NOPRINT
            NOAPPEND FILE=sdtab

NM-TRAN MESSAGES
 WARNINGS AND ERRORS (IF ANY) FOR PROBLEM    1
 (WARNING  2) NM-TRAN INFERS THAT THE DATA ARE POPULATION.
Note: The following floating-point exceptions are signalling: IEEE_INVALID_FLAG IEEE_DIVIDE_BY_ZERO

1NONLINEAR MIXED EFFECTS MODEL PROGRAM (NONMEM) VERSION 7.3.0
 ORIGINALLY DEVELOPED BY STUART BEAL, LEWIS SHEINER, AND ALISON BOECKMANN
 CURRENT DEVELOPERS ARE ROBERT BAUER, ICON DEVELOPMENT SOLUTIONS,
 AND ALISON BOECKMANN. IMPLEMENTATION, EFFICIENCY, AND STANDARDIZATION
 PERFORMED BY NOUS INFOSYSTEMS.
 PROBLEM NO.:         1
 PHENOBARB SIMPLE MODEL
 TOT. NO. OF OBS RECS:      155
 TOT. NO. OF INDIVIDUALS:     59
 ONE COMPARTMENT MODEL (ADVAN1)
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 #TBLN:      1
 #METH: First Order
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
 #TERM:
0MINIMIZATION SUCCESSFUL
 NO. OF FUNCTION EVALUATIONS USED:      130
 NO. OF SIG. DIGITS IN FINAL EST.:  4.1

 #TERE:
 Elapsed estimation time in seconds:     0.10
 Elapsed covariance time in seconds:     0.03

 ********************                                   FIRST ORDER                                  ********************
 #OBJT:**************                       MINIMUM VALUE OF OBJECTIVE FUNCTION                      ********************
 #OBJV:********************************************      727.008       **************************************************

 ********************                                   FIRST ORDER                                  ********************
 ********************                             FINAL PARAMETER ESTIMATE                           ********************

 THETA - VECTOR OF FIXED EFFECTS PARAMETERS   *********
         TH 1      TH 2
         6.28E-03  1.30E+00

 OMEGA - COV MATRIX FOR RANDOM EFFECTS - ETAS  ********
            ETA1      ETA2
 ETA1
+        2.50E-01
 ETA2
+        1.32E-01  1.14E-01

 SIGMA - COV MATRIX FOR RANDOM EFFECTS - EPSILONS  ****
            EPS1
 EPS1
+        1.73E-02

 OMEGA - CORR MATRIX FOR RANDOM EFFECTS - ETAS  *******
            ETA1      ETA2
 ETA1
+        5.00E-01
 ETA2
+        7.82E-01  3.37E-01

 SIGMA - CORR MATRIX FOR RANDOM EFFECTS - EPSILONS  ***
            EPS1
 EPS1
+        1.31E-01

 ********************                                   FIRST ORDER                                  ********************
 ********************                            STANDARD ERROR OF ESTIMATE                          ********************

 THETA - VECTOR OF FIXED EFFECTS PARAMETERS   *********
         TH 1      TH 2
         4.19E-04  6.46E-02

 OMEGA - COV MATRIX FOR RANDOM EFFECTS - ETAS  ********
            ETA1      ETA2
 ETA1
+        1.61E-01
 ETA2
+        4.20E-02  2.76E-02

 SIGMA - COV MATRIX FOR RANDOM EFFECTS - EPSILONS  ****
            EPS1
 EPS1
+        3.94E-03

 OMEGA - CORR MATRIX FOR RANDOM EFFECTS - ETAS  *******
            ETA1      ETA2
 ETA1
+        1.61E-01
 ETA2
+        1.51E-01  4.09E-02

 SIGMA - CORR MATRIX FOR RANDOM EFFECTS - EPSILONS  ***
            EPS1
 EPS1
+        1.50E-02

 ********************                                   FIRST ORDER                                  ********************
 ********************                          COVARIANCE MATRIX OF ESTIMATE                         ********************

            TH 1      TH 2      OM11      OM12      OM22      SG11
 TH 1
+        1.76E-07
 TH 2
+        1.43E-05  4.17E-03
 OM11
+       -9.04E-07  2.57E-03  2.58E-02
 OM12
+        3.55E-06  1.49E-03  5.32E-03  1.77E-03
 OM22
+        3.80E-06  2.24E-04 -1.96E-04  2.64E-04  7.62E-04
 SG11
+        3.31E-07  3.04E-05  1.19E-04  2.95E-05 -1.65E-05  1.55E-05

 ********************                                   FIRST ORDER                                  ********************
 ********************                          CORRELATION MATRIX OF ESTIMATE                        ********************

            TH 1      TH 2      OM11      OM12      OM22      SG11
 TH 1
+        4.19E-04
 TH 2
+        5.28E-01  6.46E-02
 OM11
+       -1.34E-02  2.48E-01  1.61E-01
 OM12
+        2.01E-01  5.47E-01  7.88E-01  4.20E-02
 OM22
+        3.28E-01  1.26E-01 -4.43E-02  2.27E-01  2.76E-02
 SG11
+        2.01E-01  1.20E-01  1.88E-01  1.78E-01 -1.52E-01  3.94E-03
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
 ********************                                   FIRST ORDER                                  ********************
 ********************                      EIGENVALUES OF COR MATRIX OF ESTIMATE                     ********************

             1         2         3         4         5         6
         1.10E-01  3.57E-01  7.25E-01  1.08E+00  1.39E+00  2.35E+00
 #CPUT: Total CPU Time in Seconds,        0.187
