$PROB  DUMMY FOR TEST GENERATION
$INPUT      C6 C5 C4 C3 C2 C1 DV SEP1 SEP2 SEP3 SEP4 SEP5 ID1 ID2 ID3 ID4 ID5
$DATA       test_leading_separators.dta
$PRED BASE1=2*ETA(1)
IPRED=10+BASE1
ERR1=EPS(1)*(1+2*ETA(1))
Y=IPRED+ERR1
$OMEGA  0.631
$SIGMA  0.0792

$TABLE ID5 SEP5 DV  FORMAT=sF6.0 FILE=answer_leading_separators.dta NOPRINT NOAPPEND NOHEADER
