Tue Jun 14 14:07:36 CEST 2016
$PROBLEM    MOXONIDINE PK ANALYSIS
$INPUT      ID VISI DROP DGRP DOSE DROP DROP DROP DROP NEUY SCR AGE
            SEX DROP WT DROP ACE DIG DIU DROP TAD TIME DROP CRCL AMT
            SS II DROP DROP DROP DV DROP DROP MDV FREMTYPE
$DATA      ../../frem_dataset.dta IGNORE=@
$ABBREVIATED DERIV2=NO COMRES=6
$SUBROUTINE ADVAN2 TRANS1
$PK
;----------IOV--------------------

   KPLAG = 0

   TVCL  = THETA(1)
   TVV   = THETA(2)
   TVKA  = THETA(3)

   CL    = TVCL*EXP(ETA(1))
   V     = TVV*EXP(ETA(2))
   KA    = TVKA*EXP(ETA(3))
   LAG   = THETA(4)
   PHI   = LOG(LAG/(1-LAG))
   ALAG1 = EXP(PHI+KPLAG)/(1+EXP(PHI+KPLAG))
   K     = CL/V
   S2    = V

$ERROR

     IPRED = LOG(.025)
     W     = THETA(5)
     IF(F.GT.0) IPRED = LOG(F)
     IRES  = IPRED-DV
     IWRES = IRES/W
     Y     = IPRED+ERR(1)*W

;;;FREM CODE BEGIN
;;;DO NOT MODIFY
     IF (FREMTYPE.EQ.100) THEN
;       AGE
        Y = THETA(6) + ETA(4)*7.82226906804 + EPS(2)
        IPRED = THETA(6) + ETA(4)*7.82226906804
     END IF
     IF (FREMTYPE.EQ.200) THEN
;       SEX
        Y = THETA(7) + ETA(5)*0.404756978659 + EPS(2)
        IPRED = THETA(7) + ETA(5)*0.404756978659
     END IF
;;;FREM CODE END
$THETA  (0,32.8939)
 (0,21.0339)
 (0,0.283218)
$THETA  (0,0.0957656) ; LAG
$THETA  (0,0.334858) ; W
$THETA  65.1756756757 FIX ; TV_AGE
 1.2027027027 FIX ; TV_SEX
$OMEGA  BLOCK(5)
 0.4123
 0.664948 1.11316
 1E-07 1E-07 0.221903  ;         KA
 -0.0819163 -0.167456 0.0449267 0.986486  ;    BSV_AGE
 0.0898628 0.170926 0.0121642 -0.113683 0.986485  ;    BSV_SEX
$SIGMA  1  FIX
$SIGMA  1e-07  FIX  ;     EPSCOV
$ESTIMATION MAXEVALS=9990 PRINT=10 METHOD=CONDITIONAL
$COVARIANCE

NM-TRAN MESSAGES
 WARNINGS AND ERRORS (IF ANY) FOR PROBLEM    1
 (WARNING  2) NM-TRAN INFERS THAT THE DATA ARE POPULATION.

1NONLINEAR MIXED EFFECTS MODEL PROGRAM (NONMEM) VERSION 7.3.0
 ORIGINALLY DEVELOPED BY STUART BEAL, LEWIS SHEINER, AND ALISON BOECKMANN
 CURRENT DEVELOPERS ARE ROBERT BAUER, ICON DEVELOPMENT SOLUTIONS,
 AND ALISON BOECKMANN. IMPLEMENTATION, EFFICIENCY, AND STANDARDIZATION
 PERFORMED BY NOUS INFOSYSTEMS.
 PROBLEM NO.:         1
 MOXONIDINE PK ANALYSIS
 TOT. NO. OF OBS RECS:     1170
 TOT. NO. OF INDIVIDUALS:     74
 ONE COMPARTMENT MODEL WITH FIRST-ORDER ABSORPTION (ADVAN2)
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 #TBLN:      1
 #METH: First Order Conditional Estimation
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
 #TERM:
0MINIMIZATION SUCCESSFUL
 NO. OF FUNCTION EVALUATIONS USED:      259
 NO. OF SIG. DIGITS IN FINAL EST.:  3.1

 ETABAR IS THE ARITHMETIC MEAN OF THE ETA-ESTIMATES,
 AND THE P-VALUE IS GIVEN FOR THE NULL HYPOTHESIS THAT THE TRUE MEAN IS 0.

 ETABAR:         5.5247E-04  2.2985E-02  1.4202E-02 -6.6868E-12  3.3091E-09
 SE:             7.3740E-02  1.1497E-01  5.1258E-02  1.1546E-01  1.1546E-01
 N:                      74          74          74          74          74

 P VAL.:         9.9402E-01  8.4155E-01  7.8172E-01  1.0000E+00  1.0000E+00

 ETAshrink(%):   4.8996E-01  5.4964E+00  5.7310E+00  1.0000E-10  1.0000E-10
 EBVshrink(%):   1.1761E+00  5.1494E+00  5.0634E+00  8.2483E-08  3.0955E-05
 EPSshrink(%):   8.6802E+00  9.9943E+01

 #TERE:
 Elapsed estimation time in seconds:     4.82
0R MATRIX ALGORITHMICALLY NON-POSITIVE-SEMIDEFINITE
 BUT NONSINGULAR
0R MATRIX IS OUTPUT
0COVARIANCE STEP ABORTED
 Elapsed covariance time in seconds:     4.08

 ********************                        FIRST ORDER CONDITIONAL ESTIMATION                      ********************
 #OBJT:**************                       MINIMUM VALUE OF OBJECTIVE FUNCTION                      ********************
 #OBJV:********************************************     -332.897       **************************************************

 ********************                        FIRST ORDER CONDITIONAL ESTIMATION                      ********************
 ********************                             FINAL PARAMETER ESTIMATE                           ********************

 THETA - VECTOR OF FIXED EFFECTS PARAMETERS   *********
         TH 1      TH 2      TH 3      TH 4      TH 5      TH 6      TH 7
         3.29E+01  2.10E+01  2.83E-01  9.78E-02  3.35E-01  6.52E+01  1.20E+00

 OMEGA - COV MATRIX FOR RANDOM EFFECTS - ETAS  ********
            ETA1      ETA2      ETA3      ETA4      ETA5
 ETA1
+        4.12E-01
 ETA2
+        6.15E-01  1.11E+00
 ETA3
+        1.01E-07  1.75E-08  2.22E-01
 ETA4
+       -9.08E-02 -1.84E-01  5.04E-02  9.91E-01
 ETA5
+        8.69E-02  1.71E-01  6.61E-03 -1.15E-01  9.86E-01

 SIGMA - COV MATRIX FOR RANDOM EFFECTS - EPSILONS  ****
            EPS1      EPS2
 EPS1
+        1.00E+00
 EPS2
+        0.00E+00  1.00E-07

 OMEGA - CORR MATRIX FOR RANDOM EFFECTS - ETAS  *******
            ETA1      ETA2      ETA3      ETA4      ETA5
 ETA1
+        6.42E-01
 ETA2
+        9.10E-01  1.05E+00
 ETA3
+        3.33E-07  3.53E-08  4.71E-01
 ETA4
+       -1.42E-01 -1.76E-01  1.08E-01  9.95E-01
 ETA5
+        1.36E-01  1.64E-01  1.41E-02 -1.17E-01  9.93E-01

 SIGMA - CORR MATRIX FOR RANDOM EFFECTS - EPSILONS  ***
            EPS1      EPS2
 EPS1
+        1.00E+00
 EPS2
+        0.00E+00  3.16E-04
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 #CPUT: Total CPU Time in Seconds,        8.912
