Fri May 20 15:36:58 CEST 2016
;; 1. Based on: 1
$SIZES      PD=-58
$PROBLEM    PKPD joint FPG HBA1C 20070724
$INPUT      ID DV MDV OPRED D_EPS1 TIME AMT RATE CMT CLI VI DOSE AGE
            WGT SEX LBW CRCO EVID PRET ORIG D_ETA1 D_ETA2 D_ETA3
            D_ETA4 D_ETA5 D_ETA6 D_ETA7 D_ETA8 D_ETA9 OETA1 OETA2
            OETA3 OETA4 OETA5 OETA6 OETA7 OETA8 OETA9 D_EPSETA1_1
            D_EPSETA1_2 D_EPSETA1_3 D_EPSETA1_4 D_EPSETA1_5
            D_EPSETA1_6 D_EPSETA1_7 D_EPSETA1_8 D_EPSETA1_9 FREMTYPE
$DATA      ../../frem_dataset.dta IGNORE=@

;  simultaneous analysis of FPG-Hb-HbA1c
$ABBREVIATED DERIV2=NOCOMMON
$PRED
;;;FREM CODE BEGIN
     BSV_AGE = ETA(10)*10.2318688078
     BSV_WGT = ETA(11)*17.738664519
     BSV_LBW = ETA(12)*11.2023916302
     BSV_CRCO = ETA(13)*20.6542819724
     BSV_SEX = ETA(14)*0.492904320263
     TV_AGE=THETA(1)
     TV_WGT=THETA(2)
     TV_LBW=THETA(3)
     TV_CRCO=THETA(4)
     TV_SEX=THETA(5)
;;;FREM CODE END
 BASE1=D_ETA1*(ETA(4)-OETA1)
BASE2=D_ETA2*(ETA(5)-OETA2)
BASE3=D_ETA3*(ETA(6)-OETA3)
BASE4=D_ETA4*(ETA(1)-OETA4)
BASE5=D_ETA5*(ETA(2)-OETA5)
BASE6=D_ETA6*(ETA(7)-OETA6)
BASE7=D_ETA7*(ETA(8)-OETA7)
BASE8=D_ETA8*(ETA(9)-OETA8)
BASE9=D_ETA9*(ETA(3)-OETA9)
BSUM1=BASE1+BASE2+BASE3+BASE4+BASE5+BASE6+BASE7+BASE8+BASE9
BASE_TERMS=BSUM1
IPRED=OPRED+BASE_TERMS
ERR1=EPS(1)*(D_EPS1+D_EPSETA1_1*(ETA(4)-OETA1))
ERR2=EPS(1)*(D_EPSETA1_2*(ETA(5)-OETA2))
ERR3=EPS(1)*(D_EPSETA1_3*(ETA(6)-OETA3))
ERR4=EPS(1)*(D_EPSETA1_4*(ETA(1)-OETA4))
ERR5=EPS(1)*(D_EPSETA1_5*(ETA(2)-OETA5))
ERR6=EPS(1)*(D_EPSETA1_6*(ETA(7)-OETA6))
ERR7=EPS(1)*(D_EPSETA1_7*(ETA(8)-OETA7))
ERR8=EPS(1)*(D_EPSETA1_8*(ETA(9)-OETA8))
ERR9=EPS(1)*(D_EPSETA1_9*(ETA(3)-OETA9))
ESUM1=ERR1+ERR2+ERR3+ERR4+ERR5+ERR6+ERR7+ERR8+ERR9
ERROR_TERMS=ESUM1
Y=IPRED+ERROR_TERMS
;;;FREM CODE BEGIN
     Y_AGE = TV_AGE + BSV_AGE
     Y_WGT = TV_WGT + BSV_WGT
     Y_LBW = TV_LBW + BSV_LBW
     Y_CRCO = TV_CRCO + BSV_CRCO
     Y_SEX = TV_SEX + BSV_SEX
     IF (FREMTYPE.EQ.100) THEN
        Y = Y_AGE+EPS(2)
        IPRED = Y_AGE
     END IF
     IF (FREMTYPE.EQ.200) THEN
        Y = Y_WGT+EPS(2)
        IPRED = Y_WGT
     END IF
     IF (FREMTYPE.EQ.300) THEN
        Y = Y_LBW+EPS(2)
        IPRED = Y_LBW
     END IF
     IF (FREMTYPE.EQ.400) THEN
        Y = Y_CRCO+EPS(2)
        IPRED = Y_CRCO
     END IF
     IF (FREMTYPE.EQ.500) THEN
        Y = Y_SEX+EPS(2)
        IPRED = Y_SEX
     END IF
;;;FREM CODE END
$THETA  57.1553398058 FIX ; TV_AGE
 88.9502427184 FIX ; TV_WGT
 58.4322815534 FIX ; TV_LBW
 69.5191747573 FIX ; TV_CRCO
 1.41262135922 FIX ; TV_SEX
$OMEGA  BLOCK(1)
 0.0553028  ; 4 RES HBA1c
$OMEGA  BLOCK(1)
 0.0269513  ;   5 RES Hb
$OMEGA  BLOCK(1)
 0.0948142  ;  9 RES FPG
$OMEGA  BLOCK(11)
 0.00354177  ;      1 GAM
 1E-07 0.0069065  ;     2 KINH
 1E-07 1E-07 0.340141  ;     3 HB50
 1E-07 1E-07 1E-07 0.0183344  ; 6 FPG BASELINE
 1E-07 1E-07 1E-07 1E-07 0.981616  ; 7 EC50 FPG
 1E-07 1E-07 1E-07 1E-07 1E-07 0.622261  ;  8 PBO FPG
 0.00386264 -0.0145581 -0.239367 -0.0298749 -0.117254 0.0391603 0.997377  ;    BSV_AGE
 -0.0203792 0.0117776 0.0185413 -0.0030641 -0.0643184 -0.0658672 -0.194617 0.997908  ;    BSV_WGT
 -0.0208978 0.0308323 0.12162 -0.00225777 0.15124 0.013424 -0.186584 0.779178 0.998196  ;    BSV_LBW
 -0.0101462 0.0249047 0.195432 0.0214051 0.161476 0.00248157 -0.635002 0.517089 0.642687 0.997764  ;   BSV_CRCO
 0.0120646 -0.0423251 -0.172319 -0.0111109 -0.209915 -0.0420932 0.138918 -0.359699 -0.800989 -0.505722 0.998171  ;    BSV_SEX
$SIGMA  0.958797
$SIGMA  1e-07  FIX  ;     EPSCOV
$ESTIMATION METHOD=COND INTERACTION
$COVARIANCE PRINT=R UNCONDITIONAL

NM-TRAN MESSAGES
 WARNING: -prdefault OPTION IS OVER-RIDING USER SPECIFIED PD VALUE OF -58 WITH 50
THEREFORE OVER-RIDING -prdefault
 WARNINGS AND ERRORS (IF ANY) FOR PROBLEM    1
 (WARNING  2) NM-TRAN INFERS THAT THE DATA ARE POPULATION.

1NONLINEAR MIXED EFFECTS MODEL PROGRAM (NONMEM) VERSION 7.3.0
 ORIGINALLY DEVELOPED BY STUART BEAL, LEWIS SHEINER, AND ALISON BOECKMANN
 CURRENT DEVELOPERS ARE ROBERT BAUER, ICON DEVELOPMENT SOLUTIONS,
 AND ALISON BOECKMANN. IMPLEMENTATION, EFFICIENCY, AND STANDARDIZATION
 PERFORMED BY NOUS INFOSYSTEMS.
 PROBLEM NO.:         1
 PKPD joint FPG HBA1C 20070724
 TOT. NO. OF OBS RECS:    10758
 TOT. NO. OF INDIVIDUALS:    412
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 #TBLN:      1
 #METH: First Order Conditional Estimation with Interaction
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
 #TERM:
0MINIMIZATION SUCCESSFUL
 NO. OF FUNCTION EVALUATIONS USED:      414
 NO. OF SIG. DIGITS IN FINAL EST.:  3.1

 ETABAR IS THE ARITHMETIC MEAN OF THE ETA-ESTIMATES,
 AND THE P-VALUE IS GIVEN FOR THE NULL HYPOTHESIS THAT THE TRUE MEAN IS 0.

 ETABAR:        -4.1753E-02 -2.0823E-02 -2.5782E-02  1.6823E-03  6.9849E-04 -1.3163E-02 -6.3945E-03 -5.9888E-02  6.6915E-02  3.4292E-11
                -3.7280E-13  2.9898E-11 -2.9997E-12  1.5257E-08
 SE:             7.8065E-03  4.9220E-03  1.4291E-02  2.8098E-03  4.0455E-03  1.9549E-02  6.4411E-03  3.6894E-02  2.7041E-02  4.9207E-02
                 4.9207E-02  4.9207E-02  4.9207E-02  4.9207E-02
 N:                     412         412         412         412         412         412         412         412         412         412
                        412         412         412         412

 P VAL.:         8.8875E-08  2.3327E-05  7.1217E-02  5.4935E-01  8.6292E-01  5.0074E-01  3.2082E-01  1.0454E-01  1.3341E-02  1.0000E+00
                 1.0000E+00  1.0000E+00  1.0000E+00  1.0000E+00

 ETAshrink(%):   3.2810E+01  3.9335E+01  5.6173E+00  5.3634E+00  1.0844E+00  3.0946E+01  4.5246E+00  2.5541E+01  3.0445E+01  1.0000E-10
                 5.9882E-01  1.0000E-10  1.0000E-10  1.0000E-10
 EBVshrink(%):   4.6613E+01  4.6675E+01  2.0750E+01  6.9420E+00  1.4020E+00  3.2398E+01  5.9019E+00  2.9537E+01  3.3283E+01  4.8211E-08
                 1.5700E-08  4.0089E-08  1.1848E-08  2.0887E-05
 EPSshrink(%):   4.9505E+00  9.9926E+01

 #TERE:
 Elapsed estimation time in seconds:   384.66
0R MATRIX ALGORITHMICALLY SINGULAR
 AND ALGORITHMICALLY NON-POSITIVE-SEMIDEFINITE
0COVARIANCE STEP ABORTED
 Elapsed covariance time in seconds:   502.52

 ********************               FIRST ORDER CONDITIONAL ESTIMATION WITH INTERACTION              ********************
 #OBJT:**************                       MINIMUM VALUE OF OBJECTIVE FUNCTION                      ********************
 #OBJV:********************************************   -26471.444       **************************************************

 ********************               FIRST ORDER CONDITIONAL ESTIMATION WITH INTERACTION              ********************
 ********************                             FINAL PARAMETER ESTIMATE                           ********************

 THETA - VECTOR OF FIXED EFFECTS PARAMETERS   *********
         TH 1      TH 2      TH 3      TH 4      TH 5
         5.72E+01  8.90E+01  5.84E+01  6.95E+01  1.41E+00

 OMEGA - COV MATRIX FOR RANDOM EFFECTS - ETAS  ********
            ETA1      ETA2      ETA3      ETA4      ETA5      ETA6      ETA7      ETA8      ETA9      ET10      ET11      ET12
             ET13      ET14
 ETA1
+        5.58E-02
 ETA2
+        0.00E+00  2.72E-02
 ETA3
+        0.00E+00  0.00E+00  9.47E-02
 ETA4
+        0.00E+00  0.00E+00  0.00E+00  3.64E-03
 ETA5
+        0.00E+00  0.00E+00  0.00E+00 -5.19E-04  6.91E-03
 ETA6
+        0.00E+00  0.00E+00  0.00E+00  1.77E-05  1.06E-04  3.31E-01
 ETA7
+        0.00E+00  0.00E+00  0.00E+00 -8.82E-04  1.23E-03  3.98E-05  1.88E-02
 ETA8
+        0.00E+00  0.00E+00  0.00E+00 -2.71E-04  5.92E-05  1.85E-05 -2.23E-05  1.01E+00
 ETA9
+        0.00E+00  0.00E+00  0.00E+00  9.58E-05  1.03E-04  3.36E-06 -1.84E-05 -1.98E-05  6.24E-01
 ET10
+        0.00E+00  0.00E+00  0.00E+00  4.02E-03 -1.30E-02 -1.97E-01 -3.06E-02 -7.20E-02  6.46E-02  9.91E-01
 ET11
+        0.00E+00  0.00E+00  0.00E+00 -2.10E-02  1.19E-02  2.62E-02 -2.15E-03 -1.71E-01 -6.33E-02 -1.94E-01  1.01E+00
 ET12
+        0.00E+00  0.00E+00  0.00E+00 -2.04E-02  3.01E-02  7.64E-02 -3.10E-04  1.37E-02  1.33E-02 -1.80E-01  7.86E-01  9.94E-01
 ET13
+        0.00E+00  0.00E+00  0.00E+00 -9.82E-03  2.37E-02  1.32E-01  2.29E-02  9.32E-02 -1.82E-02 -6.27E-01  5.17E-01  6.35E-01
          9.89E-01
 ET14
+        0.00E+00  0.00E+00  0.00E+00  1.13E-02 -4.12E-02 -9.47E-02 -1.26E-02 -1.22E-01 -2.95E-02  1.29E-01 -3.59E-01 -7.91E-01
         -4.95E-01  9.85E-01

 SIGMA - COV MATRIX FOR RANDOM EFFECTS - EPSILONS  ****
            EPS1      EPS2
 EPS1
+        9.58E-01
 EPS2
+        0.00E+00  1.00E-07

 OMEGA - CORR MATRIX FOR RANDOM EFFECTS - ETAS  *******
            ETA1      ETA2      ETA3      ETA4      ETA5      ETA6      ETA7      ETA8      ETA9      ET10      ET11      ET12
             ET13      ET14
 ETA1
+        2.36E-01
 ETA2
+        0.00E+00  1.65E-01
 ETA3
+        0.00E+00  0.00E+00  3.08E-01
 ETA4
+        0.00E+00  0.00E+00  0.00E+00  6.03E-02
 ETA5
+        0.00E+00  0.00E+00  0.00E+00 -1.04E-01  8.31E-02
 ETA6
+        0.00E+00  0.00E+00  0.00E+00  5.09E-04  2.22E-03  5.75E-01
 ETA7
+        0.00E+00  0.00E+00  0.00E+00 -1.07E-01  1.08E-01  5.04E-04  1.37E-01
 ETA8
+        0.00E+00  0.00E+00  0.00E+00 -4.45E-03  7.07E-04  3.20E-05 -1.61E-04  1.01E+00
 ETA9
+        0.00E+00  0.00E+00  0.00E+00  2.01E-03  1.56E-03  7.39E-06 -1.70E-04 -2.49E-05  7.90E-01
 ET10
+        0.00E+00  0.00E+00  0.00E+00  6.69E-02 -1.57E-01 -3.44E-01 -2.24E-01 -7.18E-02  8.22E-02  9.95E-01
 ET11
+        0.00E+00  0.00E+00  0.00E+00 -3.46E-01  1.42E-01  4.53E-02 -1.56E-02 -1.69E-01 -7.97E-02 -1.94E-01  1.01E+00
 ET12
+        0.00E+00  0.00E+00  0.00E+00 -3.38E-01  3.63E-01  1.33E-01 -2.27E-03  1.36E-02  1.69E-02 -1.81E-01  7.83E-01  9.97E-01
 ET13
+        0.00E+00  0.00E+00  0.00E+00 -1.64E-01  2.87E-01  2.31E-01  1.68E-01  9.30E-02 -2.31E-02 -6.34E-01  5.16E-01  6.40E-01
          9.95E-01
 ET14
+        0.00E+00  0.00E+00  0.00E+00  1.88E-01 -4.99E-01 -1.66E-01 -9.28E-02 -1.22E-01 -3.76E-02  1.31E-01 -3.60E-01 -7.99E-01
         -5.02E-01  9.93E-01

 SIGMA - CORR MATRIX FOR RANDOM EFFECTS - EPSILONS  ***
            EPS1      EPS2
 EPS1
+        9.79E-01
 EPS2
+        0.00E+00  3.16E-04
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 #CPUT: Total CPU Time in Seconds,      887.726
