Sat Jan 23 10:59:27 CET 2016
$PROBLEM    MOXONIDINE PK ANALYSIS
$INPUT      ID VISI XAT2=DROP DGRP DOSE FLAG=DROP ONO=DROP XIME=DROP
            DVO=DROP NEUY=DROP SCR=DROP AGE=DROP SEX NYHA=DROP WT
            COMP=DROP ACE=DROP DIG=DROP DIU=DROP NUMB=DROP TAD=DROP
            TIME VIDD=DROP CLCR=DROP AMT SS II VID CMT=DROP CONO=DROP
            DV EVID=DROP OVID=DROP MDV FREMTYPE
$DATA      ../../m1/frem_dataset.dta IGNORE=@
$ABBREVIATED DERIV2=NO COMRES=6
$SUBROUTINE ADVAN2 TRANS1
$PK
;;;FREM CODE BEGIN
     BSV_WT = ETA(4)
     BSV_SEX = ETA(5)
     TV_WT=THETA(6)
     TV_SEX=THETA(7)
;;;FREM CODE END

;----------IOV--------------------

   KPLAG = 0

   TVCL  = THETA(1)
   TVV   = THETA(2)
   TVKA  = THETA(3)

   CL    = TVCL*EXP(ETA(1))
   V     = TVV*EXP(ETA(2))
   KA    = TVKA*EXP(ETA(3))
   LAG   = THETA(4)
   PHI   = LOG(LAG/(1-LAG))
   ALAG1 = EXP(PHI+KPLAG)/(1+EXP(PHI+KPLAG))
   K     = CL/V
   S2    = V

$ERROR

     IPRED = LOG(.025)
     W     = THETA(5)
     IF(F.GT.0) IPRED = LOG(F)
     IRES  = IPRED-DV
     IWRES = IRES/W
     Y     = IPRED+ERR(1)*W

;;;FREM CODE BEGIN
     Y_WT = TV_WT + BSV_WT
     Y_SEX = TV_SEX + BSV_SEX
     IF (FREMTYPE.EQ.100) THEN
        Y = Y_WT+EPS(2)
        IPRED = Y_WT
     END IF
     IF (FREMTYPE.EQ.200) THEN
        Y = Y_SEX+EPS(2)
        IPRED = Y_SEX
     END IF
;;;FREM CODE END
$THETA  (0,26.646)
 (0,7.0892)
 (0,0.242649)
$THETA  (0,0.232801) ; LAG
$THETA  (0,0.367108) ; W
$THETA  78.5076 ; TV_WT
 1.20272 ; TV_SEX
$OMEGA  BLOCK(5)
 0.0815324
 0.045644 2.79894
 1E-07 1E-07 0.0522103  ;         KA
 1.62801 -1.77563 -1.5144 246.465  ;     BSV_WT
 -0.00428558 0.0744024 0.0521267 -3.10401 0.161606  ;    BSV_SEX
$SIGMA  1  FIX
$SIGMA  1e-07  FIX  ;     EPSCOV
$ESTIMATION MAXEVALS=9990 PRINT=10 METHOD=CONDITIONAL
;$COV
$COVARIANCE PRINT=R UNCONDITIONAL

NM-TRAN MESSAGES
 WARNINGS AND ERRORS (IF ANY) FOR PROBLEM    1
 (WARNING  2) NM-TRAN INFERS THAT THE DATA ARE POPULATION.

1NONLINEAR MIXED EFFECTS MODEL PROGRAM (NONMEM) VERSION 7.4.0 alpha6 (nm74a6)
 ORIGINALLY DEVELOPED BY STUART BEAL, LEWIS SHEINER, AND ALISON BOECKMANN
 CURRENT DEVELOPERS ARE ROBERT BAUER, ICON DEVELOPMENT SOLUTIONS,
 AND ALISON BOECKMANN. IMPLEMENTATION, EFFICIENCY, AND STANDARDIZATION
 PERFORMED BY NOUS INFOSYSTEMS.
 PROBLEM NO.:         1
 MOXONIDINE PK ANALYSIS
 TOT. NO. OF OBS RECS:     1170
 TOT. NO. OF INDIVIDUALS:     74
 ONE COMPARTMENT MODEL WITH FIRST-ORDER ABSORPTION (ADVAN2)
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 #TBLN:      1
 #METH: First Order Conditional Estimation
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
 #TERM:
0MINIMIZATION SUCCESSFUL
 NO. OF FUNCTION EVALUATIONS USED:     1232
 NO. OF SIG. DIGITS IN FINAL EST.:  3.3

 ETABAR IS THE ARITHMETIC MEAN OF THE ETA-ESTIMATES,
 AND THE P-VALUE IS GIVEN FOR THE NULL HYPOTHESIS THAT THE TRUE MEAN IS 0.

 ETABAR:         4.3299E-03  1.8061E-01  1.7010E-02 -6.0744E-04  2.4838E-05
 SE:             3.1061E-02  1.6565E-01  2.5272E-02  1.8250E+00  4.6733E-02
 N:                      74          74          74          74          74

 P VAL.:         8.8913E-01  2.7558E-01  5.0090E-01  9.9973E-01  9.9958E-01

 ETAshrink(%):   5.6293E+00  1.5145E+01  9.9832E+00  1.0000E-10  1.0000E-10
 EBVshrink(%):   5.8011E+00  1.1081E+01  1.0326E+01  2.0286E-08  3.0938E-05
 EPSshrink(%):   7.1088E+00  9.9933E+01

 #TERE:
 Elapsed estimation  time in seconds:    59.59
 Elapsed covariance  time in seconds:     8.07
 Elapsed postprocess time in seconds:     0.00

 ********************                        FIRST ORDER CONDITIONAL ESTIMATION                      ********************
 #OBJT:**************                       MINIMUM VALUE OF OBJECTIVE FUNCTION                      ********************
 #OBJV:********************************************     -260.231       **************************************************

 ********************                        FIRST ORDER CONDITIONAL ESTIMATION                      ********************
 ********************                             FINAL PARAMETER ESTIMATE                           ********************

 THETA - VECTOR OF FIXED EFFECTS PARAMETERS   *********
         TH 1      TH 2      TH 3      TH 4      TH 5      TH 6      TH 7
         2.67E+01  7.56E+00  2.46E-01  2.32E-01  3.66E-01  7.85E+01  1.20E+00

 OMEGA - COV MATRIX FOR RANDOM EFFECTS - ETAS  ********
         ETA1      ETA2      ETA3      ETA4      ETA5
 ETA1
+        8.13E-02
 ETA2
+        9.34E-02  2.86E+00
 ETA3
+        4.09E-02  1.55E-01  5.91E-02
 ETA4
+        1.53E+00 -1.70E+00 -1.32E+00  2.46E+02
 ETA5
+       -4.62E-03  6.80E-02  4.74E-02 -3.10E+00  1.62E-01

 SIGMA - COV MATRIX FOR RANDOM EFFECTS - EPSILONS  ****
         EPS1      EPS2
 EPS1
+        1.00E+00
 EPS2
+        0.00E+00  1.00E-07

 OMEGA - CORR MATRIX FOR RANDOM EFFECTS - ETAS  *******
         ETA1      ETA2      ETA3      ETA4      ETA5
 ETA1
+        2.85E-01
 ETA2
+        1.94E-01  1.69E+00
 ETA3
+        5.90E-01  3.78E-01  2.43E-01
 ETA4
+        3.43E-01 -6.42E-02 -3.46E-01  1.57E+01
 ETA5
+       -4.03E-02  1.00E-01  4.85E-01 -4.92E-01  4.02E-01

 SIGMA - CORR MATRIX FOR RANDOM EFFECTS - EPSILONS  ***
         EPS1      EPS2
 EPS1
+        1.00E+00
 EPS2
+        0.00E+00  3.16E-04

 ********************                        FIRST ORDER CONDITIONAL ESTIMATION                      ********************
 ********************                            STANDARD ERROR OF ESTIMATE                          ********************

 THETA - VECTOR OF FIXED EFFECTS PARAMETERS   *********
         TH 1      TH 2      TH 3      TH 4      TH 5      TH 6      TH 7
         9.71E-01  2.13E+00  8.60E-03  9.05E-03  2.67E-02  1.82E+00  4.67E-02

 OMEGA - COV MATRIX FOR RANDOM EFFECTS - ETAS  ********
         ETA1      ETA2      ETA3      ETA4      ETA5
 ETA1
+        1.29E-02
 ETA2
+        6.23E-02  7.24E-01
 ETA3
+        1.09E-02  4.87E-02  1.40E-02
 ETA4
+        6.47E-01  3.66E+00  4.64E-01  4.12E+01
 ETA5
+        1.47E-02  7.07E-02  1.21E-02  8.46E-01  2.78E-02

 SIGMA - COV MATRIX FOR RANDOM EFFECTS - EPSILONS  ****
         EPS1      EPS2
 EPS1
+       .........
 EPS2
+       ......... .........

 OMEGA - CORR MATRIX FOR RANDOM EFFECTS - ETAS  *******
         ETA1      ETA2      ETA3      ETA4      ETA5
 ETA1
+        2.27E-02
 ETA2
+        1.32E-01  2.14E-01
 ETA3
+        1.02E-01  1.06E-01  2.88E-02
 ETA4
+        1.31E-01  1.36E-01  1.09E-01  1.31E+00
 ETA5
+        1.28E-01  9.89E-02  8.61E-02  9.71E-02  3.46E-02

 SIGMA - CORR MATRIX FOR RANDOM EFFECTS - EPSILONS  ***
         EPS1      EPS2
 EPS1
+       .........
 EPS2
+       ......... .........
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 #CPUT: Total CPU Time in Seconds,       67.568
