Wed Feb 26 11:21:45 CET 2014
$PROBLEM    PHENOBARB SIMPLE MODEL
$INPUT      ID TIME AMT WGT APGR DV FA1=DROP FA2=DROP
$DATA       pheno.dta IGNORE=@
$SUBROUTINE ADVAN1 TRANS2
$PK

      TVCL=THETA(1)
      TVV=THETA(2)
      CL=TVCL*EXP(THETA(3)*ETA(1))
      V=TVV*EXP(THETA(4)*ETA(2))
      S1=V
$ERROR

      W=F
      Y=F+W*EPS(1)*THETA(5)

      IPRED=F         ;  individual-specific prediction
      IRES=DV-IPRED   ;  individual-specific residual
      IWRES=IRES/W    ;  individual-specific weighted residual

$THETA  (0,0.0105) ; CL
$THETA  (0,1.0500) ; V
$THETA  (0,0.65)
$THETA  (0,0.5)
$THETA  (0,0.2)
$OMEGA  1  FIX
$OMEGA  1  FIX
$SIGMA  1  FIX
$ESTIMATION MAXEVALS=9997 SIGDIGITS=4 POSTHOC
$COVARIANCE PRINT=E

NM-TRAN MESSAGES
 WARNINGS AND ERRORS (IF ANY) FOR PROBLEM    1
 (WARNING  2) NM-TRAN INFERS THAT THE DATA ARE POPULATION.

1NONLINEAR MIXED EFFECTS MODEL PROGRAM (NONMEM) VERSION 7.3.0
 ORIGINALLY DEVELOPED BY STUART BEAL, LEWIS SHEINER, AND ALISON BOECKMANN
 CURRENT DEVELOPERS ARE ROBERT BAUER, ICON DEVELOPMENT SOLUTIONS,
 AND ALISON BOECKMANN. IMPLEMENTATION, EFFICIENCY, AND STANDARDIZATION
 PERFORMED BY NOUS INFOSYSTEMS.
 PROBLEM NO.:         1
 PHENOBARB SIMPLE MODEL
 TOT. NO. OF OBS RECS:      155
 TOT. NO. OF INDIVIDUALS:     59
 ONE COMPARTMENT MODEL (ADVAN1)
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 #TBLN:      1
 #METH: First Order
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
 #TERM:
0MINIMIZATION SUCCESSFUL
 NO. OF FUNCTION EVALUATIONS USED:      102
 NO. OF SIG. DIGITS IN FINAL EST.:  4.9

 #TERE:
 Elapsed estimation time in seconds:     0.06
 Elapsed covariance time in seconds:     0.04

 ********************                                   FIRST ORDER                                  ********************
 #OBJT:**************                       MINIMUM VALUE OF OBJECTIVE FUNCTION                      ********************
 #OBJV:********************************************      742.051       **************************************************

 ********************                                   FIRST ORDER                                  ********************
 ********************                             FINAL PARAMETER ESTIMATE                           ********************

 THETA - VECTOR OF FIXED EFFECTS PARAMETERS   *********
         TH 1      TH 2      TH 3      TH 4      TH 5
         5.55E-03  1.34E+00  4.97E-01  3.76E-01  1.28E-01

 OMEGA - COV MATRIX FOR RANDOM EFFECTS - ETAS  ********
            ETA1      ETA2
 ETA1
+        1.00E+00
 ETA2
+        0.00E+00  1.00E+00

 SIGMA - COV MATRIX FOR RANDOM EFFECTS - EPSILONS  ****
            EPS1
 EPS1
+        1.00E+00

 OMEGA - CORR MATRIX FOR RANDOM EFFECTS - ETAS  *******
            ETA1      ETA2
 ETA1
+        1.00E+00
 ETA2
+        0.00E+00  1.00E+00

 SIGMA - CORR MATRIX FOR RANDOM EFFECTS - EPSILONS  ***
            EPS1
 EPS1
+        1.00E+00

 ********************                                   FIRST ORDER                                  ********************
 ********************                            STANDARD ERROR OF ESTIMATE                          ********************

 THETA - VECTOR OF FIXED EFFECTS PARAMETERS   *********
         TH 1      TH 2      TH 3      TH 4      TH 5
         3.95E-04  7.99E-02  1.56E-01  4.64E-02  1.32E-02

 OMEGA - COV MATRIX FOR RANDOM EFFECTS - ETAS  ********
            ETA1      ETA2
 ETA1
+       .........
 ETA2
+       ......... .........

 SIGMA - COV MATRIX FOR RANDOM EFFECTS - EPSILONS  ****
            EPS1
 EPS1
+       .........

 OMEGA - CORR MATRIX FOR RANDOM EFFECTS - ETAS  *******
            ETA1      ETA2
 ETA1
+       .........
 ETA2
+       ......... .........

 SIGMA - CORR MATRIX FOR RANDOM EFFECTS - EPSILONS  ***
            EPS1
 EPS1
+       .........

 ********************                                   FIRST ORDER                                  ********************
 ********************                          COVARIANCE MATRIX OF ESTIMATE                         ********************

            TH 1      TH 2      TH 3      TH 4      TH 5      OM11      OM12      OM22      SG11
 TH 1
+        1.56E-07
 TH 2
+        4.58E-06  6.38E-03
 TH 3
+       -2.74E-05 -1.94E-03  2.45E-02
 TH 4
+        4.73E-06  1.70E-03 -1.33E-03  2.15E-03
 TH 5
+        2.83E-07  8.30E-05  2.78E-04 -2.77E-06  1.76E-04
 OM11
+       ......... ......... ......... ......... ......... .........
 OM12
+       ......... ......... ......... ......... ......... ......... .........
 OM22
+       ......... ......... ......... ......... ......... ......... ......... .........
 SG11
+       ......... ......... ......... ......... ......... ......... ......... ......... .........

 ********************                                   FIRST ORDER                                  ********************
 ********************                          CORRELATION MATRIX OF ESTIMATE                        ********************

            TH 1      TH 2      TH 3      TH 4      TH 5      OM11      OM12      OM22      SG11
 TH 1
+        3.95E-04
 TH 2
+        1.45E-01  7.99E-02
 TH 3
+       -4.44E-01 -1.55E-01  1.56E-01
 TH 4
+        2.58E-01  4.60E-01 -1.83E-01  4.64E-02
 TH 5
+        5.41E-02  7.84E-02  1.34E-01 -4.50E-03  1.32E-02
 OM11
+       ......... ......... ......... ......... ......... .........
 OM12
+       ......... ......... ......... ......... ......... ......... .........
 OM22
+       ......... ......... ......... ......... ......... ......... ......... .........
 SG11
+       ......... ......... ......... ......... ......... ......... ......... ......... .........
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
 ********************                                   FIRST ORDER                                  ********************
 ********************                      EIGENVALUES OF COR MATRIX OF ESTIMATE                     ********************

             1         2         3         4         5
         4.69E-01  5.81E-01  9.76E-01  1.15E+00  1.83E+00
 #CPUT: Total CPU Time in Seconds,        0.116
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