Wed Dec 10 10:09:46 CET 2014

$PROBLEM  PHENOBARB SIMPLE MODEL
$INPUT  ID TIME AMT WGT APGR DV FA1 FA2
$DATA  pheno.dta IGNORE=@
$SUBROUTINE  ADVAN1 TRANS2
$PK

      TVCL=THETA(1)
      TVV=THETA(2)
      CL=TVCL*EXP(ETA(1))
      V=TVV*EXP(ETA(2))
      S1=V
$ERROR

      W=F
      Y=F+W*EPS(1)

      IPRED=F         ;  individual-specific prediction
      IRES=DV-IPRED   ;  individual-specific residual
      IWRES=IRES/W    ;  individual-specific weighted residual

$THETA  (0,0.0105)    ; CL

$THETA  (0,1.0500)    ; V

$OMEGA            .4  ; IVCL
                  .25 ; IVV

$SIGMA            .04

$ESTIMATION  MAXEVALS=9997 SIGDIGITS=4 POSTHOC
$COVARIANCE  PRINT=E

;$TABLE ID TIME IPRED IWRES NOPRINT ONEHEADER FILE=sdtab5.dat
;$TABLE ID CL ETA1 ETA2 NOPRINT NOAPPEND ONEHEADER FILE=patab5.dat
;$TABLE ID WGT APGR NOPRINT NOAPPEND ONEHEADER FILE=cotab5.dat

NM-TRAN MESSAGES
 WARNINGS AND ERRORS (IF ANY) FOR PROBLEM    1
 (WARNING  2) NM-TRAN INFERS THAT THE DATA ARE POPULATION.
 AN ERROR WAS FOUND IN THE CONTROL STATEMENTS.
 THE CHARACTERS IN ERROR ARE:
 pheno.dta
  33  INPUT DATA FILE DOES NOT EXIST OR CANNOT BE OPENED.
