Fri Sep  9 09:32:09 CEST 2016
$PROBLEM    MOXONIDINE PK ANALYSIS
$INPUT      ID VISI XAT2=DROP DGRP DOSE FLAG=DROP ONO=DROP XIME=DROP
            DVO=DROP NEUY SCR AGE SEX NYH=DROP WT DROP ACE DIG DIU
            NUMB=DROP TAD TIME VIDD=DROP CRCL AMT SS II DROP CMT=DROP
            CONO=DROP DV EVID=DROP OVID=DROP
$DATA      mox_simulated.csv IGNORE=@
$ABBREVIATED DERIV2=NO COMRES=6
$SUBROUTINE ADVAN2 TRANS1
$PK
;----------IOV--------------------

   KPLAG = 0

   TVCL  = THETA(1)
   TVV   = THETA(2)
   TVKA  = THETA(3)

   CL    = TVCL*EXP(ETA(1))
   V     = TVV*EXP(ETA(2))
   KA    = TVKA*EXP(ETA(3))
   LAG   = THETA(4)
   PHI   = LOG(LAG/(1-LAG))
   ALAG1 = EXP(PHI+KPLAG)/(1+EXP(PHI+KPLAG))
   K     = CL/V
   S2    = V

$ERROR

     IPRED = LOG(.025)
     W     = THETA(5)
     IF(F.GT.0) IPRED = LOG(F)
     IRES  = IPRED-DV
     IWRES = IRES/W
     Y     = IPRED+ERR(1)*W

$THETA  (0,27.5)
 (0,13)
 (0,0.2)
$THETA  (0,0.077) ; LAG
$THETA  (0,.23) ; W
$OMEGA  BLOCK(2)
 .3
 .1 .3
$OMEGA  BLOCK(1)
 .3  ;         KA
$SIGMA  1  FIX
$ESTIMATION MAXEVALS=9990 PRINT=10 METHOD=CONDITIONAL
$COVARIANCE PRINT=E

NM-TRAN MESSAGES
 WARNINGS AND ERRORS (IF ANY) FOR PROBLEM    1
 (WARNING  2) NM-TRAN INFERS THAT THE DATA ARE POPULATION.

1NONLINEAR MIXED EFFECTS MODEL PROGRAM (NONMEM) VERSION 7.3.0
 ORIGINALLY DEVELOPED BY STUART BEAL, LEWIS SHEINER, AND ALISON BOECKMANN
 CURRENT DEVELOPERS ARE ROBERT BAUER, ICON DEVELOPMENT SOLUTIONS,
 AND ALISON BOECKMANN. IMPLEMENTATION, EFFICIENCY, AND STANDARDIZATION
 PERFORMED BY NOUS INFOSYSTEMS.
 PROBLEM NO.:         1
 MOXONIDINE PK ANALYSIS
 TOT. NO. OF OBS RECS:     1022
 TOT. NO. OF INDIVIDUALS:     74
 ONE COMPARTMENT MODEL WITH FIRST-ORDER ABSORPTION (ADVAN2)
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 #TBLN:      1
 #METH: First Order Conditional Estimation
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
 #TERM:
0MINIMIZATION SUCCESSFUL
 NO. OF FUNCTION EVALUATIONS USED:      197
 NO. OF SIG. DIGITS IN FINAL EST.:  3.3

 ETABAR IS THE ARITHMETIC MEAN OF THE ETA-ESTIMATES,
 AND THE P-VALUE IS GIVEN FOR THE NULL HYPOTHESIS THAT THE TRUE MEAN IS 0.

 ETABAR:         4.8101E-04  2.3035E-02  1.4275E-02
 SE:             7.3778E-02  1.1510E-01  5.1251E-02
 N:                      74          74          74

 P VAL.:         9.9480E-01  8.4138E-01  7.8061E-01

 ETAshrink(%):   5.0070E-01  5.5380E+00  5.7706E+00
 EBVshrink(%):   1.1740E+00  5.1615E+00  5.0746E+00
 EPSshrink(%):   8.6886E+00

 #TERE:
 Elapsed estimation time in seconds:     2.53
 Elapsed covariance time in seconds:     1.95

 ********************                        FIRST ORDER CONDITIONAL ESTIMATION                      ********************
 #OBJT:**************                       MINIMUM VALUE OF OBJECTIVE FUNCTION                      ********************
 #OBJV:********************************************     -644.376       **************************************************

 ********************                        FIRST ORDER CONDITIONAL ESTIMATION                      ********************
 ********************                             FINAL PARAMETER ESTIMATE                           ********************

 THETA - VECTOR OF FIXED EFFECTS PARAMETERS   *********
         TH 1      TH 2      TH 3      TH 4      TH 5
         3.29E+01  2.10E+01  2.83E-01  9.58E-02  3.35E-01

 OMEGA - COV MATRIX FOR RANDOM EFFECTS - ETAS  ********
            ETA1      ETA2      ETA3
 ETA1
+        4.12E-01
 ETA2
+        6.18E-01  1.11E+00
 ETA3
+        0.00E+00  0.00E+00  2.22E-01

 SIGMA - COV MATRIX FOR RANDOM EFFECTS - EPSILONS  ****
            EPS1
 EPS1
+        1.00E+00

 OMEGA - CORR MATRIX FOR RANDOM EFFECTS - ETAS  *******
            ETA1      ETA2      ETA3
 ETA1
+        6.42E-01
 ETA2
+        9.11E-01  1.06E+00
 ETA3
+        0.00E+00  0.00E+00  4.71E-01

 SIGMA - CORR MATRIX FOR RANDOM EFFECTS - EPSILONS  ***
            EPS1
 EPS1
+        1.00E+00

 ********************                        FIRST ORDER CONDITIONAL ESTIMATION                      ********************
 ********************                            STANDARD ERROR OF ESTIMATE                          ********************

 THETA - VECTOR OF FIXED EFFECTS PARAMETERS   *********
         TH 1      TH 2      TH 3      TH 4      TH 5
         2.48E+00  3.11E+00  1.71E-02  2.67E-02  8.66E-03

 OMEGA - COV MATRIX FOR RANDOM EFFECTS - ETAS  ********
            ETA1      ETA2      ETA3
 ETA1
+        6.95E-02
 ETA2
+        1.17E-01  2.60E-01
 ETA3
+       ......... .........  4.11E-02

 SIGMA - COV MATRIX FOR RANDOM EFFECTS - EPSILONS  ****
            EPS1
 EPS1
+       .........

 OMEGA - CORR MATRIX FOR RANDOM EFFECTS - ETAS  *******
            ETA1      ETA2      ETA3
 ETA1
+        5.41E-02
 ETA2
+        3.92E-02  1.23E-01
 ETA3
+       ......... .........  4.36E-02

 SIGMA - CORR MATRIX FOR RANDOM EFFECTS - EPSILONS  ***
            EPS1
 EPS1
+       .........

 ********************                        FIRST ORDER CONDITIONAL ESTIMATION                      ********************
 ********************                          COVARIANCE MATRIX OF ESTIMATE                         ********************

            TH 1      TH 2      TH 3      TH 4      TH 5      OM11      OM12      OM13      OM22      OM23      OM33      SG11
 TH 1
+        6.15E+00
 TH 2
+        5.50E+00  9.67E+00
 TH 3
+        6.80E-03  1.28E-02  2.92E-04
 TH 4
+        5.31E-03 -3.30E-02 -5.27E-05  7.11E-04
 TH 5
+        1.69E-03  2.59E-03 -5.59E-07 -1.07E-05  7.51E-05
 OM11
+       -1.09E-02 -7.37E-03 -2.21E-04 -1.14E-05  5.88E-05  4.83E-03
 OM12
+        5.20E-04 -4.86E-02 -1.99E-04  7.72E-04  7.00E-05  6.97E-03  1.37E-02
 OM13
+       ......... ......... ......... ......... ......... ......... ......... .........
 OM22
+        4.32E-02 -1.47E-01  3.51E-05  2.72E-03 -1.60E-04  9.72E-03  2.61E-02 .........  6.77E-02
 OM23
+       ......... ......... ......... ......... ......... ......... ......... ......... ......... .........
 OM33
+        4.96E-03  7.68E-03 -1.15E-04 -7.49E-05  3.74E-05 -9.72E-05 -4.64E-04 ......... -1.27E-03 .........  1.69E-03
 SG11
+       ......... ......... ......... ......... ......... ......... ......... ......... ......... ......... ......... .........

 ********************                        FIRST ORDER CONDITIONAL ESTIMATION                      ********************
 ********************                          CORRELATION MATRIX OF ESTIMATE                        ********************

            TH 1      TH 2      TH 3      TH 4      TH 5      OM11      OM12      OM13      OM22      OM23      OM33      SG11
 TH 1
+        2.48E+00
 TH 2
+        7.13E-01  3.11E+00
 TH 3
+        1.61E-01  2.41E-01  1.71E-02
 TH 4
+        8.04E-02 -3.98E-01 -1.16E-01  2.67E-02
 TH 5
+        7.89E-02  9.61E-02 -3.78E-03 -4.63E-02  8.66E-03
 OM11
+       -6.36E-02 -3.41E-02 -1.86E-01 -6.16E-03  9.78E-02  6.95E-02
 OM12
+        1.79E-03 -1.34E-01 -9.95E-02  2.47E-01  6.91E-02  8.58E-01  1.17E-01
 OM13
+       ......... ......... ......... ......... ......... ......... ......... .........
 OM22
+        6.70E-02 -1.81E-01  7.90E-03  3.92E-01 -7.09E-02  5.38E-01  8.58E-01 .........  2.60E-01
 OM23
+       ......... ......... ......... ......... ......... ......... ......... ......... ......... .........
 OM33
+        4.87E-02  6.01E-02 -1.64E-01 -6.84E-02  1.05E-01 -3.41E-02 -9.65E-02 ......... -1.19E-01 .........  4.11E-02
 SG11
+       ......... ......... ......... ......... ......... ......... ......... ......... ......... ......... ......... .........
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
 ********************                        FIRST ORDER CONDITIONAL ESTIMATION                      ********************
 ********************                      EIGENVALUES OF COR MATRIX OF ESTIMATE                     ********************

             1         2         3         4         5         6         7         8         9
         2.34E-02  1.43E-01  2.83E-01  7.57E-01  9.22E-01  1.08E+00  1.27E+00  1.81E+00  2.71E+00
 #CPUT: Total CPU Time in Seconds,        4.512
