Wed Oct 23 10:52:47 CEST 2013
$PROBLEM    MOXONIDINE PK ANALYSIS
$ABBREVIATED DERIV2=NO COMRES=6
$INPUT      ID VISI XAT2 DGRP DOSE FLAG ONO XIME DVO NEUY SCR AGE SEX
            NYHA WT COMP ACE DIG DIU NUMB TAD TIME VIDD CLCR AMT SS II
            VID CMT CONO DV EVID OVID
$DATA       mox_simulated.csv IGNORE=@
$SUBROUTINE ADVAN2 TRANS1
$PK
;----------IOV--------------------
;   VIS3               = 0
;   IF(VISI.EQ.3) VIS3 = 1
;   VIS8               = 0
;   IF(VISI.EQ.8) VIS8 = 1
;   KPLAG = VIS3*ETA(4)+VIS8*ETA(5)

   TVCL  = THETA(1)
   TVV   = THETA(2)
   TVKA  = THETA(3)
   TVLAG   = THETA(4)

   CL    = TVCL*EXP(ETA(1))
   V     = TVV*EXP(ETA(2))
   KA    = TVKA*EXP(ETA(3))
   LAG   = TVLAG*EXP(0)
;   PHI   = LOG(LAG/(1-LAG))
;   ALAG1 = EXP(PHI+KPLAG)/(1+EXP(PHI+KPLAG))
    ; set occ=VISI param=PHI
   TVPHI   = LOG(LAG/(1-LAG))
   PHI   = TVPHI + (0)
   ALAG1 = EXP(PHI)/(1+EXP(PHI))
   K     = CL/V
   S2    = V

$ERROR

     IPRED = LOG(.025)
     W     = THETA(5)
     IF(F.GT.0) IPRED = LOG(F)
     IRES  = IPRED-DV
     IWRES = IRES/W
     Y     = IPRED+ERR(1)*W

$THETA  (0,27.5)
 (0,13)
 (0,0.2)
 (0,.1)
 (0,.23)
$OMEGA  BLOCK(2)
 .3
 .1 .3
$OMEGA  BLOCK(1)
 .3
;$OMEGA BLOCK(1) .3
;$OMEGA BLOCK(1) SAME
$SIGMA  1  FIX
$ESTIMATION MAXEVALS=9990 METH=COND

NM-TRAN MESSAGES
 WARNINGS AND ERRORS (IF ANY) FOR PROBLEM    1
 (WARNING  2) NM-TRAN INFERS THAT THE DATA ARE POPULATION.

1NONLINEAR MIXED EFFECTS MODEL PROGRAM (NONMEM) VERSION 7.2.0
 ORIGINALLY DEVELOPED BY STUART BEAL, LEWIS SHEINER, AND ALISON BOECKMANN
 CURRENT DEVELOPERS ARE ROBERT BAUER, ICON DEVELOPMENT SOLUTIONS,
 AND ALISON BOECKMANN. IMPLEMENTATION, EFFICIENCY, AND STANDARDIZATION
 PERFORMED BY NOUS INFOSYSTEMS.
 PROBLEM NO.:         1
 MOXONIDINE PK ANALYSIS
 TOT. NO. OF OBS RECS:     1022
 TOT. NO. OF INDIVIDUALS:     74
 ONE COMPARTMENT MODEL WITH FIRST-ORDER ABSORPTION (ADVAN2)
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 #TBLN:      1
 #METH: First Order Conditional Estimation
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
 #TERM:
0MINIMIZATION SUCCESSFUL
 NO. OF FUNCTION EVALUATIONS USED:      219
 NO. OF SIG. DIGITS IN FINAL EST.:  3.5

 ETABAR IS THE ARITHMETIC MEAN OF THE ETA-ESTIMATES,
 AND THE P-VALUE IS GIVEN FOR THE NULL HYPOTHESIS THAT THE TRUE MEAN IS 0.

 ETABAR:         5.5316E-04  2.3197E-02  1.4283E-02
 SE:             7.3778E-02  1.1509E-01  5.1251E-02

 P VAL.:         9.9402E-01  8.4026E-01  7.8048E-01

 ETAshrink(%):   4.9066E-01  5.5252E+00  5.7665E+00
 EPSshrink(%):   8.6897E+00

 #TERE:
 Elapsed estimation time in seconds:     2.54

 ********************                        FIRST ORDER CONDITIONAL ESTIMATION                      ********************
 #OBJT:**************                       MINIMUM VALUE OF OBJECTIVE FUNCTION                      ********************
 #OBJV:********************************************     -644.376       **************************************************

 ********************                        FIRST ORDER CONDITIONAL ESTIMATION                      ********************
 ********************                             FINAL PARAMETER ESTIMATE                           ********************

 THETA - VECTOR OF FIXED EFFECTS PARAMETERS   *********
         TH 1      TH 2      TH 3      TH 4      TH 5
         3.29E+01  2.10E+01  2.83E-01  9.57E-02  3.35E-01

 OMEGA - COV MATRIX FOR RANDOM EFFECTS - ETAS  ********
            ETA1      ETA2      ETA3
 ETA1
+        4.12E-01
 ETA2
+        6.17E-01  1.11E+00
 ETA3
+        0.00E+00  0.00E+00  2.22E-01

 SIGMA - COV MATRIX FOR RANDOM EFFECTS - EPSILONS  ****
            EPS1
 EPS1
+        1.00E+00

 OMEGA - CORR MATRIX FOR RANDOM EFFECTS - ETAS  *******
            ETA1      ETA2      ETA3
 ETA1
+        6.42E-01
 ETA2
+        9.11E-01  1.06E+00
 ETA3
+        0.00E+00  0.00E+00  4.71E-01

 SIGMA - CORR MATRIX FOR RANDOM EFFECTS - EPSILONS  ***
            EPS1
 EPS1
+        1.00E+00
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