Fri Mar 14 14:19:11 CET 2014
$PROBLEM    MOXONIDINE PK ANALYSIS
$INPUT      ID VISI XAT2 DGRP DOSE FLAG ONO XIME DVO NEUY SCR AGE SEX
            NYHA WT COMP ACE DIG DIU NUMB TAD TIME VIDD CLCR AMT SS II
            VID CMT CONO DV EVID OVID
$DATA       mox_simulated.csv IGNORE=@
$ABBREVIATED DERIV2=NO COMRES=6
$SUBROUTINE ADVAN2 TRANS1
$PK
   TVCL  = THETA(1)
   TVV   = THETA(2)
   TVKA  = THETA(3)
   TVLAG   = THETA(4)

   CL    = TVCL*EXP(ETA(1))
   V     = TVV*EXP(ETA(2))
   KA    = TVKA*EXP(ETA(3))
   LAG   = TVLAG*EXP(0)
   TVPHI   = LOG(LAG/(1-LAG))
   PHI   = TVPHI + (0)
   ALAG1 = EXP(PHI)/(1+EXP(PHI))
   K     = CL/V
   S2    = V

$ERROR

     IPRED = LOG(.025)
     W     = THETA(5)
     IF(F.GT.0) IPRED = LOG(F)
     IRES  = IPRED-DV
     IWRES = IRES/W
     Y     = IPRED+ERR(1)*W

$THETA  (0,27.5)
 (0,13)
 (0,0.2)
 (0,.1)
 (0,.23)
$OMEGA  BLOCK(1)
 .3
$OMEGA  BLOCK(2)
 .3
 0.1 .3
$SIGMA  1  FIX
$ESTIMATION MAXEVALS=9990 METH=COND
$COVARIANCE

NM-TRAN MESSAGES
 WARNINGS AND ERRORS (IF ANY) FOR PROBLEM    1
 (WARNING  2) NM-TRAN INFERS THAT THE DATA ARE POPULATION.

1NONLINEAR MIXED EFFECTS MODEL PROGRAM (NONMEM) VERSION 7.3.0
 ORIGINALLY DEVELOPED BY STUART BEAL, LEWIS SHEINER, AND ALISON BOECKMANN
 CURRENT DEVELOPERS ARE ROBERT BAUER, ICON DEVELOPMENT SOLUTIONS,
 AND ALISON BOECKMANN. IMPLEMENTATION, EFFICIENCY, AND STANDARDIZATION
 PERFORMED BY NOUS INFOSYSTEMS.
 PROBLEM NO.:         1
 MOXONIDINE PK ANALYSIS
 TOT. NO. OF OBS RECS:     1022
 TOT. NO. OF INDIVIDUALS:     74
 ONE COMPARTMENT MODEL WITH FIRST-ORDER ABSORPTION (ADVAN2)
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 #TBLN:      1
 #METH: First Order Conditional Estimation
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
 #TERM:
0MINIMIZATION SUCCESSFUL
 NO. OF FUNCTION EVALUATIONS USED:      249
 NO. OF SIG. DIGITS IN FINAL EST.:  3.8

 ETABAR IS THE ARITHMETIC MEAN OF THE ETA-ESTIMATES,
 AND THE P-VALUE IS GIVEN FOR THE NULL HYPOTHESIS THAT THE TRUE MEAN IS 0.

 ETABAR:        -1.1722E-03  7.5049E-02  1.8888E-02
 SE:             7.3658E-02  1.1250E-01  4.7957E-02
 N:                      74          74          74

 P VAL.:         9.8730E-01  5.0471E-01  6.9369E-01

 ETAshrink(%):   3.5322E-01  1.2695E+01  1.1093E+01
 EBVshrink(%):   1.2074E+00  9.7618E+00  9.3813E+00
 EPSshrink(%):   9.7845E+00

 #TERE:
 Elapsed estimation time in seconds:     3.96
 Elapsed covariance time in seconds:     2.57

 ********************                        FIRST ORDER CONDITIONAL ESTIMATION                      ********************
 #OBJT:**************                       MINIMUM VALUE OF OBJECTIVE FUNCTION                      ********************
 #OBJV:********************************************     -569.424       **************************************************

 ********************                        FIRST ORDER CONDITIONAL ESTIMATION                      ********************
 ********************                             FINAL PARAMETER ESTIMATE                           ********************

 THETA - VECTOR OF FIXED EFFECTS PARAMETERS   *********
         TH 1      TH 2      TH 3      TH 4      TH 5
         3.29E+01  2.09E+01  2.97E-01  9.93E-02  3.34E-01

 OMEGA - COV MATRIX FOR RANDOM EFFECTS - ETAS  ********
            ETA1      ETA2      ETA3
 ETA1
+        4.10E-01
 ETA2
+        0.00E+00  1.25E+00
 ETA3
+        0.00E+00  1.37E-01  2.18E-01

 SIGMA - COV MATRIX FOR RANDOM EFFECTS - EPSILONS  ****
            EPS1
 EPS1
+        1.00E+00

 OMEGA - CORR MATRIX FOR RANDOM EFFECTS - ETAS  *******
            ETA1      ETA2      ETA3
 ETA1
+        6.40E-01
 ETA2
+        0.00E+00  1.12E+00
 ETA3
+        0.00E+00  2.62E-01  4.67E-01

 SIGMA - CORR MATRIX FOR RANDOM EFFECTS - EPSILONS  ***
            EPS1
 EPS1
+        1.00E+00

 ********************                        FIRST ORDER CONDITIONAL ESTIMATION                      ********************
 ********************                            STANDARD ERROR OF ESTIMATE                          ********************

 THETA - VECTOR OF FIXED EFFECTS PARAMETERS   *********
         TH 1      TH 2      TH 3      TH 4      TH 5
         2.48E+00  3.87E+00  2.03E-02  3.35E-02  8.52E-03

 OMEGA - COV MATRIX FOR RANDOM EFFECTS - ETAS  ********
            ETA1      ETA2      ETA3
 ETA1
+        6.90E-02
 ETA2
+       .........  3.42E-01
 ETA3
+       .........  1.37E-01  4.60E-02

 SIGMA - COV MATRIX FOR RANDOM EFFECTS - EPSILONS  ****
            EPS1
 EPS1
+       .........

 OMEGA - CORR MATRIX FOR RANDOM EFFECTS - ETAS  *******
            ETA1      ETA2      ETA3
 ETA1
+        5.39E-02
 ETA2
+       .........  1.53E-01
 ETA3
+       .........  2.27E-01  4.92E-02

 SIGMA - CORR MATRIX FOR RANDOM EFFECTS - EPSILONS  ***
            EPS1
 EPS1
+       .........

 ********************                        FIRST ORDER CONDITIONAL ESTIMATION                      ********************
 ********************                          COVARIANCE MATRIX OF ESTIMATE                         ********************

            TH 1      TH 2      TH 3      TH 4      TH 5      OM11      OM12      OM13      OM22      OM23      OM33      SG11
 TH 1
+        6.17E+00
 TH 2
+        5.34E+00  1.50E+01
 TH 3
+        2.87E-03  2.04E-02  4.11E-04
 TH 4
+        1.07E-02 -6.63E-02 -5.91E-05  1.13E-03
 TH 5
+        1.82E-03  3.48E-03 -8.94E-06 -2.84E-05  7.27E-05
 OM11
+       -1.28E-02  7.24E-03 -2.39E-04 -2.65E-04  8.29E-05  4.76E-03
 OM12
+       ......... ......... ......... ......... ......... ......... .........
 OM13
+       ......... ......... ......... ......... ......... ......... ......... .........
 OM22
+       -6.77E-02 -4.26E-01  1.62E-03  5.16E-03 -3.89E-04  5.26E-03 ......... .........  1.17E-01
 OM23
+       -5.39E-02 -1.55E-01  9.66E-04  1.38E-03 -8.51E-05 -9.15E-04 ......... .........  3.36E-02  1.87E-02
 OM33
+        1.50E-02 -5.61E-03 -5.55E-05  6.35E-05  4.17E-05  3.08E-05 ......... .........  3.13E-03  2.52E-03  2.11E-03
 SG11
+       ......... ......... ......... ......... ......... ......... ......... ......... ......... ......... ......... .........

 ********************                        FIRST ORDER CONDITIONAL ESTIMATION                      ********************
 ********************                          CORRELATION MATRIX OF ESTIMATE                        ********************

            TH 1      TH 2      TH 3      TH 4      TH 5      OM11      OM12      OM13      OM22      OM23      OM33      SG11
 TH 1
+        2.48E+00
 TH 2
+        5.56E-01  3.87E+00
 TH 3
+        5.69E-02  2.60E-01  2.03E-02
 TH 4
+        1.29E-01 -5.11E-01 -8.69E-02  3.35E-02
 TH 5
+        8.57E-02  1.06E-01 -5.17E-02 -9.93E-02  8.52E-03
 OM11
+       -7.46E-02  2.71E-02 -1.71E-01 -1.15E-01  1.41E-01  6.90E-02
 OM12
+       ......... ......... ......... ......... ......... ......... .........
 OM13
+       ......... ......... ......... ......... ......... ......... ......... .........
 OM22
+       -7.96E-02 -3.21E-01  2.33E-01  4.49E-01 -1.33E-01  2.23E-01 ......... .........  3.42E-01
 OM23
+       -1.59E-01 -2.93E-01  3.49E-01  3.02E-01 -7.31E-02 -9.71E-02 ......... .........  7.19E-01  1.37E-01
 OM33
+        1.32E-01 -3.15E-02 -5.95E-02  4.11E-02  1.06E-01  9.70E-03 ......... .........  1.99E-01  4.01E-01  4.60E-02
 SG11
+       ......... ......... ......... ......... ......... ......... ......... ......... ......... ......... ......... .........
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 #CPUT: Total CPU Time in Seconds,        6.555
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