Thu Jan  7 15:56:41 CET 2016
$PROBLEM    MOXONIDINE PK,FINAL ESTIMATES,simulated data
$INPUT      ID VISI XAT2=DROP DGRP DOSE FLAG=DROP ONO=DROP XIME=DROP
            DVO=DROP NEUY SCR AGE SEX NYHA WT DROP ACE DIG DIU
            NUMB=DROP TAD TIME VIDD=DROP CRCL AMT SS II DROP CMT=DROP
            CONO=DROP DV EVID=DROP OVID=DROP
$DATA      mox_simulated.csv IGNORE=@
$SUBROUTINE ADVAN2 TRANS1
$PK
;-----------OCCASIONS----------
   VIS3               = 0
   IF(VISI.EQ.3) VIS3 = 1
   VIS8               = 0
   IF(VISI.EQ.8) VIS8 = 1

;----------IOV--------------------

   KPLAG  = VIS3*ETA(1)+VIS8*ETA(2)

;---------- PK model ------------------

   TVCL  = THETA(1)*30
   TVV   = THETA(2)*100
   TVKA  = THETA(3)

   CL    = TVCL*EXP(ETA(3))
   V     = TVV*EXP(ETA(4))
   KA    = TVKA*EXP(ETA(5))
   LAG   = THETA(4)/20
   PHI   = LOG(LAG/(1-LAG))
   ALAG1 = EXP(PHI+KPLAG)/(1+EXP(PHI+KPLAG))
   K     = CL/V
   S2    = V

$ERROR

     IPRED = LOG(.025)
     WA     = 1
     W      = WA
     IF(F.GT.0) IPRED = LOG(F)
     IRES  = IPRED-DV
     IWRES = IRES/W
     Y     = IPRED+ERR(1)*W

$THETA  (0,1.1) ; TVCL/30
$THETA  (0,1.15) ; TVV/100
$THETA  (0,1.41) ; TVKA
$THETA  (0,1.37) ; LAG*20
$OMEGA  BLOCK(1)
 0.394  ;    IOV LAG
$OMEGA  BLOCK(1) SAME
$OMEGA  BLOCK(2)
 0.416  ;     IIV CL
 0.392 0.584  ;      IIV V
$OMEGA  BLOCK(1)
 0.224  ;     IIV KA
$SIGMA  0.112
$ESTIMATION METHOD=1 MAXEVAL=9999
$COVARIANCE PRINT=E

NM-TRAN MESSAGES
 WARNINGS AND ERRORS (IF ANY) FOR PROBLEM    1
 (WARNING  2) NM-TRAN INFERS THAT THE DATA ARE POPULATION.

1NONLINEAR MIXED EFFECTS MODEL PROGRAM (NONMEM) VERSION 7.4.0 alpha6 (nm74a6)
 ORIGINALLY DEVELOPED BY STUART BEAL, LEWIS SHEINER, AND ALISON BOECKMANN
 CURRENT DEVELOPERS ARE ROBERT BAUER, ICON DEVELOPMENT SOLUTIONS,
 AND ALISON BOECKMANN. IMPLEMENTATION, EFFICIENCY, AND STANDARDIZATION
 PERFORMED BY NOUS INFOSYSTEMS.
 PROBLEM NO.:         1
 MOXONIDINE PK,FINAL ESTIMATES,simulated data
 TOT. NO. OF OBS RECS:     1022
 TOT. NO. OF INDIVIDUALS:     74
 ONE COMPARTMENT MODEL WITH FIRST-ORDER ABSORPTION (ADVAN2)
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 #TBLN:      1
 #METH: First Order Conditional Estimation
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
 #TERM:
0MINIMIZATION SUCCESSFUL
 NO. OF FUNCTION EVALUATIONS USED:      159
 NO. OF SIG. DIGITS IN FINAL EST.:  3.3

 ETABAR IS THE ARITHMETIC MEAN OF THE ETA-ESTIMATES,
 AND THE P-VALUE IS GIVEN FOR THE NULL HYPOTHESIS THAT THE TRUE MEAN IS 0.

 ETABAR:         2.0376E-02  2.2290E-02 -7.7100E-04 -1.7133E-02 -2.2413E-02
 SE:             1.7323E-02  2.0382E-02  7.4115E-02  8.6308E-02  3.8254E-02
 N:                      74          74          74          74          74

 P VAL.:         2.3948E-01  2.7414E-01  9.9170E-01  8.4265E-01  5.5794E-01

 ETAshrink(%):   7.6111E+01  7.1891E+01  4.6729E-01  2.1663E+00  3.0057E+01
 EBVshrink(%):   8.0358E+01  7.6858E+01  1.1860E+00  2.6704E+00  2.8200E+01
 EPSshrink(%):   9.3821E+00

 #TERE:
 Elapsed estimation  time in seconds:     5.63
 Elapsed covariance  time in seconds:     3.65
 Elapsed postprocess time in seconds:     0.00

 ********************                        FIRST ORDER CONDITIONAL ESTIMATION                      ********************
 #OBJT:**************                       MINIMUM VALUE OF OBJECTIVE FUNCTION                      ********************
 #OBJV:********************************************     -632.678       **************************************************

 ********************                        FIRST ORDER CONDITIONAL ESTIMATION                      ********************
 ********************                             FINAL PARAMETER ESTIMATE                           ********************

 THETA - VECTOR OF FIXED EFFECTS PARAMETERS   *********
         TH 1      TH 2      TH 3      TH 4
         1.10E+00  1.15E+00  1.41E+00  1.37E+00

 OMEGA - COV MATRIX FOR RANDOM EFFECTS - ETAS  ********
         ETA1      ETA2      ETA3      ETA4      ETA5
 ETA1
+        3.94E-01
 ETA2
+        0.00E+00  3.94E-01
 ETA3
+        0.00E+00  0.00E+00  4.16E-01
 ETA4
+        0.00E+00  0.00E+00  3.92E-01  5.84E-01
 ETA5
+        0.00E+00  0.00E+00  0.00E+00  0.00E+00  2.24E-01

 SIGMA - COV MATRIX FOR RANDOM EFFECTS - EPSILONS  ****
         EPS1
 EPS1
+        1.12E-01

 OMEGA - CORR MATRIX FOR RANDOM EFFECTS - ETAS  *******
         ETA1      ETA2      ETA3      ETA4      ETA5
 ETA1
+        6.28E-01
 ETA2
+        0.00E+00  6.28E-01
 ETA3
+        0.00E+00  0.00E+00  6.45E-01
 ETA4
+        0.00E+00  0.00E+00  7.96E-01  7.64E-01
 ETA5
+        0.00E+00  0.00E+00  0.00E+00  0.00E+00  4.74E-01

 SIGMA - CORR MATRIX FOR RANDOM EFFECTS - EPSILONS  ***
         EPS1
 EPS1
+        3.34E-01

 ********************                        FIRST ORDER CONDITIONAL ESTIMATION                      ********************
 ********************                            STANDARD ERROR OF ESTIMATE                          ********************

 THETA - VECTOR OF FIXED EFFECTS PARAMETERS   *********
         TH 1      TH 2      TH 3      TH 4
         8.01E-02  1.07E-01  1.06E-01  5.05E-01

 OMEGA - COV MATRIX FOR RANDOM EFFECTS - ETAS  ********
         ETA1      ETA2      ETA3      ETA4      ETA5
 ETA1
+        2.51E-01
 ETA2
+       ......... .........
 ETA3
+       ......... .........  6.99E-02
 ETA4
+       ......... .........  8.69E-02  1.22E-01
 ETA5
+       ......... ......... ......... .........  1.09E-01

 SIGMA - COV MATRIX FOR RANDOM EFFECTS - EPSILONS  ****
         EPS1
 EPS1
+        5.62E-03

 OMEGA - CORR MATRIX FOR RANDOM EFFECTS - ETAS  *******
         ETA1      ETA2      ETA3      ETA4      ETA5
 ETA1
+        2.00E-01
 ETA2
+       ......... .........
 ETA3
+       ......... .........  5.42E-02
 ETA4
+       ......... .........  5.06E-02  8.01E-02
 ETA5
+       ......... ......... ......... .........  1.15E-01

 SIGMA - CORR MATRIX FOR RANDOM EFFECTS - EPSILONS  ***
         EPS1
 EPS1
+        8.41E-03
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
 ********************                        FIRST ORDER CONDITIONAL ESTIMATION                      ********************
 ********************                      EIGENVALUES OF COR MATRIX OF ESTIMATE                     ********************

             1         2         3         4         5         6         7         8         9        10
         2.62E-02  5.06E-02  1.89E-01  2.03E-01  7.28E-01  8.70E-01  1.06E+00  1.26E+00  2.71E+00  2.90E+00
 #CPUT: Total CPU Time in Seconds,        9.292
