Tue Apr  9 15:21:51 CEST 2013
$PROBLEM    PHENOBARB SIMPLE MODEL
$INPUT      ID TIME AMT WGT APGR DV
$DATA       pheno.dta IGNORE=@
$MSFI       phenomsf6 ONLYREAD
$SUBROUTINE ADVAN1 TRANS2
$PRIOR      TNPRI (PROBLEM 2) PLEV=0.999
$PK

      TVCL=THETA(1)
      TVV=THETA(2)
      CL=TVCL*EXP(ETA(1))
      V=TVV*EXP(ETA(2))
      S1=V
$ERROR

      W=F
      Y=F+W*EPS(1)

      IPRED=F         ;  individual-specific prediction
      IRES=DV-IPRED   ;  individual-specific residual
      IWRES=IRES/W    ;  individual-specific weighted residual

$PROBLEM
$INPUT      ID TIME AMT WGT APGR DV
$DATA       pheno.dta IGNORE=@ REWIND
$THETA  (0,0.0105) ; CL
$THETA  (0,1.0500) ; V
$OMEGA  .4  ;       IVCL
 .25  ;        IVV
$SIGMA  .04
$SIMULATION (54321) NSUB=1 ONLYSIM TRUE=PRIOR
;$ESTIMATION  MAXEVALS=9997 SIGDIGITS=4 POSTHOC

;$COVARIANCE  PRINT=E
$TABLE      ID TIME AMT WGT APGR DV NOPRINT ONEHEADER FILE=tnprisim

NM-TRAN MESSAGES
 WARNINGS AND ERRORS (IF ANY) FOR PROBLEM    1
 (WARNING  2) NM-TRAN INFERS THAT THE DATA ARE POPULATION.
 WARNINGS AND ERRORS (IF ANY) FOR PROBLEM    2
 (WARNING  2) NM-TRAN INFERS THAT THE DATA ARE POPULATION.

1NONLINEAR MIXED EFFECTS MODEL PROGRAM (NONMEM)    DOUBLE PRECISION NONMEM    VERSION VI LEVEL 2.0
 DEVELOPED AND PROGRAMMED BY STUART BEAL AND LEWIS SHEINER
 PROBLEM NO.:         1
 PHENOBARB SIMPLE MODEL
 TOT. NO. OF OBS RECS:      155
 TOT. NO. OF INDIVIDUALS:     59
 ONE COMPARTMENT MODEL (ADVAN1)
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
 PROBLEM NO.:         2

 TOT. NO. OF OBS RECS:      155
 TOT. NO. OF INDIVIDUALS:     59
 PROBLEM NO.:         2     SUBPROBLEM NO.:      1
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 SIMULATION STEP PERFORMED
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