Thu Aug  6 14:22:44 CEST 2015
$PROBLEM    MOXONIDINE PK ANALYSIS 1
$INPUT      ID VISI XAT2 DGRP DOSE FLAG ONO XIME DVO NEUY SCR AGE SEX
            NYHA WT COMP ACE DIG DIU NUMB TAD TIME VIDD CLCR AMT SS II
            VID CMT CONO DV EVID OVID
$DATA      mox_simulated.csv IGNORE=@
$ABBREVIATED DERIV2=NO COMRES=6
$SUBROUTINE ADVAN2 TRANS1
$PK
   TVCL  = THETA(1)
   TVV   = THETA(2)
   TVKA  = THETA(3)
   TVLAG   = THETA(4)

   CL    = TVCL*EXP(ETA(1))
   V     = TVV*EXP(ETA(2))
   KA    = TVKA*EXP(ETA(3))
   LAG   = TVLAG*EXP(0)
   TVPHI   = LOG(LAG/(1-LAG))
   PHI   = TVPHI + (0)
   ALAG1 = EXP(PHI)/(1+EXP(PHI))
   K     = CL/V
   S2    = V

$ERROR

     IPRED = LOG(.025)
     W     = THETA(5)
     IF(F.GT.0) IPRED = LOG(F)
     IRES  = IPRED-DV
     IWRES = IRES/W
     Y     = IPRED+ERR(1)*W

$THETA  (0,34.8488030908397)
 (0,28.4788851140942)
 (0,0.294703064040853)
 (0,0.0615579315540197)
 (0,0.339516872133039)
$OMEGA  BLOCK(1)
 0.481256819078822
$OMEGA  BLOCK(2)
 1.09142347279116
 0.00122918255042773 0.16629229817654
$SIGMA  1  FIX
$ESTIMATION METHOD=BAYES INTERACTION NOABORT NBURN=50 NITER=100
            CTYPE=3 PRINT=50 NOPRIOR=0

$PROBLEM    MOXONIDINE PK ANALYSIS 2
$INPUT      ID VISI XAT2 DGRP DOSE FLAG ONO XIME DVO NEUY SCR AGE SEX
            NYHA WT COMP ACE DIG DIU NUMB TAD TIME VIDD CLCR AMT SS II
            VID CMT CONO DV EVID OVID
$DATA      mox_simulated.csv IGNORE=@ REWIND
$THETA  (0,27.113132195712)
 (0,16.3000792413967)
 (0,0.306547288052413)
 (0,0.0953857304613286)
 (0,0.327872479241371)
$OMEGA  BLOCK(1)
 0.296394938225528
$OMEGA  BLOCK(2)
 1.42347111954326
 0.219417306143209 0.236512534208442
$SIGMA  1  FIX
$ESTIMATION METH=IMP INTER PRINT=1 NITER=0 ISAMPLE=100 EONLY=0
            MAPITER=0

$PROBLEM    MOXONIDINE PK ANALYSIS 2
$INPUT      ID VISI XAT2 DGRP DOSE FLAG ONO XIME DVO NEUY SCR AGE SEX
            NYHA WT COMP ACE DIG DIU NUMB TAD TIME VIDD CLCR AMT SS II
            VID CMT CONO DV EVID OVID
$DATA      mox_simulated.csv IGNORE=@ REWIND
$THETA  (0,27.113132195712)
 (0,16.3000792413967)
 (0,0.306547288052413)
 (0,0.0953857304613286)
 (0,0.327872479241371)
$OMEGA  BLOCK(1)
 0.296394938225528
$OMEGA  BLOCK(2)
 1.42347111954326
 0.219417306143209 0.236512534208442
$SIGMA  1  FIX
$ESTIMATION METH=IMP INTER PRINT=1 NITER=0 ISAMPLE=100 EONLY=1
            MAPITER=0

$PROBLEM    MOXONIDINE PK ANALYSIS 2
$INPUT      ID VISI XAT2 DGRP DOSE FLAG ONO XIME DVO NEUY SCR AGE SEX
            NYHA WT COMP ACE DIG DIU NUMB TAD TIME VIDD CLCR AMT SS II
            VID CMT CONO DV EVID OVID
$DATA      mox_simulated.csv IGNORE=@ REWIND
$THETA  (0,27.113132195712)
 (0,16.3000792413967)
 (0,0.306547288052413)
 (0,0.0953857304613286)
 (0,0.327872479241371)
$OMEGA  BLOCK(1)
 0.296394938225528
$OMEGA  BLOCK(2)
 1.42347111954326
 0.219417306143209 0.236512534208442
$SIGMA  1  FIX
$ESTIMATION METH=IMP INTER PRINT=1 NITER=1 ISAMPLE=100 EONLY=1
            MAPITER=0

$PROBLEM    MOXONIDINE PK ANALYSIS 2
$INPUT      ID VISI XAT2 DGRP DOSE FLAG ONO XIME DVO NEUY SCR AGE SEX
            NYHA WT COMP ACE DIG DIU NUMB TAD TIME VIDD CLCR AMT SS II
            VID CMT CONO DV EVID OVID
$DATA      mox_simulated.csv IGNORE=@ REWIND
$THETA  (0,27.113132195712)
 (0,16.3000792413967)
 (0,0.306547288052413)
 (0,0.0953857304613286)
 (0,0.327872479241371)
$OMEGA  BLOCK(1)
 0.296394938225528
$OMEGA  BLOCK(2)
 1.42347111954326
 0.219417306143209 0.236512534208442
$SIGMA  1  FIX
$ESTIMATION METH=IMP INTER PRINT=1 NITER=1000 ISAMPLE=100 EONLY=1
            MAPITER=0

$PROBLEM    MOXONIDINE PK ANALYSIS 3
$INPUT      ID VISI XAT2 DGRP DOSE FLAG ONO XIME DVO NEUY SCR AGE SEX
            NYHA WT COMP ACE DIG DIU NUMB TAD TIME VIDD CLCR AMT SS II
            VID CMT CONO DV EVID OVID
$DATA      mox_simulated.csv IGNORE=@ REWIND
$THETA  (0,27.113132195712)
 (0,16.3000792413967)
 (0,0.306547288052413)
 (0,0.0953857304613286)
 (0,0.327872479241371)
$OMEGA  BLOCK(1)
 0.296394938225528
$OMEGA  BLOCK(2)
 1.42347111954326
 0.219417306143209 0.236512534208442
$SIGMA  1  FIX
$ESTIMATION METH=IMPMAP INTER NITER=50 EONLY=1 NBURN=30 ISAMPLE=100
            DF=4 CTYPE=3 NOABORT PRINT=1 CONSTRAIN=5 SIGL=8

$PROBLEM    MOXONIDINE PK ANALYSIS 3
$INPUT      ID VISI XAT2 DGRP DOSE FLAG ONO XIME DVO NEUY SCR AGE SEX
            NYHA WT COMP ACE DIG DIU NUMB TAD TIME VIDD CLCR AMT SS II
            VID CMT CONO DV EVID OVID
$DATA      mox_simulated.csv IGNORE=@ REWIND
$THETA  (0,27.113132195712)
 (0,16.3000792413967)
 (0,0.306547288052413)
 (0,0.0953857304613286)
 (0,0.327872479241371)
$OMEGA  BLOCK(1)
 0.296394938225528
$OMEGA  BLOCK(2)
 1.42347111954326
 0.219417306143209 0.236512534208442
$SIGMA  1  FIX
$ESTIMATION METH=IMPMAP INTER NITER=0 EONLY=1 NBURN=30 ISAMPLE=100
            DF=4 CTYPE=3 NOABORT PRINT=1 CONSTRAIN=5 SIGL=8

$PROBLEM    MOXONIDINE PK ANALYSIS 3
$INPUT      ID VISI XAT2 DGRP DOSE FLAG ONO XIME DVO NEUY SCR AGE SEX
            NYHA WT COMP ACE DIG DIU NUMB TAD TIME VIDD CLCR AMT SS II
            VID CMT CONO DV EVID OVID
$DATA      mox_simulated.csv IGNORE=@ REWIND
$THETA  (0,27.113132195712)
 (0,16.3000792413967)
 (0,0.306547288052413)
 (0,0.0953857304613286)
 (0,0.327872479241371)
$OMEGA  BLOCK(1)
 0.296394938225528
$OMEGA  BLOCK(2)
 1.42347111954326
 0.219417306143209 0.236512534208442
$SIGMA  1  FIX
$ESTIMATION METH=IMPMAP INTER NITER=1 EONLY=1 NBURN=30 ISAMPLE=100
            DF=4 CTYPE=3 NOABORT PRINT=1 CONSTRAIN=5 SIGL=8

NM-TRAN MESSAGES
 WARNINGS AND ERRORS (IF ANY) FOR PROBLEM    1
 (WARNING  2) NM-TRAN INFERS THAT THE DATA ARE POPULATION.
 WARNINGS AND ERRORS (IF ANY) FOR PROBLEM    2
 (WARNING  2) NM-TRAN INFERS THAT THE DATA ARE POPULATION.
 WARNINGS AND ERRORS (IF ANY) FOR PROBLEM    3
 (WARNING  2) NM-TRAN INFERS THAT THE DATA ARE POPULATION.
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
1NONLINEAR MIXED EFFECTS MODEL PROGRAM (NONMEM) VERSION 7.3.0
 ORIGINALLY DEVELOPED BY STUART BEAL, LEWIS SHEINER, AND ALISON BOECKMANN
 CURRENT DEVELOPERS ARE ROBERT BAUER, ICON DEVELOPMENT SOLUTIONS,
 AND ALISON BOECKMANN. IMPLEMENTATION, EFFICIENCY, AND STANDARDIZATION
 PERFORMED BY NOUS INFOSYSTEMS.
 PROBLEM NO.:         1
 MOXONIDINE PK ANALYSIS 1
 TOT. NO. OF OBS RECS:     1022
 TOT. NO. OF INDIVIDUALS:     74
 ONE COMPARTMENT MODEL WITH FIRST-ORDER ABSORPTION (ADVAN2)
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 #TBLN:      1
 #METH: MCMC Bayesian Analysis
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
 #TERM:
 BURN-IN WAS NOT COMPLETED
 STATISTICAL PORTION WAS COMPLETED

 #TERE:
 Elapsed estimation time in seconds:     4.14
 Elapsed covariance time in seconds:     0.00

 ********************                              MCMC BAYESIAN ANALYSIS                            ********************
 #OBJT:**************                       AVERAGE VALUE OF LIKELIHOOD FUNCTION                     ********************
 #OBJV:********************************************    -1118.975       **************************************************
 #OBJS:********************************************       22.921 (STD) **************************************************

 ********************                              MCMC BAYESIAN ANALYSIS                            ********************
 ********************                             FINAL PARAMETER ESTIMATE                           ********************

 THETA - VECTOR OF FIXED EFFECTS PARAMETERS   *********
         TH 1      TH 2      TH 3      TH 4      TH 5
         3.60E+01  2.41E+01  3.10E-01  8.11E-02  3.37E-01

 OMEGA - COV MATRIX FOR RANDOM EFFECTS - ETAS  ********
            ETA1      ETA2      ETA3
 ETA1
+        4.37E-01
 ETA2
+        0.00E+00  1.70E+00
 ETA3
+        0.00E+00  3.12E-01  2.93E-01

 SIGMA - COV MATRIX FOR RANDOM EFFECTS - EPSILONS  ****
            EPS1
 EPS1
+        1.00E+00

 OMEGA - CORR MATRIX FOR RANDOM EFFECTS - ETAS  *******
            ETA1      ETA2      ETA3
 ETA1
+        6.58E-01
 ETA2
+        0.00E+00  1.30E+00
 ETA3
+        0.00E+00  4.39E-01  5.39E-01

 SIGMA - CORR MATRIX FOR RANDOM EFFECTS - EPSILONS  ***
            EPS1
 EPS1
+        1.00E+00

 ********************                              MCMC BAYESIAN ANALYSIS                            ********************
 ********************                STANDARD ERROR OF ESTIMATE (From Sample Variance)               ********************

 THETA - VECTOR OF FIXED EFFECTS PARAMETERS   *********
         TH 1      TH 2      TH 3      TH 4      TH 5
         8.40E-01  4.21E+00  1.01E-02  2.39E-02  7.73E-03

 OMEGA - COV MATRIX FOR RANDOM EFFECTS - ETAS  ********
            ETA1      ETA2      ETA3
 ETA1
+        7.67E-02
 ETA2
+        0.00E+00  3.99E-01
 ETA3
+        0.00E+00  1.19E-01  6.17E-02

 SIGMA - COV MATRIX FOR RANDOM EFFECTS - EPSILONS  ****
            EPS1
 EPS1
+        0.00E+00

 OMEGA - CORR MATRIX FOR RANDOM EFFECTS - ETAS  *******
            ETA1      ETA2      ETA3
 ETA1
+        5.84E-02
 ETA2
+        0.00E+00  1.52E-01
 ETA3
+        0.00E+00  1.32E-01  5.65E-02

 SIGMA - CORR MATRIX FOR RANDOM EFFECTS - EPSILONS  ***
            EPS1
 EPS1
+        0.00E+00

 ********************                              MCMC BAYESIAN ANALYSIS                            ********************
 ********************               COVARIANCE MATRIX OF ESTIMATE (From Sample Variance)             ********************

            TH 1      TH 2      TH 3      TH 4      TH 5      OM11      OM12      OM13      OM22      OM23      OM33      SG11
 TH 1
+        7.05E-01
 TH 2
+       -4.82E-02  1.77E+01
 TH 3
+       -2.62E-03  2.36E-02  1.02E-04
 TH 4
+       -7.60E-04 -5.61E-02 -1.05E-04  5.69E-04
 TH 5
+       -1.35E-03  7.56E-03  2.57E-05 -6.59E-05  5.97E-05
 OM11
+       -3.65E-03 -8.00E-03 -1.49E-05  1.99E-04 -4.23E-05  5.88E-03
 OM12
+       ......... ......... ......... ......... ......... ......... .........
 OM13
+       ......... ......... ......... ......... ......... ......... ......... .........
 OM22
+       -2.21E-02 -8.35E-01 -1.40E-04  3.88E-03 -1.16E-04  1.07E-03  0.00E+00  0.00E+00  1.59E-01
 OM23
+        3.32E-02 -3.00E-01 -4.31E-04  8.71E-04 -2.07E-04 -5.12E-04  0.00E+00  0.00E+00  2.27E-02  1.41E-02
 OM33
+        1.82E-02 -2.26E-02 -1.60E-04 -2.88E-04 -6.53E-05 -2.78E-04  0.00E+00  0.00E+00 -4.74E-03  3.07E-03  3.81E-03
 SG11
+       ......... ......... ......... ......... ......... ......... ......... ......... ......... ......... ......... .........

 ********************                              MCMC BAYESIAN ANALYSIS                            ********************
 ********************              CORRELATION MATRIX OF ESTIMATE (From Sample Variance)             ********************

            TH 1      TH 2      TH 3      TH 4      TH 5      OM11      OM12      OM13      OM22      OM23      OM33      SG11
 TH 1
+        8.40E-01
 TH 2
+       -1.36E-02  4.21E+00
 TH 3
+       -3.09E-01  5.55E-01  1.01E-02
 TH 4
+       -3.79E-02 -5.59E-01 -4.35E-01  2.39E-02
 TH 5
+       -2.08E-01  2.32E-01  3.29E-01 -3.57E-01  7.73E-03
 OM11
+       -5.67E-02 -2.48E-02 -1.92E-02  1.09E-01 -7.14E-02  7.67E-02
 OM12
+       ......... ......... ......... ......... ......... ......... .........
 OM13
+       ......... ......... ......... ......... ......... ......... ......... .........
 OM22
+       -6.60E-02 -4.97E-01 -3.48E-02  4.08E-01 -3.75E-02  3.48E-02  0.00E+00  0.00E+00  3.99E-01
 OM23
+        3.33E-01 -6.00E-01 -3.60E-01  3.08E-01 -2.26E-01 -5.63E-02  0.00E+00  0.00E+00  4.79E-01  1.19E-01
 OM33
+        3.52E-01 -8.71E-02 -2.56E-01 -1.96E-01 -1.37E-01 -5.88E-02  0.00E+00  0.00E+00 -1.93E-01  4.20E-01  6.17E-02
 SG11
+       ......... ......... ......... ......... ......... ......... ......... ......... ......... ......... ......... .........
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
 PROBLEM NO.:         2
 MOXONIDINE PK ANALYSIS 2
 TOT. NO. OF OBS RECS:     1022
 TOT. NO. OF INDIVIDUALS:     74
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 #TBLN:      2
 #METH: Importance Sampling
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
 #TERM:
 OPTIMIZATION WAS NOT TESTED FOR CONVERGENCE


 ETABAR IS THE ARITHMETIC MEAN OF THE ETA-ESTIMATES,
 AND THE P-VALUE IS GIVEN FOR THE NULL HYPOTHESIS THAT THE TRUE MEAN IS 0.

 ETABAR:         1.5948E-01 -3.6659E-02 -4.1854E-02
 SE:             6.8244E-02  1.0264E-01  4.9958E-02
 N:                      74          74          74

 P VAL.:         1.9441E-02  7.2097E-01  4.0215E-01

 ETAshrink(%):   1.0000E-10  2.5493E+01  1.1029E+01
 EBVshrink(%):   9.3363E-01  1.1198E+01  9.2002E+00
 EPSshrink(%):   1.0000E-10

 #TERE:
 Elapsed estimation time in seconds:     0.82

 ********************                               IMPORTANCE SAMPLING                              ********************
 #OBJT:**************                        FINAL VALUE OF OBJECTIVE FUNCTION                       ********************
 #OBJV:********************************************     -135.445       **************************************************

 ********************                               IMPORTANCE SAMPLING                              ********************
 ********************                             FINAL PARAMETER ESTIMATE                           ********************

 THETA - VECTOR OF FIXED EFFECTS PARAMETERS   *********
         TH 1      TH 2      TH 3      TH 4      TH 5
         2.71E+01  1.63E+01  3.07E-01  9.54E-02  3.28E-01

 OMEGA - COV MATRIX FOR RANDOM EFFECTS - ETAS  ********
            ETA1      ETA2      ETA3
 ETA1
+        2.96E-01
 ETA2
+        0.00E+00  1.42E+00
 ETA3
+        0.00E+00  2.19E-01  2.37E-01

 SIGMA - COV MATRIX FOR RANDOM EFFECTS - EPSILONS  ****
            EPS1
 EPS1
+        1.00E+00

 OMEGA - CORR MATRIX FOR RANDOM EFFECTS - ETAS  *******
            ETA1      ETA2      ETA3
 ETA1
+        5.44E-01
 ETA2
+        0.00E+00  1.19E+00
 ETA3
+        0.00E+00  3.78E-01  4.86E-01

 SIGMA - CORR MATRIX FOR RANDOM EFFECTS - EPSILONS  ***
            EPS1
 EPS1
+        1.00E+00

 PROBLEM NO.:         3
 MOXONIDINE PK ANALYSIS 2
 TOT. NO. OF OBS RECS:     1022
 TOT. NO. OF INDIVIDUALS:     74
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 #TBLN:      3
 #METH: Objective Function Evaluation by Importance Sampling
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
 #TERM:
 EXPECTATION ONLY PROCESS COMPLETED


 ETABAR IS THE ARITHMETIC MEAN OF THE ETA-ESTIMATES,
 AND THE P-VALUE IS GIVEN FOR THE NULL HYPOTHESIS THAT THE TRUE MEAN IS 0.

 ETABAR:         1.5948E-01 -3.6659E-02 -4.1854E-02
 SE:             6.8244E-02  1.0264E-01  4.9958E-02
 N:                      74          74          74

 P VAL.:         1.9441E-02  7.2097E-01  4.0215E-01

 ETAshrink(%):   1.0000E-10  2.5493E+01  1.1029E+01
 EBVshrink(%):   9.3363E-01  1.1198E+01  9.2002E+00
 EPSshrink(%):   1.0000E-10

 #TERE:
 Elapsed estimation time in seconds:     0.13

 ********************               OBJECTIVE FUNCTION EVALUATION BY IMPORTANCE SAMPLING             ********************
 #OBJT:**************                        FINAL VALUE OF OBJECTIVE FUNCTION                       ********************
 #OBJV:********************************************     -135.445       **************************************************

 ********************               OBJECTIVE FUNCTION EVALUATION BY IMPORTANCE SAMPLING             ********************
 ********************                             FINAL PARAMETER ESTIMATE                           ********************

 THETA - VECTOR OF FIXED EFFECTS PARAMETERS   *********
         TH 1      TH 2      TH 3      TH 4      TH 5
         2.71E+01  1.63E+01  3.07E-01  9.54E-02  3.28E-01

 OMEGA - COV MATRIX FOR RANDOM EFFECTS - ETAS  ********
            ETA1      ETA2      ETA3
 ETA1
+        2.96E-01
 ETA2
+        0.00E+00  1.42E+00
 ETA3
+        0.00E+00  2.19E-01  2.37E-01

 SIGMA - COV MATRIX FOR RANDOM EFFECTS - EPSILONS  ****
            EPS1
 EPS1
+        1.00E+00

 OMEGA - CORR MATRIX FOR RANDOM EFFECTS - ETAS  *******
            ETA1      ETA2      ETA3
 ETA1
+        5.44E-01
 ETA2
+        0.00E+00  1.19E+00
 ETA3
+        0.00E+00  3.78E-01  4.86E-01

 SIGMA - CORR MATRIX FOR RANDOM EFFECTS - EPSILONS  ***
            EPS1
 EPS1
+        1.00E+00
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 #CPUT: Total CPU Time in Seconds,      152.378
