Thu May 23 12:10:46 CEST 2013
gfortran
$PROBLEM    PHENOBARB SIMPLE MODEL
$INPUT      ID TIME AMT WGT APGR DV
$DATA       pheno.dta IGNORE=@
$SUBROUTINE ADVAN1 TRANS2
$PK

      TVCL=THETA(1)
      TVV=THETA(2)
      CL=TVCL*EXP(ETA(1))
      V=TVV*EXP(ETA(2))
      S1=V
$ERROR

      W=F
      Y=F+W*EPS(1)

      IPRED=F         ;  individual-specific prediction
      IRES=DV-IPRED   ;  individual-specific residual
      IWRES=IRES/W    ;  individual-specific weighted residual

$THETA  (0,0.0105) ; CL
$THETA  (0,1.0500) ; V
$OMEGA  .4  ;       IVCL
 .25  ;        IVV
$SIGMA  .04
$ESTIMATION MAXEVALS=5 SIGDIGITS=4 POSTHOC MSFO=msf
$ESTIMATION METHOD=IMPMAP

$PROBLEM    PHENOBARB SIMPLE MODEL
$INPUT      ID TIME AMT WGT APGR DV
$DATA       pheno.dta IGNORE=@ REWIND
$MSFI       msf
$TABLE      ID DV NOPRINT ONEHEADER FILE=testtab

 WARNINGS AND ERRORS (IF ANY) FOR PROBLEM    1
 (WARNING  2) NM-TRAN INFERS THAT THE DATA ARE POPULATION.
 WARNINGS AND ERRORS (IF ANY) FOR PROBLEM    2
 (WARNING  2) NM-TRAN INFERS THAT THE DATA ARE POPULATION.

1NONLINEAR MIXED EFFECTS MODEL PROGRAM (NONMEM) VERSION 7.1.2
 ORIGINALLY DEVELOPED BY STUART BEAL, LEWIS SHEINER, AND ALISON BOECKMANN
 CURRENT DEVELOPERS ARE ROBERT BAUER, ICON DEVELOPMENT SOLUTIONS,
 AND ALISON BOECKMANN. IMPLEMENTATION, EFFICIENCY, AND STANDARDIZATION
 PERFORMED BY NOUS INFOSYSTEMS.
 PROBLEM NO.:         1
 PHENOBARB SIMPLE MODEL
 TOT. NO. OF OBS RECS:      155
 TOT. NO. OF INDIVIDUALS:     59
 ONE COMPARTMENT MODEL (ADVAN1)
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 #METH: First Order
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 Elapsed estimation time in seconds:     0.06

 #TERM:
0MINIMIZATION TERMINATED
 DUE TO MAX. NO. OF FUNCTION EVALUATIONS EXCEEDED
 NO. OF FUNCTION EVALUATIONS USED:        5
 NO. OF SIG. DIGITS UNREPORTABLE

 #TERE:

 ********************                                   FIRST ORDER                                  ********************
 #OBJT:**************                       MINIMUM VALUE OF OBJECTIVE FUNCTION                      ********************
 #OBJV:********************************************      833.769       **************************************************

 ********************                                   FIRST ORDER                                  ********************
 ********************                             FINAL PARAMETER ESTIMATE                           ********************

 THETA - VECTOR OF FIXED EFFECTS PARAMETERS   *********
         TH 1      TH 2
         1.05E-02  1.05E+00

 OMEGA - COV MATRIX FOR RANDOM EFFECTS - ETAS  ********
            ETA1      ETA2
 ETA1
+        4.00E-01
 ETA2
+        0.00E+00  2.50E-01

 SIGMA - COV MATRIX FOR RANDOM EFFECTS - EPSILONS  ****
            EPS1
 EPS1
+        4.00E-02
 #METH: Importance Sampling assisted by MAP Estimation
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 Elapsed estimation time in seconds:    66.58

 #TERM:
 OPTIMIZATION NOT TESTED


 ETABAR IS THE ARITHMETIC MEAN OF THE ETA-ESTIMATES,
 AND THE P-VALUE IS GIVEN FOR THE NULL HYPOTHESIS THAT THE TRUE MEAN IS 0.

 ETABAR:        -2.7917E-03  9.9312E-03
 SE:             3.0301E-02  5.2440E-02

 P VAL.:         9.2659E-01  8.4979E-01

 ETAshrink(%):   3.9300E+01  5.1392E+00
 EPSshrink(%):   2.8171E+01

 #TERE:

 ********************                  IMPORTANCE SAMPLING ASSISTED BY MAP ESTIMATION                ********************
 #OBJT:**************                        FINAL VALUE OF OBJECTIVE FUNCTION                       ********************
 #OBJV:********************************************      738.194       **************************************************

 ********************                  IMPORTANCE SAMPLING ASSISTED BY MAP ESTIMATION                ********************
 ********************                             FINAL PARAMETER ESTIMATE                           ********************

 THETA - VECTOR OF FIXED EFFECTS PARAMETERS   *********
         TH 1      TH 2
         5.16E-03  1.41E+00

 OMEGA - COV MATRIX FOR RANDOM EFFECTS - ETAS  ********
            ETA1      ETA2
 ETA1
+        1.50E-01
 ETA2
+        0.00E+00  1.83E-01

 SIGMA - COV MATRIX FOR RANDOM EFFECTS - EPSILONS  ****
            EPS1
 EPS1
+        1.83E-02

 PROBLEM NO.:         2
 PHENOBARB SIMPLE MODEL
 TOT. NO. OF OBS RECS:      155
 TOT. NO. OF INDIVIDUALS:     59
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 #METH: First Order Conditional Estimation (Evaluation)

 #TERM:

 ETABAR IS THE ARITHMETIC MEAN OF THE ETA-ESTIMATES,
 AND THE P-VALUE IS GIVEN FOR THE NULL HYPOTHESIS THAT THE TRUE MEAN IS 0.

 ETABAR:         2.0472E-02 -4.4871E-03
 SE:             2.9760E-02  5.1977E-02

 P VAL.:         4.9152E-01  9.3121E-01

 ETAshrink(%):   4.0383E+01  5.9766E+00
 EPSshrink(%):   2.8574E+01

 #TERE:

 ********************                 FIRST ORDER CONDITIONAL ESTIMATION (EVALUATION)                ********************
 #OBJT:**************                       MINIMUM VALUE OF OBJECTIVE FUNCTION                      ********************
 #OBJV:********************************************      740.639       **************************************************

 ********************                 FIRST ORDER CONDITIONAL ESTIMATION (EVALUATION)                ********************
 ********************                             FINAL PARAMETER ESTIMATE                           ********************

 THETA - VECTOR OF FIXED EFFECTS PARAMETERS   *********
         TH 1      TH 2
         5.16E-03  1.41E+00

 OMEGA - COV MATRIX FOR RANDOM EFFECTS - ETAS  ********
            ETA1      ETA2
 ETA1
+        1.50E-01
 ETA2
+        0.00E+00  1.83E-01

 SIGMA - COV MATRIX FOR RANDOM EFFECTS - EPSILONS  ****
            EPS1
 EPS1
+        1.83E-02
