Thu May 23 12:12:14 CEST 2013
$PROBLEM    MOXONIDINE PK,FINAL ESTIMATES,ALL DATA
;;

;;
$INPUT      ID VISI XAT2=DROP DGRP=DROP DOSE=DROP FLAG=DROP ONO=DROP
            XIME=DROP DVO=DROP NEUY SCR AGE SEX NYHA WT DROP ACE DIG
            DIU NUMB=DROP TAD TIME VIDD=DROP CRCL AMT SS II DROP
            CMT=DROP CONO=DROP DV EVID=DROP OVID=DROP DROP SHR2=DROP
            NYHDI=DROP
$DATA       mx20.csv IGNORE=#
$SUBROUTINE ADVAN2 TRANS1
$PK

;-----------OCCASIONS----------
   VIS3               = 0
   IF(VISI.EQ.3) VIS3 = 1
   VIS8               = 0
   IF(VISI.EQ.8) VIS8 = 1

;----------IOV--------------------

   KPCL  = VIS3*ETA(4)+VIS8*ETA(5)
   KPKA  = VIS3*ETA(6)+VIS8*ETA(7)

; --------------- Remove block structure to be able fo fix variances/covariances within a block ----------------------

; ---- IIV ---

; Diagonal (Variance)
OM11   = THETA(6)
OM22   = THETA(7)

; Off-diagonal (Correlation)
COR12  = THETA(8)

; Off-diagonal (Covariance)
COV12  = SQRT(OM11*OM22)*COR12

; Random effect 1
P1     = SQRT(OM11)*ETA(1)

; Random effect 2
DP12   = COV12/SQRT(OM11)    ; = SQRT(OM22)*COR12
P2     = DP12*ETA(1) + SQRT(OM22-(DP12*DP12))*ETA(2)

;---------- PK model ------------------

   TVCL  = THETA(1)
   TVV   = THETA(2)

   CL    = TVCL*EXP(P1)*EXP(KPCL)
   V     = TVV*EXP(P2)
   KA    = THETA(3)*EXP(ETA(3)+KPKA)
   ALAG1 = THETA(4)
   K     = CL/V
   S2    = V

$ERROR

IPRED = LOG(.025)
IF(F.GT.0) IPRED = LOG(F)

W     = THETA(5)
IRES  = IPRED-DV
IWRES = IRES/W

Y     = IPRED+EPS(1)*W

$THETA  (0,26.6815) ; CL
$THETA  (0,110.275) ; V
$THETA  (0,4.49465) ; KA
$THETA  (0,0.240122) ; TLAG
$THETA  (0,0.330604) ; RUV
$THETA  (0,0.330604) ; VAR CL
$THETA  (0,0.330604) ; VAR V
$THETA  (0,0.7,1) ; CORR VAR CL-V
$OMEGA  1  FIX  ;     IIV CL
$OMEGA  1  FIX  ;      IIV V
$OMEGA  2.81618  ;     VAR KA
$OMEGA  BLOCK(1)
 0.0147009  ; IOV CL OCC1
$OMEGA  BLOCK(1) SAME

$OMEGA  BLOCK(1)
 0.506018  ; IOV KA OCC1
$OMEGA  BLOCK(1) SAME

$SIGMA  1  FIX
$SIMULATION (12345) NSUB=3
$ESTIMATION METHOD=0 MAXEVALS=100
$ESTIMATION METHOD=IMP INTERACTION EONLY=1 NITER=4 ISAMPLE=30 SIGL=10
            NOPRIOR=1
;$TABLE ID TIME DV MDV EVID IPRED IWRES ONEHEADER NOPRINT FILE=sdtab1correl

$PROBLEM    MOXONIDINE PK,FINAL ESTIMATES,ALL DATA
;;

;;
$INPUT      ID VISI XAT2=DROP DGRP=DROP DOSE=DROP FLAG=DROP ONO=DROP
            XIME=DROP DVO=DROP NEUY SCR AGE SEX NYHA WT DROP ACE DIG
            DIU NUMB=DROP TAD TIME VIDD=DROP CRCL AMT SS II DROP
            CMT=DROP CONO=DROP DV EVID=DROP OVID=DROP DROP SHR2=DROP
            NYHDI=DROP
$DATA       mx20.csv REWIND IGNORE=#
$THETA  (0,26.6815) ; CL
$THETA  (0,110.275) ; V
$THETA  (0,4.49465) ; KA
$THETA  (0,0.240122) ; TLAG
$THETA  (0,0.330604) ; RUV
$THETA  (0,0.330604) ; VAR CL
$THETA  (0,0.330604) ; VAR V
$THETA  (0,0.7,1) ; CORR VAR CL-V
$OMEGA  1  FIX  ;     IIV CL
$OMEGA  1  FIX  ;      IIV V
$OMEGA  2.81618  ;     VAR KA
$OMEGA  BLOCK(1)
 0.0147009  ; IOV CL OCC1
$OMEGA  BLOCK(1) SAME

$OMEGA  BLOCK(1)
 0.506018  ; IOV KA OCC1
$OMEGA  BLOCK(1) SAME

$SIGMA  1  FIX
$SIMULATION (354) NSUB=2
$ESTIMATION METHOD=BAYES INTERACTION NBURN=100 NITER=100 CTYPE=3
            PRINT=100 CITER=10 CALPHA=0.05 NOPRIOR=0
$ESTIMATION METHOD=0 MAXEVALS=100
;$TABLE ID TIME DV MDV EVID IPRED IWRES ONEHEADER NOPRINT FILE=sdtab1correl

NM-TRAN MESSAGES
 WARNINGS AND ERRORS (IF ANY) FOR PROBLEM    1
 (WARNING  2) NM-TRAN INFERS THAT THE DATA ARE POPULATION.
 WARNINGS AND ERRORS (IF ANY) FOR PROBLEM    2
 (WARNING  2) NM-TRAN INFERS THAT THE DATA ARE POPULATION.

1NONLINEAR MIXED EFFECTS MODEL PROGRAM (NONMEM) VERSION 7.3 (Beta Version a6.5)
 ORIGINALLY DEVELOPED BY STUART BEAL, LEWIS SHEINER, AND ALISON BOECKMANN
 CURRENT DEVELOPERS ARE ROBERT BAUER, ICON DEVELOPMENT SOLUTIONS,
 AND ALISON BOECKMANN. IMPLEMENTATION, EFFICIENCY, AND STANDARDIZATION
 PERFORMED BY NOUS INFOSYSTEMS.
 PROBLEM NO.:         1
 MOXONIDINE PK,FINAL ESTIMATES,ALL DATA
 TOT. NO. OF OBS RECS:     1021
 TOT. NO. OF INDIVIDUALS:     74
 ONE COMPARTMENT MODEL WITH FIRST-ORDER ABSORPTION (ADVAN2)
 PROBLEM NO.:         1     SUBPROBLEM NO.:      1
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 SIMULATION STEP PERFORMED
 #TBLN:      1
 #METH: First Order
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
 #TERM:
0MINIMIZATION TERMINATED
 DUE TO MAX. NO. OF FUNCTION EVALUATIONS EXCEEDED
 NO. OF FUNCTION EVALUATIONS USED:      110
 NO. OF SIG. DIGITS UNREPORTABLE

 #TERE:
 Elapsed estimation time in seconds:     0.73

 ********************                                   FIRST ORDER                                  ********************
 #OBJT:**************                       MINIMUM VALUE OF OBJECTIVE FUNCTION                      ********************
 #OBJV:********************************************     -397.650       **************************************************

 ********************                                   FIRST ORDER                                  ********************
 ********************                             FINAL PARAMETER ESTIMATE                           ********************

 THETA - VECTOR OF FIXED EFFECTS PARAMETERS   *********
         TH 1      TH 2      TH 3      TH 4      TH 5      TH 6      TH 7      TH 8
         2.80E+01  1.14E+02  2.66E+00  2.22E-01  3.63E-01  4.85E-01  5.83E-01  7.09E-01

 OMEGA - COV MATRIX FOR RANDOM EFFECTS - ETAS  ********
            ETA1      ETA2      ETA3      ETA4      ETA5      ETA6      ETA7
 ETA1
+        1.00E+00
 ETA2
+        0.00E+00  1.00E+00
 ETA3
+        0.00E+00  0.00E+00  3.63E-02
 ETA4
+        0.00E+00  0.00E+00  0.00E+00  1.52E-02
 ETA5
+        0.00E+00  0.00E+00  0.00E+00  0.00E+00  1.52E-02
 ETA6
+        0.00E+00  0.00E+00  0.00E+00  0.00E+00  0.00E+00  1.05E+00
 ETA7
+        0.00E+00  0.00E+00  0.00E+00  0.00E+00  0.00E+00  0.00E+00  1.05E+00

 SIGMA - COV MATRIX FOR RANDOM EFFECTS - EPSILONS  ****
            EPS1
 EPS1
+        1.00E+00

 OMEGA - CORR MATRIX FOR RANDOM EFFECTS - ETAS  *******
            ETA1      ETA2      ETA3      ETA4      ETA5      ETA6      ETA7
 ETA1
+        1.00E+00
 ETA2
+        0.00E+00  1.00E+00
 ETA3
+        0.00E+00  0.00E+00  1.90E-01
 ETA4
+        0.00E+00  0.00E+00  0.00E+00  1.23E-01
 ETA5
+        0.00E+00  0.00E+00  0.00E+00  0.00E+00  1.23E-01
 ETA6
+        0.00E+00  0.00E+00  0.00E+00  0.00E+00  0.00E+00  1.02E+00
 ETA7
+        0.00E+00  0.00E+00  0.00E+00  0.00E+00  0.00E+00  0.00E+00  1.02E+00

 SIGMA - CORR MATRIX FOR RANDOM EFFECTS - EPSILONS  ***
            EPS1
 EPS1
+        1.00E+00
 #TBLN:      2
 #METH: Objective Function Evaluation by Importance Sampling (No Prior)
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
 #TERM:
 EXPECTATION ONLY PROCESS COMPLETED


 ETABAR IS THE ARITHMETIC MEAN OF THE ETA-ESTIMATES,
 AND THE P-VALUE IS GIVEN FOR THE NULL HYPOTHESIS THAT THE TRUE MEAN IS 0.

 ETABAR:        -2.0426E-01 -3.7547E-02  1.4822E-02 -1.0723E-02 -8.4353E-03 -9.0132E-02  6.7166E-02
 SE:             1.1228E-01  8.7045E-02  1.2459E-02  8.2135E-03  9.1523E-03  1.0364E-01  9.2168E-02

 P VAL.:         6.8886E-02  6.6621E-01  2.3417E-01  1.9172E-01  3.5671E-01  3.8447E-01  4.6616E-01

 ETAshrink(%):   2.7510E+00  2.4610E+01  4.3342E+01  4.2366E+01  3.5779E+01  1.2365E+01  2.2064E+01
 EPSshrink(%):   1.4404E+01

 #TERE:
 Elapsed estimation time in seconds:     0.77

 ********************         OBJECTIVE FUNCTION EVALUATION BY IMPORTANCE SAMPLING (NO PRIOR)        ********************
 #OBJT:**************                        FINAL VALUE OF OBJECTIVE FUNCTION                       ********************
 #OBJV:********************************************     -293.361       **************************************************

 ********************         OBJECTIVE FUNCTION EVALUATION BY IMPORTANCE SAMPLING (NO PRIOR)        ********************
 ********************                             FINAL PARAMETER ESTIMATE                           ********************

 THETA - VECTOR OF FIXED EFFECTS PARAMETERS   *********
         TH 1      TH 2      TH 3      TH 4      TH 5      TH 6      TH 7      TH 8
         2.80E+01  1.14E+02  2.66E+00  2.22E-01  3.63E-01  4.85E-01  5.83E-01  7.09E-01

 OMEGA - COV MATRIX FOR RANDOM EFFECTS - ETAS  ********
            ETA1      ETA2      ETA3      ETA4      ETA5      ETA6      ETA7
 ETA1
+        1.00E+00
 ETA2
+        0.00E+00  1.00E+00
 ETA3
+        0.00E+00  0.00E+00  3.63E-02
 ETA4
+        0.00E+00  0.00E+00  0.00E+00  1.52E-02
 ETA5
+        0.00E+00  0.00E+00  0.00E+00  0.00E+00  1.52E-02
 ETA6
+        0.00E+00  0.00E+00  0.00E+00  0.00E+00  0.00E+00  1.05E+00
 ETA7
+        0.00E+00  0.00E+00  0.00E+00  0.00E+00  0.00E+00  0.00E+00  1.05E+00

 SIGMA - COV MATRIX FOR RANDOM EFFECTS - EPSILONS  ****
            EPS1
 EPS1
+        1.00E+00

 OMEGA - CORR MATRIX FOR RANDOM EFFECTS - ETAS  *******
            ETA1      ETA2      ETA3      ETA4      ETA5      ETA6      ETA7
 ETA1
+        1.00E+00
 ETA2
+        0.00E+00  1.00E+00
 ETA3
+        0.00E+00  0.00E+00  1.90E-01
 ETA4
+        0.00E+00  0.00E+00  0.00E+00  1.23E-01
 ETA5
+        0.00E+00  0.00E+00  0.00E+00  0.00E+00  1.23E-01
 ETA6
+        0.00E+00  0.00E+00  0.00E+00  0.00E+00  0.00E+00  1.02E+00
 ETA7
+        0.00E+00  0.00E+00  0.00E+00  0.00E+00  0.00E+00  0.00E+00  1.02E+00

 SIGMA - CORR MATRIX FOR RANDOM EFFECTS - EPSILONS  ***
            EPS1
 EPS1
+        1.00E+00
 PROBLEM NO.:         1     SUBPROBLEM NO.:      2
 SIMULATION STEP PERFORMED
 #TBLN:      3
 #METH: First Order
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
 #TERM:
0MINIMIZATION TERMINATED
 DUE TO MAX. NO. OF FUNCTION EVALUATIONS EXCEEDED
 NO. OF FUNCTION EVALUATIONS USED:      105
 NO. OF SIG. DIGITS UNREPORTABLE

 #TERE:
 Elapsed estimation time in seconds:     0.73

 ********************                                   FIRST ORDER                                  ********************
 #OBJT:**************                       MINIMUM VALUE OF OBJECTIVE FUNCTION                      ********************
 #OBJV:********************************************     -282.008       **************************************************

 ********************                                   FIRST ORDER                                  ********************
 ********************                             FINAL PARAMETER ESTIMATE                           ********************

 THETA - VECTOR OF FIXED EFFECTS PARAMETERS   *********
         TH 1      TH 2      TH 3      TH 4      TH 5      TH 6      TH 7      TH 8
         3.26E+01  1.66E+02  1.64E+00  2.14E-01  3.54E-01  5.04E-01  6.74E-01  5.66E-01

 OMEGA - COV MATRIX FOR RANDOM EFFECTS - ETAS  ********
            ETA1      ETA2      ETA3      ETA4      ETA5      ETA6      ETA7
 ETA1
+        1.00E+00
 ETA2
+        0.00E+00  1.00E+00
 ETA3
+        0.00E+00  0.00E+00  7.27E-01
 ETA4
+        0.00E+00  0.00E+00  0.00E+00  4.26E-02
 ETA5
+        0.00E+00  0.00E+00  0.00E+00  0.00E+00  4.26E-02
 ETA6
+        0.00E+00  0.00E+00  0.00E+00  0.00E+00  0.00E+00  1.02E+00
 ETA7
+        0.00E+00  0.00E+00  0.00E+00  0.00E+00  0.00E+00  0.00E+00  1.02E+00

 SIGMA - COV MATRIX FOR RANDOM EFFECTS - EPSILONS  ****
            EPS1
 EPS1
+        1.00E+00

 OMEGA - CORR MATRIX FOR RANDOM EFFECTS - ETAS  *******
            ETA1      ETA2      ETA3      ETA4      ETA5      ETA6      ETA7
 ETA1
+        1.00E+00
 ETA2
+        0.00E+00  1.00E+00
 ETA3
+        0.00E+00  0.00E+00  8.53E-01
 ETA4
+        0.00E+00  0.00E+00  0.00E+00  2.07E-01
 ETA5
+        0.00E+00  0.00E+00  0.00E+00  0.00E+00  2.07E-01
 ETA6
+        0.00E+00  0.00E+00  0.00E+00  0.00E+00  0.00E+00  1.01E+00
 ETA7
+        0.00E+00  0.00E+00  0.00E+00  0.00E+00  0.00E+00  0.00E+00  1.01E+00

 SIGMA - CORR MATRIX FOR RANDOM EFFECTS - EPSILONS  ***
            EPS1
 EPS1
+        1.00E+00
 #TBLN:      4
 #METH: Objective Function Evaluation by Importance Sampling (No Prior)
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
 #TERM:
 EXPECTATION ONLY PROCESS COMPLETED


 ETABAR IS THE ARITHMETIC MEAN OF THE ETA-ESTIMATES,
 AND THE P-VALUE IS GIVEN FOR THE NULL HYPOTHESIS THAT THE TRUE MEAN IS 0.

 ETABAR:        -3.3594E-01 -3.0653E-01  7.3194E-02  3.1230E-04  2.0030E-04  6.7938E-02  2.3722E-02
 SE:             1.0274E-01  7.5859E-02  7.5227E-02  1.3094E-02  1.3310E-02  8.9714E-02  7.5642E-02

 P VAL.:         1.0763E-03  5.3285E-05  3.3056E-01  9.8097E-01  9.8799E-01  4.4888E-01  7.5382E-01

 ETAshrink(%):   1.1017E+01  3.4298E+01  2.3609E+01  4.5087E+01  4.4180E+01  2.2987E+01  3.5066E+01
 EPSshrink(%):   1.5621E+01

 #TERE:
 Elapsed estimation time in seconds:     0.79

 ********************         OBJECTIVE FUNCTION EVALUATION BY IMPORTANCE SAMPLING (NO PRIOR)        ********************
 #OBJT:**************                        FINAL VALUE OF OBJECTIVE FUNCTION                       ********************
 #OBJV:********************************************     -189.621       **************************************************

 ********************         OBJECTIVE FUNCTION EVALUATION BY IMPORTANCE SAMPLING (NO PRIOR)        ********************
 ********************                             FINAL PARAMETER ESTIMATE                           ********************

 THETA - VECTOR OF FIXED EFFECTS PARAMETERS   *********
         TH 1      TH 2      TH 3      TH 4      TH 5      TH 6      TH 7      TH 8
         3.26E+01  1.66E+02  1.64E+00  2.14E-01  3.54E-01  5.04E-01  6.74E-01  5.66E-01

 OMEGA - COV MATRIX FOR RANDOM EFFECTS - ETAS  ********
            ETA1      ETA2      ETA3      ETA4      ETA5      ETA6      ETA7
 ETA1
+        1.00E+00
 ETA2
+        0.00E+00  1.00E+00
 ETA3
+        0.00E+00  0.00E+00  7.27E-01
 ETA4
+        0.00E+00  0.00E+00  0.00E+00  4.26E-02
 ETA5
+        0.00E+00  0.00E+00  0.00E+00  0.00E+00  4.26E-02
 ETA6
+        0.00E+00  0.00E+00  0.00E+00  0.00E+00  0.00E+00  1.02E+00
 ETA7
+        0.00E+00  0.00E+00  0.00E+00  0.00E+00  0.00E+00  0.00E+00  1.02E+00

 SIGMA - COV MATRIX FOR RANDOM EFFECTS - EPSILONS  ****
            EPS1
 EPS1
+        1.00E+00

 OMEGA - CORR MATRIX FOR RANDOM EFFECTS - ETAS  *******
            ETA1      ETA2      ETA3      ETA4      ETA5      ETA6      ETA7
 ETA1
+        1.00E+00
 ETA2
+        0.00E+00  1.00E+00
 ETA3
+        0.00E+00  0.00E+00  8.53E-01
 ETA4
+        0.00E+00  0.00E+00  0.00E+00  2.07E-01
 ETA5
+        0.00E+00  0.00E+00  0.00E+00  0.00E+00  2.07E-01
 ETA6
+        0.00E+00  0.00E+00  0.00E+00  0.00E+00  0.00E+00  1.01E+00
 ETA7
+        0.00E+00  0.00E+00  0.00E+00  0.00E+00  0.00E+00  0.00E+00  1.01E+00

 SIGMA - CORR MATRIX FOR RANDOM EFFECTS - EPSILONS  ***
            EPS1
 EPS1
+        1.00E+00
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