Wed Aug  5 11:36:45 CEST 2015
$PROBLEM    MOXONIDINE PK ANALYSIS 1
$INPUT      ID VISI XAT2 DGRP DOSE FLAG ONO XIME DVO NEUY SCR AGE SEX
            NYHA WT COMP ACE DIG DIU NUMB TAD TIME VIDD CLCR AMT SS II
            VID CMT CONO DV EVID OVID
$DATA      mox_simulated.csv IGNORE=@
$ABBREVIATED DERIV2=NO COMRES=6
$SUBROUTINE ADVAN2 TRANS1
$PK
   TVCL  = THETA(1)
   TVV   = THETA(2)
   TVKA  = THETA(3)
   TVLAG   = THETA(4)

   CL    = TVCL*EXP(ETA(1))
   V     = TVV*EXP(ETA(2))
   KA    = TVKA*EXP(ETA(3))
   LAG   = TVLAG*EXP(0)
   TVPHI   = LOG(LAG/(1-LAG))
   PHI   = TVPHI + (0)
   ALAG1 = EXP(PHI)/(1+EXP(PHI))
   K     = CL/V
   S2    = V

$ERROR

     IPRED = LOG(.025)
     W     = THETA(5)
     IF(F.GT.0) IPRED = LOG(F)
     IRES  = IPRED-DV
     IWRES = IRES/W
     Y     = IPRED+ERR(1)*W

$THETA  (0,34.8488030908397)
 (0,28.4788851140942)
 (0,0.294703064040853)
 (0,0.0615579315540197)
 (0,0.339516872133039)
$OMEGA  BLOCK(1)
 0.481256819078822
$OMEGA  BLOCK(2)
 1.09142347279116
 0.00122918255042773 0.16629229817654
$SIGMA  1  FIX
$ESTIMATION METHOD=COND MAXEVALS=10

$PROBLEM    MOXONIDINE PK ANALYSIS 2
$INPUT      ID VISI XAT2 DGRP DOSE FLAG ONO XIME DVO NEUY SCR AGE SEX
            NYHA WT COMP ACE DIG DIU NUMB TAD TIME VIDD CLCR AMT SS II
            VID CMT CONO DV EVID OVID
$DATA      mox_simulated.csv IGNORE=@ REWIND
$THETA  (0,32.2266000437492)
 (0,24.6684295434689)
 (0,0.264246544634778)
 (0,0.0909786438244239)
 (0,0.342127454628703)
$OMEGA  BLOCK(1)
 0.481841485896608
$OMEGA  BLOCK(2)
 0.671864822189609
 -0.0728582057817448 0.253979462016649
$SIGMA  1  FIX
$SIMULATION (1234) NSUB=2 ONLYSIM

$PROBLEM    MOXONIDINE PK ANALYSIS 3
$INPUT      ID VISI XAT2 DGRP DOSE FLAG ONO XIME DVO NEUY SCR AGE SEX
            NYHA WT COMP ACE DIG DIU NUMB TAD TIME VIDD CLCR AMT SS II
            VID CMT CONO DV EVID OVID
$DATA      mox_simulated.csv IGNORE=@ REWIND
$THETA  (0,29.4198020415728)
 (0,15.5211312494165)
 (0,0.281033059136737)
 (0,0.117127251372318)
 (0,0.32595932141402)
$OMEGA  BLOCK(1)
 0.420955551996451
$OMEGA  BLOCK(2)
 1.29506614090658
 0.166334326682063 0.210966646098435
$SIGMA  1  FIX
$ESTIMATION METHOD=COND MAXEVALS=10
$ESTIMATION METHOD=ZERO MAXEVALS=0

$PROBLEM    MOXONIDINE PK ANALYSIS 4
$INPUT      ID VISI XAT2 DGRP DOSE FLAG ONO XIME DVO NEUY SCR AGE SEX
            NYHA WT COMP ACE DIG DIU NUMB TAD TIME VIDD CLCR AMT SS II
            VID CMT CONO DV EVID OVID
$DATA      mox_simulated.csv IGNORE=@ REWIND
$THETA  (0,27.113132195712)
 (0,16.3000792413967)
 (0,0.306547288052413)
 (0,0.0953857304613286)
 (0,0.327872479241371)
$OMEGA  BLOCK(1)
 0.296394938225528
$OMEGA  BLOCK(2)
 1.42347111954326
 0.219417306143209 0.236512534208442
$SIGMA  1  FIX
$SIMULATION (123) NSUB=2
$ESTIMATION METHOD=COND POSTHOC MAXEVAL=0

$PROBLEM    MOXONIDINE PK ANALYSIS 5
$INPUT      ID VISI XAT2 DGRP DOSE FLAG ONO XIME DVO NEUY SCR AGE SEX
            NYHA WT COMP ACE DIG DIU NUMB TAD TIME VIDD CLCR AMT SS II
            VID CMT CONO DV EVID OVID
$DATA      mox_simulated.csv IGNORE=@ REWIND
$THETA  (0,30.7092123998741)
 (0,18.6840423870785)
 (0,0.298812799150132)
 (0,0.107086483003439)
 (0,0.317968471969237)
$OMEGA  BLOCK(1)
 0.53024502486894
$OMEGA  BLOCK(2)
 1.76678793213033
 0.245895798387443 0.2268121283362
$SIGMA  1  FIX
$SIMULATION (1234) NSUB=3
$ESTIMATION METHOD=COND MAXEVALS=10
$ESTIMATION METHOD=COND MAXEVALS=0

$PROBLEM    MOXONIDINE PK ANALYSIS 6
$INPUT      ID VISI XAT2 DGRP DOSE FLAG ONO XIME DVO NEUY SCR AGE SEX
            NYHA WT COMP ACE DIG DIU NUMB TAD TIME VIDD CLCR AMT SS II
            VID CMT CONO DV EVID OVID
$DATA      mox_simulated.csv IGNORE=@ REWIND
$THETA  (0,29.7900305812078)
 (0,23.397913604676)
 (0,0.310850565647466)
 (0,0.0684019783434134)
 (0,0.320590012940061)
$OMEGA  BLOCK(1)
 0.504467082209021
$OMEGA  BLOCK(2)
 1.27873738236649
 0.00400163939255638 0.211572496929336
$SIGMA  1  FIX
$ESTIMATION METHOD=ZERO MAXEVALS=10
$ESTIMATION METHOD=COND MAXEVALS=100

$PROBLEM    MOXONIDINE PK ANALYSIS 7
$INPUT      ID VISI XAT2 DGRP DOSE FLAG ONO XIME DVO NEUY SCR AGE SEX
            NYHA WT COMP ACE DIG DIU NUMB TAD TIME VIDD CLCR AMT SS II
            VID CMT CONO DV EVID OVID
$DATA      mox_simulated.csv IGNORE=@ REWIND
$THETA  (0,40.3828623020063)
 (0,27.1250750425571)
 (0,0.308145881589964)
 (0,0.0827447290179198)
 (0,0.333606111492299)
$OMEGA  BLOCK(1)
 0.319748562840761
$OMEGA  BLOCK(2)
 0.846566107845103
 0.0421390689356459 0.238038805471504
$SIGMA  1  FIX
$ESTIMATION METHOD=COND MAXEVALS=0

NM-TRAN MESSAGES
 WARNINGS AND ERRORS (IF ANY) FOR PROBLEM    1
 (WARNING  2) NM-TRAN INFERS THAT THE DATA ARE POPULATION.
 WARNINGS AND ERRORS (IF ANY) FOR PROBLEM    2
 (WARNING  2) NM-TRAN INFERS THAT THE DATA ARE POPULATION.
 WARNINGS AND ERRORS (IF ANY) FOR PROBLEM    3
 (WARNING  2) NM-TRAN INFERS THAT THE DATA ARE POPULATION.
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
1NONLINEAR MIXED EFFECTS MODEL PROGRAM (NONMEM) VERSION 7.4.0 alpha4 (nm74a4)
 ORIGINALLY DEVELOPED BY STUART BEAL, LEWIS SHEINER, AND ALISON BOECKMANN
 CURRENT DEVELOPERS ARE ROBERT BAUER, ICON DEVELOPMENT SOLUTIONS,
 AND ALISON BOECKMANN. IMPLEMENTATION, EFFICIENCY, AND STANDARDIZATION
 PERFORMED BY NOUS INFOSYSTEMS.
 PROBLEM NO.:         1
 MOXONIDINE PK ANALYSIS 1
 TOT. NO. OF OBS RECS:     1022
 TOT. NO. OF INDIVIDUALS:     74
 ONE COMPARTMENT MODEL WITH FIRST-ORDER ABSORPTION (ADVAN2)
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 #TBLN:      1
 #METH: First Order Conditional Estimation
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
 #TERM:
0MINIMIZATION TERMINATED
 DUE TO MAX. NO. OF FUNCTION EVALUATIONS EXCEEDED
 NO. OF FUNCTION EVALUATIONS USED:       16
 NO. OF SIG. DIGITS UNREPORTABLE

 ETABAR IS THE ARITHMETIC MEAN OF THE ETA-ESTIMATES,
 AND THE P-VALUE IS GIVEN FOR THE NULL HYPOTHESIS THAT THE TRUE MEAN IS 0.

 ETABAR:        -4.2709E-02 -9.2589E-02  2.4402E-02
 SE:             7.4038E-02  1.0429E-01  4.5869E-02
 N:                      74          74          74

 P VAL.:         5.6404E-01  3.7466E-01  5.9472E-01

 ETAshrink(%):   5.9210E+00  1.3277E+01  4.5901E+00
 EBVshrink(%):   1.0322E+00  9.2639E+00  1.0197E+01
 EPSshrink(%):   7.6888E+00

 #TERE:
 Elapsed estimation  time in seconds:     0.31
 Elapsed postprocess time in seconds:     0.00

 ********************                        FIRST ORDER CONDITIONAL ESTIMATION                      ********************
 #OBJT:**************                       MINIMUM VALUE OF OBJECTIVE FUNCTION                      ********************
 #OBJV:********************************************     -560.949       **************************************************

 ********************                        FIRST ORDER CONDITIONAL ESTIMATION                      ********************
 ********************                             FINAL PARAMETER ESTIMATE                           ********************

 THETA - VECTOR OF FIXED EFFECTS PARAMETERS   *********
         TH 1      TH 2      TH 3      TH 4      TH 5
         3.43E+01  2.79E+01  2.98E-01  6.17E-02  3.29E-01

 OMEGA - COV MATRIX FOR RANDOM EFFECTS - ETAS  ********
         ETA1      ETA2      ETA3
 ETA1
+        4.65E-01
 ETA2
+        0.00E+00  1.08E+00
 ETA3
+        0.00E+00  1.23E-03  1.73E-01

 SIGMA - COV MATRIX FOR RANDOM EFFECTS - EPSILONS  ****
         EPS1
 EPS1
+        1.00E+00

 OMEGA - CORR MATRIX FOR RANDOM EFFECTS - ETAS  *******
         ETA1      ETA2      ETA3
 ETA1
+        6.82E-01
 ETA2
+        0.00E+00  1.04E+00
 ETA3
+        0.00E+00  2.84E-03  4.16E-01

 SIGMA - CORR MATRIX FOR RANDOM EFFECTS - EPSILONS  ***
         EPS1
 EPS1
+        1.00E+00

 PROBLEM NO.:         2
 MOXONIDINE PK ANALYSIS 2
 TOT. NO. OF OBS RECS:     1022
 TOT. NO. OF INDIVIDUALS:     74
 PROBLEM NO.:           2      SUBPROBLEM NO.:           1
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 SIMULATION STEP PERFORMED
 Elapsed simulation  time in seconds:     0.00
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 #CPUT: Total CPU Time in Seconds,        3.785
