Thu Aug  6 14:30:01 CEST 2015
$PROBLEM    MOXONIDINE PK ANALYSIS 1
$INPUT      ID VISI XAT2 DGRP DOSE FLAG ONO XIME DVO NEUY SCR AGE SEX
            NYHA WT COMP ACE DIG DIU NUMB TAD TIME VIDD CLCR AMT SS II
            VID CMT CONO DV EVID OVID
$DATA      mox_simulated.csv IGNORE=@
$ABBREVIATED DERIV2=NO COMRES=6
$SUBROUTINE ADVAN2 TRANS1
$PK
   TVCL  = THETA(1)
   TVV   = THETA(2)
   TVKA  = THETA(3)
   TVLAG   = THETA(4)

   CL    = TVCL*EXP(ETA(1))
   V     = TVV*EXP(ETA(2))
   KA    = TVKA*EXP(ETA(3))
   LAG   = TVLAG*EXP(0)
   TVPHI   = LOG(LAG/(1-LAG))
   PHI   = TVPHI + (0)
   ALAG1 = EXP(PHI)/(1+EXP(PHI))
   K     = CL/V
   S2    = V

$ERROR

     IPRED = LOG(.025)
     W     = THETA(5)
     IF(F.GT.0) IPRED = LOG(F)
     IRES  = IPRED-DV
     IWRES = IRES/W
     Y     = IPRED+ERR(1)*W

$THETA  (0,34.8488030908397)
 (0,28.4788851140942)
 (0,0.294703064040853)
 (0,0.0615579315540197)
 (0,0.339516872133039)
$OMEGA  BLOCK(1)
 0.481256819078822
$OMEGA  BLOCK(2)
 1.09142347279116
 0.00122918255042773 0.16629229817654
$SIGMA  1  FIX
$SIMULATION (1234) NSUB=1
$ESTIMATION METHOD=COND INTER LAPLACE MAXEVALS=0

$PROBLEM    MOXONIDINE PK ANALYSIS 2
$INPUT      ID VISI XAT2 DGRP DOSE FLAG ONO XIME DVO NEUY SCR AGE SEX
            NYHA WT COMP ACE DIG DIU NUMB TAD TIME VIDD CLCR AMT SS II
            VID CMT CONO DV EVID OVID
$DATA      mox_simulated.csv IGNORE=@ REWIND
$THETA  (0,27.113132195712)
 (0,16.3000792413967)
 (0,0.306547288052413)
 (0,0.0953857304613286)
 (0,0.327872479241371)
$OMEGA  BLOCK(1)
 0.296394938225528
$OMEGA  BLOCK(2)
 1.42347111954326
 0.219417306143209 0.236512534208442
$SIGMA  1  FIX
$SIMULATION (1234) NSUB=1
$ESTIMATION METH=IMP INTER PRINT=1 NITER=0 ISAMPLE=100 EONLY=0
            MAPITER=0

$PROBLEM    MOXONIDINE PK ANALYSIS 2
$INPUT      ID VISI XAT2 DGRP DOSE FLAG ONO XIME DVO NEUY SCR AGE SEX
            NYHA WT COMP ACE DIG DIU NUMB TAD TIME VIDD CLCR AMT SS II
            VID CMT CONO DV EVID OVID
$DATA      mox_simulated.csv IGNORE=@ REWIND
$THETA  (0,27.113132195712)
 (0,16.3000792413967)
 (0,0.306547288052413)
 (0,0.0953857304613286)
 (0,0.327872479241371)
$OMEGA  BLOCK(1)
 0.296394938225528
$OMEGA  BLOCK(2)
 1.42347111954326
 0.219417306143209 0.236512534208442
$SIGMA  1  FIX
$SIMULATION (1234) NSUB=1
$ESTIMATION METH=IMP INTER PRINT=1 NITER=0 ISAMPLE=100 EONLY=1
            MAPITER=0

$PROBLEM    MOXONIDINE PK ANALYSIS 2
$INPUT      ID VISI XAT2 DGRP DOSE FLAG ONO XIME DVO NEUY SCR AGE SEX
            NYHA WT COMP ACE DIG DIU NUMB TAD TIME VIDD CLCR AMT SS II
            VID CMT CONO DV EVID OVID
$DATA      mox_simulated.csv IGNORE=@ REWIND
$THETA  (0,27.113132195712)
 (0,16.3000792413967)
 (0,0.306547288052413)
 (0,0.0953857304613286)
 (0,0.327872479241371)
$OMEGA  BLOCK(1)
 0.296394938225528
$OMEGA  BLOCK(2)
 1.42347111954326
 0.219417306143209 0.236512534208442
$SIGMA  1  FIX
$SIMULATION (1234) NSUB=1
$ESTIMATION METH=IMP INTER PRINT=1 NITER=1 ISAMPLE=100 EONLY=1
            MAPITER=0

$PROBLEM    MOXONIDINE PK ANALYSIS 2
$INPUT      ID VISI XAT2 DGRP DOSE FLAG ONO XIME DVO NEUY SCR AGE SEX
            NYHA WT COMP ACE DIG DIU NUMB TAD TIME VIDD CLCR AMT SS II
            VID CMT CONO DV EVID OVID
$DATA      mox_simulated.csv IGNORE=@ REWIND
$THETA  (0,27.113132195712)
 (0,16.3000792413967)
 (0,0.306547288052413)
 (0,0.0953857304613286)
 (0,0.327872479241371)
$OMEGA  BLOCK(1)
 0.296394938225528
$OMEGA  BLOCK(2)
 1.42347111954326
 0.219417306143209 0.236512534208442
$SIGMA  1  FIX
$SIMULATION (1234) NSUB=1
$ESTIMATION METH=IMP INTER PRINT=1 NITER=1000 ISAMPLE=100 EONLY=1
            MAPITER=0

$PROBLEM    MOXONIDINE PK ANALYSIS 3
$INPUT      ID VISI XAT2 DGRP DOSE FLAG ONO XIME DVO NEUY SCR AGE SEX
            NYHA WT COMP ACE DIG DIU NUMB TAD TIME VIDD CLCR AMT SS II
            VID CMT CONO DV EVID OVID
$DATA      mox_simulated.csv IGNORE=@ REWIND
$THETA  (0,27.113132195712)
 (0,16.3000792413967)
 (0,0.306547288052413)
 (0,0.0953857304613286)
 (0,0.327872479241371)
$OMEGA  BLOCK(1)
 0.296394938225528
$OMEGA  BLOCK(2)
 1.42347111954326
 0.219417306143209 0.236512534208442
$SIGMA  1  FIX
$SIMULATION (1234) NSUB=1
$ESTIMATION METH=IMPMAP INTER NITER=50 EONLY=1 NBURN=30 ISAMPLE=100
            DF=4 CTYPE=3 NOABORT PRINT=1 CONSTRAIN=5 SIGL=8

$PROBLEM    MOXONIDINE PK ANALYSIS 3
$INPUT      ID VISI XAT2 DGRP DOSE FLAG ONO XIME DVO NEUY SCR AGE SEX
            NYHA WT COMP ACE DIG DIU NUMB TAD TIME VIDD CLCR AMT SS II
            VID CMT CONO DV EVID OVID
$DATA      mox_simulated.csv IGNORE=@ REWIND
$THETA  (0,27.113132195712)
 (0,16.3000792413967)
 (0,0.306547288052413)
 (0,0.0953857304613286)
 (0,0.327872479241371)
$OMEGA  BLOCK(1)
 0.296394938225528
$OMEGA  BLOCK(2)
 1.42347111954326
 0.219417306143209 0.236512534208442
$SIGMA  1  FIX
$SIMULATION (1234) NSUB=1
$ESTIMATION METH=IMPMAP INTER NITER=0 EONLY=1 NBURN=30 ISAMPLE=100
            DF=4 CTYPE=3 NOABORT PRINT=1 CONSTRAIN=5 SIGL=8

$PROBLEM    MOXONIDINE PK ANALYSIS 3
$INPUT      ID VISI XAT2 DGRP DOSE FLAG ONO XIME DVO NEUY SCR AGE SEX
            NYHA WT COMP ACE DIG DIU NUMB TAD TIME VIDD CLCR AMT SS II
            VID CMT CONO DV EVID OVID
$DATA      mox_simulated.csv IGNORE=@ REWIND
$THETA  (0,27.113132195712)
 (0,16.3000792413967)
 (0,0.306547288052413)
 (0,0.0953857304613286)
 (0,0.327872479241371)
$OMEGA  BLOCK(1)
 0.296394938225528
$OMEGA  BLOCK(2)
 1.42347111954326
 0.219417306143209 0.236512534208442
$SIGMA  1  FIX
$SIMULATION (1234) NSUB=1
$ESTIMATION METH=IMPMAP INTER NITER=1 EONLY=1 NBURN=30 ISAMPLE=100
            DF=4 CTYPE=3 NOABORT PRINT=1 CONSTRAIN=5 SIGL=8

NM-TRAN MESSAGES
 WARNINGS AND ERRORS (IF ANY) FOR PROBLEM    1
 (WARNING  2) NM-TRAN INFERS THAT THE DATA ARE POPULATION.
 (WARNING  66) WITH "LAPLACIAN" AND "INTERACTION", "NUMERICAL" AND "SLOW"
 ARE ALSO REQUIRED ON $ESTIM RECORD. NM-TRAN HAS SUPPLIED THESE OPTIONS.
 WARNINGS AND ERRORS (IF ANY) FOR PROBLEM    2
 (WARNING  2) NM-TRAN INFERS THAT THE DATA ARE POPULATION.
 WARNINGS AND ERRORS (IF ANY) FOR PROBLEM    3
 (WARNING  2) NM-TRAN INFERS THAT THE DATA ARE POPULATION.
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
1NONLINEAR MIXED EFFECTS MODEL PROGRAM (NONMEM) VERSION 7.3.0
 ORIGINALLY DEVELOPED BY STUART BEAL, LEWIS SHEINER, AND ALISON BOECKMANN
 CURRENT DEVELOPERS ARE ROBERT BAUER, ICON DEVELOPMENT SOLUTIONS,
 AND ALISON BOECKMANN. IMPLEMENTATION, EFFICIENCY, AND STANDARDIZATION
 PERFORMED BY NOUS INFOSYSTEMS.
 PROBLEM NO.:         1
 MOXONIDINE PK ANALYSIS 1
 TOT. NO. OF OBS RECS:     1022
 TOT. NO. OF INDIVIDUALS:     74
 ONE COMPARTMENT MODEL WITH FIRST-ORDER ABSORPTION (ADVAN2)
 PROBLEM NO.:         1     SUBPROBLEM NO.:      1
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 SIMULATION STEP PERFORMED
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
 ********************          LAPLACIAN CONDITIONAL ESTIMATION WITH INTERACTION (EVALUATION)        ********************
 #OBJT:**************                       MINIMUM VALUE OF OBJECTIVE FUNCTION                      ********************
 #OBJV:********************************************     -638.567       **************************************************

 ********************          LAPLACIAN CONDITIONAL ESTIMATION WITH INTERACTION (EVALUATION)        ********************
 ********************                             FINAL PARAMETER ESTIMATE                           ********************

 THETA - VECTOR OF FIXED EFFECTS PARAMETERS   *********
         TH 1      TH 2      TH 3      TH 4      TH 5
         3.48E+01  2.85E+01  2.95E-01  6.16E-02  3.40E-01

 OMEGA - COV MATRIX FOR RANDOM EFFECTS - ETAS  ********
            ETA1      ETA2      ETA3
 ETA1
+        4.81E-01
 ETA2
+        0.00E+00  1.09E+00
 ETA3
+        0.00E+00  1.23E-03  1.66E-01

 SIGMA - COV MATRIX FOR RANDOM EFFECTS - EPSILONS  ****
            EPS1
 EPS1
+        1.00E+00

 OMEGA - CORR MATRIX FOR RANDOM EFFECTS - ETAS  *******
            ETA1      ETA2      ETA3
 ETA1
+        6.94E-01
 ETA2
+        0.00E+00  1.04E+00
 ETA3
+        0.00E+00  2.89E-03  4.08E-01

 SIGMA - CORR MATRIX FOR RANDOM EFFECTS - EPSILONS  ***
            EPS1
 EPS1
+        1.00E+00

 PROBLEM NO.:         2
 MOXONIDINE PK ANALYSIS 2
 TOT. NO. OF OBS RECS:     1022
 TOT. NO. OF INDIVIDUALS:     74
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 #CPUT: Total CPU Time in Seconds,      132.969
