Mon Jun 22 15:00:32 CEST 2015
$PROBLEM    MOXONIDINE PK ANALYSIS
$INPUT      ID VISI XAT2 DGRP DOSE FLAG ONO XIME DVO NEUY SCR AGE SEX
            NYHA WT COMP ACE DIG DIU NUMB TAD TIME VIDD CLCR AMT SS II
            VID CMT CONO DV EVID OVID
$DATA      mox_simulated.csv IGNORE=@
$ABBREVIATED DERIV2=NO COMRES=6
$SUBROUTINE ADVAN2 TRANS1
$PK
   TVCL  = THETA(1)
   TVV   = THETA(2)
   TVKA  = THETA(3)
   TVLAG   = THETA(4)

   CL    = TVCL*EXP(ETA(1))
   V     = TVV*EXP(ETA(2))
   KA    = TVKA*EXP(ETA(3))
   LAG   = TVLAG*EXP(0)
   TVPHI   = LOG(LAG/(1-LAG))
   PHI   = TVPHI + (0)
   ALAG1 = EXP(PHI)/(1+EXP(PHI))
   K     = CL/V
   S2    = V

$ERROR

     IPRED = LOG(.025)
     W     = THETA(5)
     IF(F.GT.0) IPRED = LOG(F)
     IRES  = IPRED-DV
     IWRES = IRES/W
     Y     = IPRED+ERR(1)*W

$THETA  (0,31.9178378069458)
 (0,18.7271890546045)
 (0,0.291401597748002)
 (0,0.155270263167667)
 (0,0.327633651379425)
$OMEGA  BLOCK(1)
 0.411713190560155
$OMEGA  BLOCK(2)
 1.23928497107081
 0.0725839549530259 0.16550178791203
$SIGMA  1  FIX
$ESTIMATION METHOD=COND MAXEVALS=0

$PROBLEM    MOXONIDINE PK ANALYSIS
$INPUT      ID VISI XAT2 DGRP DOSE FLAG ONO XIME DVO NEUY SCR AGE SEX
            NYHA WT COMP ACE DIG DIU NUMB TAD TIME VIDD CLCR AMT SS II
            VID CMT CONO DV EVID OVID
$DATA      mox_simulated.csv IGNORE=@ REWIND
$THETA  (0,34.0418681231756)
 (0,22.0852079958214)
 (0,0.318449215423196)
 (0,0.106188931129188)
 (0,0.322638275845635)
$OMEGA  BLOCK(1)
 0.303785607646315
$OMEGA  BLOCK(2)
 1.62862008061094
 0.278001143032258 0.367672753338214
$SIGMA  1  FIX
$ESTIMATION METHOD=COND MAXEVALS=0

$PROBLEM    MOXONIDINE PK ANALYSIS
$INPUT      ID VISI XAT2 DGRP DOSE FLAG ONO XIME DVO NEUY SCR AGE SEX
            NYHA WT COMP ACE DIG DIU NUMB TAD TIME VIDD CLCR AMT SS II
            VID CMT CONO DV EVID OVID
$DATA      mox_simulated.csv IGNORE=@ REWIND
$THETA  (0,35.1090951011386)
 (0,21.0307777297032)
 (0,0.318681498352422)
 (0,0.149735208347937)
 (0,0.354765235245716)
$OMEGA  BLOCK(1)
 0.364681217712915
$OMEGA  BLOCK(2)
 1.09825649454092
 0.0497897588917872 0.233173246031556
$SIGMA  1  FIX
$ESTIMATION METHOD=COND MAXEVALS=0

$PROBLEM    MOXONIDINE PK ANALYSIS
$INPUT      ID VISI XAT2 DGRP DOSE FLAG ONO XIME DVO NEUY SCR AGE SEX
            NYHA WT COMP ACE DIG DIU NUMB TAD TIME VIDD CLCR AMT SS II
            VID CMT CONO DV EVID OVID
$DATA      mox_simulated.csv IGNORE=@ REWIND
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$THETA  (0,37.4295945961325)
 (0,22.9406946831546)
 (0,0.29608842164832)
 (0,0.143562848772006)
 (0,0.321000682155283)
$OMEGA  BLOCK(1)
 0.368670059282147
$OMEGA  BLOCK(2)
 1.88018307186044
 0.307765184757883 0.136670681610521
$SIGMA  1  FIX
$ESTIMATION METHOD=COND MAXEVALS=0

$PROBLEM    MOXONIDINE PK ANALYSIS
$INPUT      ID VISI XAT2 DGRP DOSE FLAG ONO XIME DVO NEUY SCR AGE SEX
            NYHA WT COMP ACE DIG DIU NUMB TAD TIME VIDD CLCR AMT SS II
            VID CMT CONO DV EVID OVID
$DATA      mox_simulated.csv IGNORE=@ REWIND
$THETA  (0,32.9429821701151)
 (0,19.4556326465856)
 (0,0.316148079176636)
 (0,0.0908153694702561)
 (0,0.32534688237349)
$OMEGA  BLOCK(1)
 0.286001317372034
$OMEGA  BLOCK(2)
 1.15733720510417
 0.363884698446647 0.261676491683911
$SIGMA  1  FIX
$ESTIMATION METHOD=COND MAXEVALS=0

NM-TRAN MESSAGES
 WARNINGS AND ERRORS (IF ANY) FOR PROBLEM    1
 (WARNING  2) NM-TRAN INFERS THAT THE DATA ARE POPULATION.
 WARNINGS AND ERRORS (IF ANY) FOR PROBLEM    2
 (WARNING  2) NM-TRAN INFERS THAT THE DATA ARE POPULATION.
 WARNINGS AND ERRORS (IF ANY) FOR PROBLEM    3
 (WARNING  2) NM-TRAN INFERS THAT THE DATA ARE POPULATION.
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
1NONLINEAR MIXED EFFECTS MODEL PROGRAM (NONMEM) VERSION 7.4.0 alpha6 (nm74a6)
 ORIGINALLY DEVELOPED BY STUART BEAL, LEWIS SHEINER, AND ALISON BOECKMANN
 CURRENT DEVELOPERS ARE ROBERT BAUER, ICON DEVELOPMENT SOLUTIONS,
 AND ALISON BOECKMANN. IMPLEMENTATION, EFFICIENCY, AND STANDARDIZATION
 PERFORMED BY NOUS INFOSYSTEMS.
 PROBLEM NO.:         1
 MOXONIDINE PK ANALYSIS
 TOT. NO. OF OBS RECS:     1022
 TOT. NO. OF INDIVIDUALS:     74
 ONE COMPARTMENT MODEL WITH FIRST-ORDER ABSORPTION (ADVAN2)
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 #TBLN:      1
 #METH: First Order Conditional Estimation (Evaluation)
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 Elapsed postprocess time in seconds:     0.00

 ********************                 FIRST ORDER CONDITIONAL ESTIMATION (EVALUATION)                ********************
 #OBJT:**************                       MINIMUM VALUE OF OBJECTIVE FUNCTION                      ********************
 #OBJV:********************************************     -559.242       **************************************************

 ********************                 FIRST ORDER CONDITIONAL ESTIMATION (EVALUATION)                ********************
 ********************                             FINAL PARAMETER ESTIMATE                           ********************

 THETA - VECTOR OF FIXED EFFECTS PARAMETERS   *********
         TH 1      TH 2      TH 3      TH 4      TH 5
         3.19E+01  1.87E+01  2.91E-01  1.55E-01  3.28E-01

 OMEGA - COV MATRIX FOR RANDOM EFFECTS - ETAS  ********
         ETA1      ETA2      ETA3
 ETA1
+        4.12E-01
 ETA2
+        0.00E+00  1.24E+00
 ETA3
+        0.00E+00  7.26E-02  1.66E-01

 SIGMA - COV MATRIX FOR RANDOM EFFECTS - EPSILONS  ****
         EPS1
 EPS1
+        1.00E+00

 OMEGA - CORR MATRIX FOR RANDOM EFFECTS - ETAS  *******
         ETA1      ETA2      ETA3
 ETA1
+        6.42E-01
 ETA2
+        0.00E+00  1.11E+00
 ETA3
+        0.00E+00  1.60E-01  4.07E-01

 SIGMA - CORR MATRIX FOR RANDOM EFFECTS - EPSILONS  ***
         EPS1
 EPS1
+        1.00E+00

 PROBLEM NO.:         2
 MOXONIDINE PK ANALYSIS
 TOT. NO. OF OBS RECS:     1022
 TOT. NO. OF INDIVIDUALS:     74
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 #TBLN:      2
 #METH: First Order Conditional Estimation (Evaluation)
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 Elapsed postprocess time in seconds:     0.00

 ********************                 FIRST ORDER CONDITIONAL ESTIMATION (EVALUATION)                ********************
 #OBJT:**************                       MINIMUM VALUE OF OBJECTIVE FUNCTION                      ********************
 #OBJV:********************************************     -555.557       **************************************************

 ********************                 FIRST ORDER CONDITIONAL ESTIMATION (EVALUATION)                ********************
 ********************                             FINAL PARAMETER ESTIMATE                           ********************

 THETA - VECTOR OF FIXED EFFECTS PARAMETERS   *********
         TH 1      TH 2      TH 3      TH 4      TH 5
         3.40E+01  2.21E+01  3.18E-01  1.06E-01  3.23E-01

 OMEGA - COV MATRIX FOR RANDOM EFFECTS - ETAS  ********
         ETA1      ETA2      ETA3
 ETA1
+        3.04E-01
 ETA2
+        0.00E+00  1.63E+00
 ETA3
+        0.00E+00  2.78E-01  3.68E-01

 SIGMA - COV MATRIX FOR RANDOM EFFECTS - EPSILONS  ****
         EPS1
 EPS1
+        1.00E+00

 OMEGA - CORR MATRIX FOR RANDOM EFFECTS - ETAS  *******
         ETA1      ETA2      ETA3
 ETA1
+        5.51E-01
 ETA2
+        0.00E+00  1.28E+00
 ETA3
+        0.00E+00  3.59E-01  6.06E-01

 SIGMA - CORR MATRIX FOR RANDOM EFFECTS - EPSILONS  ***
         EPS1
 EPS1
+        1.00E+00

 PROBLEM NO.:         3
 MOXONIDINE PK ANALYSIS
 TOT. NO. OF OBS RECS:     1022
 TOT. NO. OF INDIVIDUALS:     74
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 #TBLN:      3
 #METH: First Order Conditional Estimation (Evaluation)
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 Elapsed postprocess time in seconds:     0.00

 ********************                 FIRST ORDER CONDITIONAL ESTIMATION (EVALUATION)                ********************
 #OBJT:**************                       MINIMUM VALUE OF OBJECTIVE FUNCTION                      ********************
 #OBJV:********************************************     -551.853       **************************************************

 ********************                 FIRST ORDER CONDITIONAL ESTIMATION (EVALUATION)                ********************
 ********************                             FINAL PARAMETER ESTIMATE                           ********************

 THETA - VECTOR OF FIXED EFFECTS PARAMETERS   *********
         TH 1      TH 2      TH 3      TH 4      TH 5
         3.51E+01  2.10E+01  3.19E-01  1.50E-01  3.55E-01

 OMEGA - COV MATRIX FOR RANDOM EFFECTS - ETAS  ********
         ETA1      ETA2      ETA3
 ETA1
+        3.65E-01
 ETA2
+        0.00E+00  1.10E+00
 ETA3
+        0.00E+00  4.98E-02  2.33E-01

 SIGMA - COV MATRIX FOR RANDOM EFFECTS - EPSILONS  ****
         EPS1
 EPS1
+        1.00E+00

 OMEGA - CORR MATRIX FOR RANDOM EFFECTS - ETAS  *******
         ETA1      ETA2      ETA3
 ETA1
+        6.04E-01
 ETA2
+        0.00E+00  1.05E+00
 ETA3
+        0.00E+00  9.84E-02  4.83E-01

 SIGMA - CORR MATRIX FOR RANDOM EFFECTS - EPSILONS  ***
         EPS1
 EPS1
+        1.00E+00
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 #CPUT: Total CPU Time in Seconds,        4.338
