Wed 10/01/2014
11:01 AM
$PROBLEM    GRT
$INPUT      C STDY ID TRT=DROP PER DAY=DROP SCHT=DROP TIME TSLD
            MFID=DROP DOSE DOEM=DROP AMT AMTM=DROP CONC=DROP DVM=DROP
            DV LDVM=DROP EVID MDV CMT RATE=DROP DUR=DROP BLOQ=DROP
            LLOQ=DROP ABLQ=DROP SAMP=DROP AGE=DROP SEX=DROP RACE=DROP
            WT HT=DROP BMI=DROP BSA=DROP LBM=DROP SCR=DROP CRCL=DROP
            CRCN=DROP ALT=DROP AST TBIL=DROP CONM=DROP FED FORM=DROP
            SPAR=DROP PAT NUM=DROP CY2D CY2C IMPD=DROP RTIM=DROP CRCT
; FORM=1 (oral solution), FORM=2 (tablet), FORM=3 (capsule)

; FED=0 (fasted), FED=1 (fed), FED=2 (Unrestricted), FED=3 (Standard)
$DATA       PKM05CRRRCL.csv IGNORE=C
$SUBROUTINE ADVAN5
$MODEL      COMP=(DOSE,DEFDOSE) COMP=(CENTRAL,DEFOBS) COMP=(PERI1)
            COMP=(BUFFER)
$PK

;expand the number of iterations allowed during minimization search
  " FIRST
  " COMMON/PRCOMG/IDUM1,IDUM2,IMAX,IDUM4,IDUM5
  " INTEGER IDUM1,IDUM2,IMAX,IDUM4,IDUM5
  " IMAX=50000000

IF (PAT.EQ.0) THEN
      PAT1 = 0
      PAT2 = 0
      PAT3 = 0
      PAT4 = 0
ENDIF

IF (PAT.EQ.1) THEN
      PAT1 = 1
      PAT2 = 0
      PAT3 = 0
      PAT4 = 0
ENDIF

IF (PAT.EQ.2) THEN
      PAT1 = 0
      PAT2 = 1
      PAT3 = 0
      PAT4 = 0
ENDIF

IF (PAT.EQ.3) THEN
      PAT1 = 0
      PAT2 = 0
      PAT3 = 1
      PAT4 = 0
ENDIF

IF (PAT.EQ.4) THEN
      PAT1 = 0
      PAT2 = 0
      PAT3 = 0
      PAT4 = 1
ENDIF

  IF (CY2C.EQ.9999)   THEN
      CYC1 = 0
      CYC2 = 0
   ENDIF

  IF (CY2C.EQ.3) THEN
      CYC1 = 1
      CYC2 = 0
   ENDIF


  IF (CY2C.EQ.2) THEN
      CYC1 = 0
      CYC2 = 1
   ENDIF

  IF (CY2D.EQ.9999)   THEN
      CYD1 = 0
      CYD2 = 0
      CYD3 = 0
   ENDIF

  IF (CY2D.EQ.3)      THEN
      CYD1 = 1
      CYD2 = 0
      CYD3 = 0
   ENDIF

  IF (CY2D.EQ.2)      THEN
      CYD1 = 0
      CYD2 = 1
      CYD3 = 0
   ENDIF

  IF (CY2D.EQ.1)      THEN
      CYD1 = 0
      CYD2 = 0
      CYD3 = 1
  ENDIF

  TVCL0 = THETA(1)
  TVCL1  = TVCL0 * (1 + THETA(6)*PAT1)
  TVCL2  = TVCL1 * (1 + THETA(7)*PAT2)
  TVCL3  = TVCL2 * (1 + THETA(8)*PAT3)
  TVCL4  = TVCL3 * (1 + THETA(9)*PAT4)

  TVCL5  = TVCL4 * (1 + THETA(22)*CYC1)
  TVCL6  = TVCL5  * (1 + THETA(23)*CYC2)

  TVCL7  = TVCL6   * (1 + THETA(26)*CYD1)
  TVCL8  = TVCL7  * (1 + THETA(27)*CYD2)
  TVCL9  = TVCL8  * (1 + THETA(28)*CYD3)

  TSCL=TVCL9*(CRCT/113)**THETA(24)
  TMCL=TSCL*(AST/23)**THETA(25)
  CL=(TMCL*(WT/70)**THETA(18))*EXP(ETA(1))              ;clearance

IF (PAT.EQ.0) THEN
   TVV2=THETA(2)
ELSE

   TVV2=THETA(10)
END IF

V2=(TVV2*(WT/70)**THETA(19))*EXP(ETA(2))                     ;central volume

Q=(THETA(3)*(WT/70)**THETA(20))*EXP(ETA(3))                  ;intercompartmental clearance
V3=(THETA(4)*(WT/70)**THETA(21))*EXP(ETA(4))                 ;peripheral volume

IF (PAT.EQ.0) THEN
   TVKA=THETA(5)
ENDIF

IF (PAT.EQ.1) THEN
   TVKA=THETA(11)
ENDIF

IF (PAT.EQ.2) THEN
   TVKA=THETA(12)
ENDIF

IF (PAT.EQ.3) THEN
   TVKA=THETA(13)
ENDIF

IF (PAT.EQ.4) THEN
   TVKA=THETA(14)
ENDIF

K14=TVKA*EXP(ETA(5))            ;absorption rate constant

IF (FED.EQ.0) THEN
      FAT1 = 0
      FAT2 = 0
      FAT3 = 0
   ENDIF

  IF (FED.EQ.1) THEN
      FAT1 = 1
      FAT2 = 0
      FAT3 = 0
   ENDIF


  IF (FED.EQ.2) THEN
      FAT1 = 0
      FAT2 = 1
      FAT3 = 0
   ENDIF

  IF (FED.EQ.3) THEN
      FAT1 = 0
      FAT2 = 0
      FAT3 = 1
   ENDIF

  TVF0 = 1*EXP(ETA(6))

   TVF1  = TVF0 * (1 + THETA(15)*FAT1)
   TVF2  = TVF1 * (1 + THETA(16)*FAT2)
   F1    = TVF2 * (1 + THETA(17)*FAT3)

K42=K14
S2=V2/1000
K20=CL/V2
K23=Q/V2
K32=Q/V3

$ERROR
FLAG=0
IF(F.EQ.0) FLAG=0.001
  W=F
  IPRED=LOG(F+FLAG)
  IRES=DV-IPRED
  IWRES=IRES/IPRED

PPER=ERR(1)
IF (PAT.EQ.1)PPER=ERR(2)
IF (PAT.EQ.4)PPER=ERR(3)
IF (PAT.EQ.2)PPER=ERR(4)
IF (PAT.EQ.3)PPER=ERR(5)
Y=IPRED+PPER

$THETA  (0.,91.0) ; 1 [L/hr] ~CL
$THETA  (0.,2800.0) ; 2 [L]    ~V2
$THETA  (0,67.0) ; 3 [L/hr] ~Q
$THETA  (0,4708) ; 4 [L]    ~V3
$THETA  (0,0.7)
$THETA  0.1 ; 6 [L/hr] ~CL
$THETA  0.1 ; 7 [L/hr] ~CL
$THETA  0.1 ; 8 [L/hr] ~CL
$THETA  0.1 ; 9 [L/hr] ~CL
$THETA  (0.,1500.0) ; 10 [L]    ~V2
$THETA  (0,0.6) ; 11  K14
$THETA  (0,0.4) ; 12  K14
$THETA  (0,0.5) ; 13  K14
$THETA  (0,0.5) ; 14  K14
$THETA  (0,0.2) ; 15  F
$THETA  (0,0.3) ; 16  F
$THETA  0 FIX ; 17  F
$THETA  0.75 ; 18
$THETA  1 ; 19
$THETA  0.75 FIX ; 20
$THETA  1 FIX ; 21
$THETA  0.1 ; 22
$THETA  0.1 ; 23
$THETA  0.1 ; 24
$THETA  0.1 ; 25
$THETA  0.1 ; 26
$THETA  0.1 ; 27
$THETA  0.1 ; 28
$OMEGA  BLOCK(2)
 0.09  ; 1  ~IIV_CL
 0.05 0.1  ; 2  ~IIV_V2
$OMEGA  0  FIX
 0  FIX
 0.1
 0  FIX
$SIGMA  0.09
 0.01
 0.01
 0.01
 0.01
$ESTIMATION MAXEVAL=9990 METHOD=1 INTER NOABORT PRINT=5 NSIGDIGIT=3
$COVARIANCE MATRIX=S
$TABLE      ID TIME IPRED CL V2 Q V3 K14 F1 ETA1 ETA2 ETA3 ETA4 ETA5
            ETA6 MDV EVID PER STDY TSLD DOSE WT FED AST CY2D CY2C CRCT
            NOPRINT ONEHEADER FILE=MYTABfinala
$TABLE      ID TIME IPRED IRES IWRES NOPRINT ONEHEADER
            FILE=SDTABfinala
$TABLE      ID CL V2 Q V3 K14 F1 ETA1 ETA2 ETA3 ETA4 ETA5 ETA6 NOPRINT
            ONEHEADER FILE=PATABfinala
$TABLE      ID CRCT AST NOPRINT ONEHEADER FILE=COTABfinala
$TABLE      ID CY2D CY2C NOPRINT ONEHEADER FILE=CATABfinala

1NONLINEAR MIXED EFFECTS MODEL PROGRAM (NONMEM)    DOUBLE PRECISION NONMEM    VERSION VI LEVEL 1.0
 DEVELOPED AND PROGRAMMED BY STUART BEAL AND LEWIS SHEINER
 PROBLEM NO.:         1
 GRT
 TOT. NO. OF DATA RECS:  13939
 TOT. NO. OF OBS RECS:    6553
 TOT. NO. OF INDIVIDUALS:  543
 GENERAL LINEAR KINETICS MODEL (ADVAN5)
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
0MINIMIZATION SUCCESSFUL
 NO. OF FUNCTION EVALUATIONS USED: 2422
 NO. OF SIG. DIGITS IN FINAL EST.:  3.2

 ETABAR IS THE ARITHMETIC MEAN OF THE ETA-ESTIMATES,
 AND THE P-VALUE IS GIVEN FOR THE NULL HYPOTHESIS THAT THE TRUE MEAN IS 0.

 ETABAR:   0.34E-02 -0.34E-02  0.00E+00  0.00E+00 -0.15E-01  0.00E+00
 SE:       0.19E-01  0.16E-01  0.00E+00  0.00E+00  0.17E-01  0.00E+00

 P VAL.:   0.86E+00  0.83E+00  0.10E+01  0.10E+01  0.40E+00  0.10E+01

 ********************                           MINIMUM VALUE OF OBJECTIVE FUNCTION                  ********************

 **************************************************      -5975.486     **************************************************

 ********************                                  FINAL PARAMETER ESTIMATE                      ********************

 THETA - VECTOR OF FIXED EFFECTS PARAMETERS   *********
            TH 1      TH 2      TH 3      TH 4      TH 5      TH 6      TH 7      TH 8      TH 9      TH10      TH11      TH12
             TH13      TH14      TH15      TH16      TH17      TH18      TH19      TH20      TH21      TH22      TH23      TH24
            TH25      TH26      TH27      TH28
         1.04E+02  2.65E+03  6.65E+01  4.72E+03  7.48E-01 -3.01E-01 -2.79E-01 -3.26E-01 -5.78E-01  1.60E+03  6.82E-01  4.94E-01
          6.08E-01  6.75E-01  2.08E-01  2.64E-01  0.00E+00  2.31E-01  3.15E-01  7.50E-01  1.00E+00  3.64E-01  2.75E-02  3.14E-01
        -1.86E-01 -1.43E-01 -3.16E-01 -2.55E-01

 OMEGA - COV MATRIX FOR RANDOM EFFECTS - ETAS  ********
            ETA1      ETA2      ETA3      ETA4      ETA5      ETA6
 ETA1
+        2.45E-01
 ETA2
+        1.99E-01  1.90E-01
 ETA3
+        0.00E+00  0.00E+00  0.00E+00
 ETA4
+        0.00E+00  0.00E+00  0.00E+00  0.00E+00
 ETA5
+        0.00E+00  0.00E+00  0.00E+00  0.00E+00  2.22E-01
 ETA6
+        0.00E+00  0.00E+00  0.00E+00  0.00E+00  0.00E+00  0.00E+00

 SIGMA - COV MATRIX FOR RANDOM EFFECTS - EPSILONS  ****
            EPS1      EPS2      EPS3      EPS4      EPS5
 EPS1
+        1.12E-01
 EPS2
+        0.00E+00  9.26E-02
 EPS3
+        0.00E+00  0.00E+00  1.59E-01
 EPS4
+        0.00E+00  0.00E+00  0.00E+00  5.39E-02
 EPS5
+        0.00E+00  0.00E+00  0.00E+00  0.00E+00  1.00E-01

 ********************                             STANDARD ERROR OF ESTIMATE                         ********************

 THETA - VECTOR OF FIXED EFFECTS PARAMETERS   *********
            TH 1      TH 2      TH 3      TH 4      TH 5      TH 6      TH 7      TH 8      TH 9      TH10      TH11      TH12
             TH13      TH14      TH15      TH16      TH17      TH18      TH19      TH20      TH21      TH22      TH23      TH24
            TH25      TH26      TH27      TH28
         6.88E+00  1.65E+02  1.71E+00  7.94E+01  5.60E-02  5.97E-02  1.22E-01  5.83E-02  4.22E-02  7.88E+01  3.00E-02  1.32E-01
          3.17E-02  4.06E-02  8.48E-02  2.84E-02 .........  1.23E-01  1.15E-01 ......... .........  1.47E-01  1.24E-01  7.59E-02
         5.20E-02  8.83E-02  1.01E-01  1.50E-01

 OMEGA - COV MATRIX FOR RANDOM EFFECTS - ETAS  ********
            ETA1      ETA2      ETA3      ETA4      ETA5      ETA6
 ETA1
+        1.68E-02
 ETA2
+        1.66E-02  2.04E-02
 ETA3
+       ......... ......... .........
 ETA4
+       ......... ......... ......... .........
 ETA5
+       ......... ......... ......... .........  1.78E-02
 ETA6
+       ......... ......... ......... ......... ......... .........

 SIGMA - COV MATRIX FOR RANDOM EFFECTS - EPSILONS  ****
            EPS1      EPS2      EPS3      EPS4      EPS5
 EPS1
+        1.65E-03
 EPS2
+       .........  1.31E-03
 EPS3
+       ......... .........  8.49E-03
 EPS4
+       ......... ......... .........  2.55E-03
 EPS5
+       ......... ......... ......... .........  1.73E-03
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