Wed Apr 26 14:33:01 CEST 2017
$PROBLEM    PHENOBARB SIMPLE MODEL
$INPUT      ID TIME AMT WGT APGR=DROP DV CVD=DROP DROP CVD2=SKIP SKIP
            XWGT=DROP
$DATA      ../../bsdata_2.dta IGNORE=@ IGNORE=(WGT.LT.1.3)
$SUBROUTINE ADVAN1 TRANS2
$PK

;;; VWGT-DEFINITION START
VWGT = ( 1 + THETA(3)*(WGT - 1.7))
;;; VWGT-DEFINITION END

;;; V-RELATION START
VCOV=VWGT
;;; V-RELATION END

      TVCL=THETA(1)
      TVV=THETA(2)

TVV = VCOV*TVV
      CL=TVCL*EXP(ETA(1))
      V=TVV*EXP(ETA(2))
      S1=V
$ERROR

      W=F
      Y=F+W*EPS(1)

      IPRED=F         ;  individual-specific prediction
      IRES=DV-IPRED   ;  individual-specific residual
      IWRES=IRES/W    ;  individual-specific weighted residual

$THETA  (0,0.00697194) ; CL
$THETA  (0,1.8042) ; V
$THETA  (-0.66700,-0.000667,  2.50) ; VWGT1
$OMEGA  0.118712  ;       IVCL
 0.101464  ;        IVV
$SIGMA  0.0059321
$ESTIMATION MAXEVALS=9997 SIGDIGITS=4 POSTHOC
$COVARIANCE PRINT=E

NM-TRAN MESSAGES
 WARNINGS AND ERRORS (IF ANY) FOR PROBLEM    1
 (WARNING  2) NM-TRAN INFERS THAT THE DATA ARE POPULATION.

1NONLINEAR MIXED EFFECTS MODEL PROGRAM (NONMEM) VERSION 7.4.0 beta 1 (nm74b1)
 ORIGINALLY DEVELOPED BY STUART BEAL, LEWIS SHEINER, AND ALISON BOECKMANN
 CURRENT DEVELOPERS ARE ROBERT BAUER, ICON DEVELOPMENT SOLUTIONS,
 AND ALISON BOECKMANN. IMPLEMENTATION, EFFICIENCY, AND STANDARDIZATION
 PERFORMED BY NOUS INFOSYSTEMS.
 PROBLEM NO.:         1
 PHENOBARB SIMPLE MODEL
 TOT. NO. OF OBS RECS:       83
 TOT. NO. OF INDIVIDUALS:     33
 ONE COMPARTMENT MODEL (ADVAN1)
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 #TBLN:      1
 #METH: First Order
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
 #TERM:
0MINIMIZATION SUCCESSFUL
 NO. OF FUNCTION EVALUATIONS USED:      145
 NO. OF SIG. DIGITS IN FINAL EST.:  6.1

 TOTAL DATA POINTS NORMALLY DISTRIBUTED (N):           83
 N*LOG(2PI) CONSTANT TO OBJECTIVE FUNCTION:    152.54379651197567
 OBJECTIVE FUNCTION VALUE WITHOUT CONSTANT:    284.99121002419889
 OBJECTIVE FUNCTION VALUE WITH CONSTANT:       437.53500653617459
 REPORTED OBJECTIVE FUNCTION DOES NOT CONTAIN CONSTANT

 TOTAL EFFECTIVE ETAS (NIND*NETA):                            66


 #TERE:
 Elapsed estimation  time in seconds:     0.08
 Elapsed covariance  time in seconds:     0.04
 Elapsed postprocess time in seconds:     0.01

 ********************                                   FIRST ORDER                                  ********************
 #OBJT:**************                       MINIMUM VALUE OF OBJECTIVE FUNCTION                      ********************
 #OBJV:********************************************      284.991       **************************************************

 ********************                                   FIRST ORDER                                  ********************
 ********************                             FINAL PARAMETER ESTIMATE                           ********************

 THETA - VECTOR OF FIXED EFFECTS PARAMETERS   *********
         TH 1      TH 2      TH 3
         7.63E-03  1.63E+00  5.65E-01

 OMEGA - COV MATRIX FOR RANDOM EFFECTS - ETAS  ********
         ETA1      ETA2
 ETA1
+        1.67E-01
 ETA2
+        0.00E+00  1.17E-02

 SIGMA - COV MATRIX FOR RANDOM EFFECTS - EPSILONS  ****
         EPS1
 EPS1
+        5.23E-03

 OMEGA - CORR MATRIX FOR RANDOM EFFECTS - ETAS  *******
         ETA1      ETA2
 ETA1
+        4.08E-01
 ETA2
+        0.00E+00  1.08E-01

 SIGMA - CORR MATRIX FOR RANDOM EFFECTS - EPSILONS  ***
         EPS1
 EPS1
+        7.23E-02

 ********************                                   FIRST ORDER                                  ********************
 ********************                            STANDARD ERROR OF ESTIMATE                          ********************

 THETA - VECTOR OF FIXED EFFECTS PARAMETERS   *********
         TH 1      TH 2      TH 3
         7.76E-04  3.24E-02  4.64E-02

 OMEGA - COV MATRIX FOR RANDOM EFFECTS - ETAS  ********
         ETA1      ETA2
 ETA1
+        1.21E-01
 ETA2
+       .........  5.29E-03

 SIGMA - COV MATRIX FOR RANDOM EFFECTS - EPSILONS  ****
         EPS1
 EPS1
+        1.58E-03

 OMEGA - CORR MATRIX FOR RANDOM EFFECTS - ETAS  *******
         ETA1      ETA2
 ETA1
+        1.48E-01
 ETA2
+       .........  2.44E-02

 SIGMA - CORR MATRIX FOR RANDOM EFFECTS - EPSILONS  ***
         EPS1
 EPS1
+        1.09E-02

 ********************                                   FIRST ORDER                                  ********************
 ********************                          COVARIANCE MATRIX OF ESTIMATE                         ********************

            TH 1      TH 2      TH 3      OM11      OM12      OM22      SG11
 TH 1
+        6.02E-07
 TH 2
+        4.50E-06  1.05E-03
 TH 3
+       -9.90E-06  3.21E-04  2.15E-03
 OM11
+        6.99E-05 -2.75E-04 -1.79E-03  1.46E-02
 OM12
+       ......... ......... ......... ......... .........
 OM22
+       -6.00E-07  7.92E-05  1.31E-04 -1.11E-04 .........  2.80E-05
 SG11
+       -2.75E-07  1.50E-05  3.30E-05 -1.17E-04 .........  1.90E-06  2.50E-06

 ********************                                   FIRST ORDER                                  ********************
 ********************                          CORRELATION MATRIX OF ESTIMATE                        ********************

            TH 1      TH 2      TH 3      OM11      OM12      OM22      SG11
 TH 1
+        7.76E-04
 TH 2
+        1.79E-01  3.24E-02
 TH 3
+       -2.75E-01  2.14E-01  4.64E-02
 OM11
+        7.44E-01 -7.02E-02 -3.20E-01  1.21E-01
 OM12
+       ......... ......... ......... ......... .........
 OM22
+       -1.46E-01  4.63E-01  5.34E-01 -1.74E-01 .........  5.29E-03
 SG11
+       -2.24E-01  2.93E-01  4.50E-01 -6.13E-01 .........  2.28E-01  1.58E-03
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
 ********************                                   FIRST ORDER                                  ********************
 ********************                      EIGENVALUES OF COR MATRIX OF ESTIMATE                     ********************

             1         2         3         4         5         6
         1.24E-01  3.10E-01  6.23E-01  8.14E-01  1.53E+00  2.60E+00
 Elapsed finaloutput time in seconds:     0.00
 #CPUT: Total CPU Time in Seconds,        0.128
