Thu 05/01/2014
06:29 PM
$PROB delayed time example
$INPUT WWX TIME  DV AMT RATE CMT EVID MDV
$DATA delayed.csv IGNORE=C

$SUBROUTINES ADVAN13 TRANS1 TOL=8
$MODEL NCOMPARTMENTS=5

$PK
TDELAY=THETA(1)
ALAG3=TDELAY
KEL=THETA(2)
K0=THETA(3)
K1=THETA(4)
SC50=THETA(5)
SMAX=THETA(6)
V=THETA(7)
KS=THETA(8)
A_0(2)=K0/K1
A_0(4)=K0/K1
PI=3.141592654E+00

$DES
DADT(1) = -KEL*A(1)
DADT(2) = K0*(1.0 + SMAX*A(1)/(SC50*V + A(1))) - K1*A(2) &
        + KS*A(2)*SIN(2.0d+00*PI*T/TDELAY)*TDELAY/(2.0d+00*PI)
DADT(3) = -KEL*A(3)
DADT(4) = K0*(1.0 + SMAX*A(3)/(SC50*V + A(3))) - K1*A(4) &
        + KS*A(4)*SIN(2.0d+00*PI*T/TDELAY)*TDELAY/(2.0d+00*PI)
; use this conditional statement to "prime the system", and
; facilitate evaluating initial condition of A(3)
IF(T.lt.TDELAY) THEN
DADT(5)=K1*A(2)
ELSE
DADT(5)=K1*A(2) - K1*A(4)
ENDIF

$ERROR
IPRED=LOG(ABS(A(5))+1.0E-04)
Y=IPRED+ERR(1)

$THETA
;(0.001,23.4155) (0.25 FIXED) (0.0,0.309388) (0.0,0.0497557) (0.0,1.15534) (0.0,72.72273) (1.0 FIXED) (0.05 FIXED)
(0.001,15) (0.25 FIXED) (0.0,0.7) (0.0,0.08) (0.0,2) (0.0,45) (1.0 FIXED) (0.05 FIXED)

$OMEGA 0.01

$EST METHOD=0 PRINT=10 MAXEVAL=1000 NSIG=4
$COV UNCONDITIONAL MATRIX=R
$TABLE TIME DV IPRED NOAPPEND NOPRINT FILE=delayed.tab

NM-TRAN MESSAGES
 WARNINGS AND ERRORS (IF ANY) FOR PROBLEM    1
 (WARNING  1) NM-TRAN INFERS THAT THE DATA ARE SINGLE-SUBJECT.
  NONMEM RUN CANNOT BE PARALLELIZED.
 (DATA WARNING   5) RECORD         1, DATA ITEM   3, CONTENTS: 2.35
 THE DV DATA ITEM IS POSITIVE, BUT THE MDV DATA ITEM IS 1

1NONLINEAR MIXED EFFECTS MODEL PROGRAM (NONMEM) VERSION 7.4.0 alpha3 (nm74a3)
 ORIGINALLY DEVELOPED BY STUART BEAL, LEWIS SHEINER, AND ALISON BOECKMANN
 CURRENT DEVELOPERS ARE ROBERT BAUER, ICON DEVELOPMENT SOLUTIONS,
 AND ALISON BOECKMANN. IMPLEMENTATION, EFFICIENCY, AND STANDARDIZATION
 PERFORMED BY NOUS INFOSYSTEMS.
 PROBLEM NO.:         1
 delayed time example
 TOT. NO. OF OBS RECS:       25
 TOT. NO. OF INDIVIDUALS:     25
 GENERAL NONLINEAR KINETICS MODEL USING LSODA (ADVAN13)
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 #TBLN:      1
 #METH: First Order
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
 #TERM:
0MINIMIZATION SUCCESSFUL
 NO. OF FUNCTION EVALUATIONS USED:      263
 NO. OF SIG. DIGITS IN FINAL EST.:  4.0

 #TERE:
 Elapsed estimation  time in seconds:     0.69
 Elapsed covariance  time in seconds:     0.13
 Elapsed postprocess time in seconds:     0.00

 ********************                                   FIRST ORDER                                  ********************
 #OBJT:**************                       MINIMUM VALUE OF OBJECTIVE FUNCTION                      ********************
 #OBJV:********************************************      -85.080       **************************************************

 ********************                                   FIRST ORDER                                  ********************
 ********************                             FINAL PARAMETER ESTIMATE                           ********************

 THETA - VECTOR OF FIXED EFFECTS PARAMETERS   *********
         TH 1      TH 2      TH 3      TH 4      TH 5      TH 6      TH 7      TH 8
         2.34E+01  2.50E-01  2.42E-01  5.04E-02  1.08E+00  9.13E+01  1.00E+00  5.00E-02

 OMEGA - COV MATRIX FOR RANDOM EFFECTS - ETAS  ********
         ETA1
 ETA1
+        1.22E-02

 OMEGA - CORR MATRIX FOR RANDOM EFFECTS - ETAS  *******
         ETA1
 ETA1
+        1.11E-01

 ********************                                   FIRST ORDER                                  ********************
 ********************                            STANDARD ERROR OF ESTIMATE                          ********************

 THETA - VECTOR OF FIXED EFFECTS PARAMETERS   *********
         TH 1      TH 2      TH 3      TH 4      TH 5      TH 6      TH 7      TH 8
         3.38E-01 .........  2.50E-02  2.57E-03  5.45E-01  1.42E+01 ......... .........

 OMEGA - COV MATRIX FOR RANDOM EFFECTS - ETAS  ********
         ETA1
 ETA1
+        3.46E-03

 OMEGA - CORR MATRIX FOR RANDOM EFFECTS - ETAS  *******
         ETA1
 ETA1
+        1.56E-02

 ********************                                   FIRST ORDER                                  ********************
 ********************                          COVARIANCE MATRIX OF ESTIMATE                         ********************

            TH 1      TH 2      TH 3      TH 4      TH 5      TH 6      TH 7      TH 8      OM11
 TH 1
+        1.14E-01
 TH 2
+       ......... .........
 TH 3
+       -1.50E-03 .........  6.26E-04
 TH 4
+        1.50E-04 .........  1.91E-05  6.59E-06
 TH 5
+       -6.05E-02 ......... -2.70E-03 -1.16E-03  2.97E-01
 TH 6
+       -1.64E+00 ......... -2.68E-01 -2.27E-02  5.37E+00  2.00E+02
 TH 7
+       ......... ......... ......... ......... ......... ......... .........
 TH 8
+       ......... ......... ......... ......... ......... ......... ......... .........
 OM11
+        9.58E-09 .........  1.66E-09  2.78E-10 -5.05E-08 -1.44E-06 ......... .........  1.20E-05

 ********************                                   FIRST ORDER                                  ********************
 ********************                          CORRELATION MATRIX OF ESTIMATE                        ********************

            TH 1      TH 2      TH 3      TH 4      TH 5      TH 6      TH 7      TH 8      OM11
 TH 1
+        3.38E-01
 TH 2
+       ......... .........
 TH 3
+       -1.78E-01 .........  2.50E-02
 TH 4
+        1.73E-01 .........  2.97E-01  2.57E-03
 TH 5
+       -3.29E-01 ......... -1.98E-01 -8.28E-01  5.45E-01
 TH 6
+       -3.43E-01 ......... -7.58E-01 -6.24E-01  6.96E-01  1.42E+01
 TH 7
+       ......... ......... ......... ......... ......... ......... .........
 TH 8
+       ......... ......... ......... ......... ......... ......... ......... .........
 OM11
+        8.19E-06 .........  1.92E-05  3.13E-05 -2.68E-05 -2.93E-05 ......... .........  3.46E-03
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 #CPUT: Total CPU Time in Seconds,        0.780
