Fri Dec 12 13:03:45 CET 2014
;; 1. Based on: 257
$PROBLEM    Cov Matrix(11),no RIS,not logit BC0,MTT 3
$INPUT      ID TIME CMT CMTVAR=DROP ODV NDV DV MDV GFED CHOL TRIG NEFA
            OGTT0=DROP OGTT15=DROP OGTT30=DROP OGTT60=DROP
            OGTT120=DROP INSU0=DROP INSU15=DROP INSU30=DROP
            INSU60=DROP INSU120=DROP OCC FLAG FSICOV=DROP BBLWT=DROP
            RBLWT DDWT=DROP EVID WTCOV=DROP FPGCOV AGE BFAT
            LOGTT15=DROP LOGTT30=DROP LOGTT60 LOGTT120=DROP BLINS=DROP
            BLFPG=DROP BLHBA=DROP
$DATA      Rats_1occ_OGTT_INTER_BL.csv IGNORE=@
            IGNORE=(ID.EQ.5,CMT.EQ.4,MDV.EQ.1,FLAG.EQ.1,FLAG.EQ.2)

;FLAG.EQ.3)
$SUBROUTINE ADVAN6 TOL=5 ;
$MODEL      COMP=(COVAR) ; CMT1 for calculating cov on the fly
            COMP=(WEIGHT) ; CMT2 for BODY WEIGHT
            COMP=(INSULIN) ; CMT3 for INSULIN
            COMP=(FPG) ; CMT4 for FPG

;COMP=(HBA1C) ; CMT5 for HbA1c

;COMP=(HBA2C) ; CMT6 for HbA1c

;COMP=(HBA3C) ; CMT7 for HbA1c

;
$PK
;;=================Covariates=======================
;IF(NEWIND.NE.2) THEN
  ;BLOG=LOGTT60 * 0.0555 ; Baseline OGTT.60 with conversion from mg/dL to mmol/L
  ;OTIM=0
;ENDIF

OGSLOPE = 0
IF(TIME.EQ.0) DBFAT = 1

$DES
AA2=A(2)
IF(IND.EQ.0) DWT = 0

$ERROR
;;=================Re-defining Time parameters outisde $DES===
;
AA1=A(1)
OTIM = TIME
;===================================================
$THETA  (0,44.74340) FIX ; TH1 Kout
 (0,0.223257) FIX ; TH2 BLWT (kg)
 (0,3.279350) FIX ; TH3 IMAX
 (0,142.1160) FIX ; TH4 IC50
 (0,2.329980) FIX ; TH5 GAM
 (0,0.024309) FIX ; TH6 RESWT
 (0,0.606811) ; TH7 RESFSI
 (0,0.071786) ; TH8 RESFPG
 (0,12.60430) ; TH9 FSISS (uIU/mL)
 (0,1) FIX ; TH10 KOUTFSI (/day)
 (0,7.011970) ; TH11 FPGSS (mmol/L)
 (0,0.021) FIX ; TH12 KOUTFPG (/day)
 (0,0.425694) ; TH13 SCALEIS
 (1,97.54830,500) ; TH14 IP
 0.5 FIX ; TH15 STEEP
 (0,0.08) ; TH16 BCIC50
 (0,0.01) ; TH17 BCSCALE
 (0,0.507739) ; TH18 BCGAM
 (0,2) ; TH19 BCEXP
 (0,1) ; TH20 BCLIN
; (0,0.2) FIX ; TH20 RESHBA not used
; (0,100) FIX  ; TH21 MTT not used
; (0,0.0130832) FIX ; TH22 KIHB not used
; (0,0.4) FIX ; TH23 PPGCOV not used
; (0,0.5,10) FIX ; TH24 SPPG not used
$OMEGA  0.001242  FIX  ;   ET1 BLWT
 0.051647  FIX  ;   ET2 IC50
 0.046926  ;     ET3 IP
 0.001691  ;  ET4 FSISS
 0.000009  ;  ET5 FPGSS
 0.09  ; ET6 BCIC50
;0.09 FIX ; ET6 PPGCOV not used
$SIGMA  1  FIX
$ESTIMATION MSFO=msfb263 METHOD=1 MCETA=1000 INTERACTION MAX=5 PRINT=5
$ESTIMATION MSFO=msfb263 METHOD=1 MCETA=10 INTERACTION MAX=9999
            PRINT=5 POSTHOC NOABORT
;$COVARIANCE MATRIX=S PRINT=E UNCONDITIONAL

;$TABLE      ID TIME NDV ISS0 EFFW CMT DV PRED IPRED RES WRES IRES

;            IWRES CWRES AA1 OGSLOPE LOGTT60 NOAPP NOPRINT ONEHEAD

;            FILE=sdtab264
$TABLE      ID TIME CMT DV EFFW BLWT BLI BCLIMIT EFFB BLOG THRES ;PPG
            EFSI EFPG EDEN EWT DWTE DWTPE EEFS KIOI KIOG BLG IP BNET
            BLINS BCONE BCTWO PROD IGR ISSE ISSEKG DBFAT BCE0 SNET
            HFPGFSI ISS0 ; ESPPG TOTPPG
            NOAPP NOPRINT ONEHEAD FILE=catab264
;$TABLE      ID ETA1 ETA2 ETA3 ETA4 ETA5 ETA6

;            NOAPP NOPRINT ONEHEAD FILE=patab264

NM-TRAN MESSAGES
 WARNINGS AND ERRORS (IF ANY) FOR PROBLEM    1
 (WARNING  2) NM-TRAN INFERS THAT THE DATA ARE POPULATION.
 (WARNING  97) A RANDOM QUANTITY IS RAISED TO A POWER. IF THE RESULT AFFECTS
 THE VALUE OF THE OBJECTIVE FUNCTION, THE USER SHOULD ENSURE THAT THE
 RANDOM QUANTITY IS NEVER 0 WHEN THE POWER IS < 1.
 (WARNING  48) DES-DEFINED ITEMS ARE COMPUTED ONLY WHEN EVENT TIME
 INCREASES. E.G., DISPLAYED VALUES ASSOCIATED WITH THE FIRST EVENT RECORD
 OF AN INDIVIDUAL RECORD ARE COMPUTED WITH (THE LAST ADVANCE TO) AN EVENT
 TIME OF THE PRIOR INDIVIDUAL RECORD.

1NONLINEAR MIXED EFFECTS MODEL PROGRAM (NONMEM) VERSION 7.3.0
 ORIGINALLY DEVELOPED BY STUART BEAL, LEWIS SHEINER, AND ALISON BOECKMANN
 CURRENT DEVELOPERS ARE ROBERT BAUER, ICON DEVELOPMENT SOLUTIONS,
 AND ALISON BOECKMANN. IMPLEMENTATION, EFFICIENCY, AND STANDARDIZATION
 PERFORMED BY NOUS INFOSYSTEMS.
 PROBLEM NO.:         1
 Cov Matrix(11),no RIS,not logit BC0,MTT 3
 TOT. NO. OF OBS RECS:      851
 TOT. NO. OF INDIVIDUALS:     23
 GENERAL NONLINEAR KINETICS MODEL (ADVAN6)
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 #TBLN:      1
 #METH: First Order Conditional Estimation with Interaction
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
0PROGRAM TERMINATED BY OBJ
 ERROR IN NCONTR WITH INDIVIDUAL       6   ID= 7.00000000000000E+00
 NUMERICAL HESSIAN OF OBJ. FUNC. FOR COMPUTING CONDITIONAL ESTIMATE
 IS NON POSITIVE DEFINITE
 MESSAGE ISSUED FROM ESTIMATION STEP
 AT 0TH ITERATION, UPON EVALUATION OF GRADIENT, WITH RESPECT TO OMEGA
0TRY SUBSTANTIALLY INCREASING "INITIAL ESTIMATE OF SIGMA"
 OR DECREASING "INITIAL ESTIMATE OF OMEGA"

 #TERM:

 #TERE:
 Elapsed estimation time in seconds:    36.23

 ********************               FIRST ORDER CONDITIONAL ESTIMATION WITH INTERACTION              ********************
 #OBJT:**************                       MINIMUM VALUE OF OBJECTIVE FUNCTION                      ********************
 #OBJV:********************************************        0.000       **************************************************

 ********************               FIRST ORDER CONDITIONAL ESTIMATION WITH INTERACTION              ********************
 ********************                             FINAL PARAMETER ESTIMATE                           ********************

 THETA - VECTOR OF FIXED EFFECTS PARAMETERS   *********
         TH 1      TH 2      TH 3      TH 4      TH 5      TH 6      TH 7      TH 8      TH 9      TH10      TH11      TH12
          TH13      TH14      TH15      TH16      TH17      TH18      TH19      TH20
         4.47E+01  2.23E-01  3.28E+00  1.42E+02  2.33E+00  2.43E-02  6.07E-01  7.18E-02  1.26E+01  1.00E+00  7.01E+00  2.10E-02
          4.26E-01  9.75E+01  5.00E-01  8.00E-02  1.00E-02  5.08E-01  2.00E+00  1.00E+00

 OMEGA - COV MATRIX FOR RANDOM EFFECTS - ETAS  ********
            ETA1      ETA2      ETA3      ETA4      ETA5      ETA6
 ETA1
+        1.24E-03
 ETA2
+        0.00E+00  5.16E-02
 ETA3
+        0.00E+00  0.00E+00  4.69E-02
 ETA4
+        0.00E+00  0.00E+00  0.00E+00  1.69E-03
 ETA5
+        0.00E+00  0.00E+00  0.00E+00  0.00E+00  9.00E-06
 ETA6
+        0.00E+00  0.00E+00  0.00E+00  0.00E+00  0.00E+00  9.00E-02

 SIGMA - COV MATRIX FOR RANDOM EFFECTS - EPSILONS  ****
            EPS1
 EPS1
+        1.00E+00

 OMEGA - CORR MATRIX FOR RANDOM EFFECTS - ETAS  *******
            ETA1      ETA2      ETA3      ETA4      ETA5      ETA6
 ETA1
+        3.52E-02
 ETA2
+        0.00E+00  2.27E-01
 ETA3
+        0.00E+00  0.00E+00  2.17E-01
 ETA4
+        0.00E+00  0.00E+00  0.00E+00  4.11E-02
 ETA5
+        0.00E+00  0.00E+00  0.00E+00  0.00E+00  3.00E-03
 ETA6
+        0.00E+00  0.00E+00  0.00E+00  0.00E+00  0.00E+00  3.00E-01

 SIGMA - CORR MATRIX FOR RANDOM EFFECTS - EPSILONS  ***
            EPS1
 EPS1
+        1.00E+00
 #TBLN:      2
 #METH: First Order Conditional Estimation with Interaction
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
 #TERM:
0MINIMIZATION SUCCESSFUL
 HOWEVER, PROBLEMS OCCURRED WITH THE MINIMIZATION.
 REGARD THE RESULTS OF THE ESTIMATION STEP CAREFULLY, AND ACCEPT THEM ONLY
 AFTER CHECKING THAT THE COVARIANCE STEP PRODUCES REASONABLE OUTPUT.
 NO. OF FUNCTION EVALUATIONS USED:      218
 NO. OF SIG. DIGITS IN FINAL EST.:  3.3

 ETABAR IS THE ARITHMETIC MEAN OF THE ETA-ESTIMATES,
 AND THE P-VALUE IS GIVEN FOR THE NULL HYPOTHESIS THAT THE TRUE MEAN IS 0.

 ETABAR:         3.3487E-04 -8.6759E-04 -1.7581E-01 -2.9135E-03 -3.8924E-05 -3.9204E-02
 SE:             7.1018E-03  4.7514E-02  4.3969E-02  2.8089E-03  2.2624E-05  2.8994E-02
 N:                      23          23          23          23          23          23

 P VAL.:         9.6239E-01  9.8543E-01  6.3816E-05  2.9963E-01  8.5351E-02  1.7633E-01

 ETAshrink(%):   1.1848E+00  1.0000E-10  3.0960E+01  6.7562E+01  9.6303E+01  5.9610E+01
 EBVshrink(%):   3.7492E+00  1.9840E+00  7.8057E-01  5.7254E+01  9.6609E+01  4.3479E+01
 EPSshrink(%):   8.0660E+00

 #TERE:
 Elapsed estimation time in seconds:   382.72

 ********************               FIRST ORDER CONDITIONAL ESTIMATION WITH INTERACTION              ********************
 #OBJT:**************                       MINIMUM VALUE OF OBJECTIVE FUNCTION                      ********************
 #OBJV:********************************************    -2510.814       **************************************************

 ********************               FIRST ORDER CONDITIONAL ESTIMATION WITH INTERACTION              ********************
 ********************                             FINAL PARAMETER ESTIMATE                           ********************

 THETA - VECTOR OF FIXED EFFECTS PARAMETERS   *********
         TH 1      TH 2      TH 3      TH 4      TH 5      TH 6      TH 7      TH 8      TH 9      TH10      TH11      TH12
          TH13      TH14      TH15      TH16      TH17      TH18      TH19      TH20
         4.47E+01  2.23E-01  3.28E+00  1.42E+02  2.33E+00  2.43E-02  4.69E-01  1.80E-01  1.07E+01  1.00E+00  7.45E+00  2.10E-02
          4.43E-01  1.24E+02  5.00E-01  6.41E-02  1.12E-02  5.49E-01  1.97E+00  1.02E+00

 OMEGA - COV MATRIX FOR RANDOM EFFECTS - ETAS  ********
            ETA1      ETA2      ETA3      ETA4      ETA5      ETA6
 ETA1
+        1.24E-03
 ETA2
+        0.00E+00  5.16E-02
 ETA3
+        0.00E+00  0.00E+00  9.75E-02
 ETA4
+        0.00E+00  0.00E+00  0.00E+00  1.80E-03
 ETA5
+        0.00E+00  0.00E+00  0.00E+00  0.00E+00  9.00E-06
 ETA6
+        0.00E+00  0.00E+00  0.00E+00  0.00E+00  0.00E+00  1.24E-01

 SIGMA - COV MATRIX FOR RANDOM EFFECTS - EPSILONS  ****
            EPS1
 EPS1
+        1.00E+00

 OMEGA - CORR MATRIX FOR RANDOM EFFECTS - ETAS  *******
            ETA1      ETA2      ETA3      ETA4      ETA5      ETA6
 ETA1
+        3.52E-02
 ETA2
+        0.00E+00  2.27E-01
 ETA3
+        0.00E+00  0.00E+00  3.12E-01
 ETA4
+        0.00E+00  0.00E+00  0.00E+00  4.25E-02
 ETA5
+        0.00E+00  0.00E+00  0.00E+00  0.00E+00  3.00E-03
 ETA6
+        0.00E+00  0.00E+00  0.00E+00  0.00E+00  0.00E+00  3.52E-01

 SIGMA - CORR MATRIX FOR RANDOM EFFECTS - EPSILONS  ***
            EPS1
 EPS1
+        1.00E+00
 #CPUT: Total CPU Time in Seconds,      420.536
