Fri Sep  2 11:11:13 CEST 2016
$PROBLEM    PHENOBARB SIMPLE MODEL
$INPUT      ID TIME AMT WGT APGR DV FA1 FA2
$DATA      pheno.dta IGNORE=@
$SUBROUTINE ADVAN1 TRANS2
$PK
   NEG=-1
      TVCL=THETA(1)
      TVV=THETA(2)
      CL=TVCL*EXP(ETA(1))*NEG
      V=TVV*EXP(ETA(2))
      S1=V
$ERROR

      W=F
      Y=F+W*EPS(1)

      IPRED=F         ;  individual-specific prediction
      IRES=DV-IPRED   ;  individual-specific residual
      IWRES=IRES/W    ;  individual-specific weighted residual

$THETA  (0,0.0105) ; CL; unit
$THETA  (0,1.0500) ; V; unit
$OMEGA  .4  ;       IVCL
 .25  ;        IVV
$SIGMA  .04
$SIMULATION (234) NSUB=1 ONLYSIM

NM-TRAN MESSAGES
 WARNINGS AND ERRORS (IF ANY) FOR PROBLEM    1
 (WARNING  2) NM-TRAN INFERS THAT THE DATA ARE POPULATION.

1NONLINEAR MIXED EFFECTS MODEL PROGRAM (NONMEM) VERSION 7.3.0
 ORIGINALLY DEVELOPED BY STUART BEAL, LEWIS SHEINER, AND ALISON BOECKMANN
 CURRENT DEVELOPERS ARE ROBERT BAUER, ICON DEVELOPMENT SOLUTIONS,
 AND ALISON BOECKMANN. IMPLEMENTATION, EFFICIENCY, AND STANDARDIZATION
 PERFORMED BY NOUS INFOSYSTEMS.
 PROBLEM NO.:         1
 PHENOBARB SIMPLE MODEL
 TOT. NO. OF OBS RECS:      155
 TOT. NO. OF INDIVIDUALS:     59
 ONE COMPARTMENT MODEL (ADVAN1)
 PROBLEM NO.:         1     SUBPROBLEM NO.:      1
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
0PRED EXIT CODE = 1
0INDIVIDUAL NO.       1   ID= 1.00000000000000E+00   (WITHIN-INDIVIDUAL) DATA REC NO.   1
 THETA=
  1.05E-02   1.05E+00
 ETA=
 -2.21E+00   3.31E-01
 ERROR IN TRANS2 ROUTINE: CL IS NEGATIVE
 MESSAGE ISSUED FROM SIMULATION STEP
 PRED SIMULATION REDO

0PRED EXIT CODE = 1
0INDIVIDUAL NO.       1   ID= 1.00000000000000E+00   (WITHIN-INDIVIDUAL) DATA REC NO.   1
 THETA=
  1.05E-02   1.05E+00
 ETA=
  3.65E-01  -1.45E-01
 ERROR IN TRANS2 ROUTINE: CL IS NEGATIVE
 MESSAGE ISSUED FROM SIMULATION STEP
 PRED SIMULATION REDO

0PRED EXIT CODE = 1
0INDIVIDUAL NO.       1   ID= 1.00000000000000E+00   (WITHIN-INDIVIDUAL) DATA REC NO.   1
 THETA=
  1.05E-02   1.05E+00
 ETA=
  5.67E-01   3.82E-02
 ERROR IN TRANS2 ROUTINE: CL IS NEGATIVE
 MESSAGE ISSUED FROM SIMULATION STEP
 PRED SIMULATION REDO

0PRED EXIT CODE = 1
0INDIVIDUAL NO.       1   ID= 1.00000000000000E+00   (WITHIN-INDIVIDUAL) DATA REC NO.   1
 THETA=
  1.05E-02   1.05E+00
 ETA=
 -1.55E+00   9.42E-01
 ERROR IN TRANS2 ROUTINE: CL IS NEGATIVE
 MESSAGE ISSUED FROM SIMULATION STEP
 PRED SIMULATION REDO

0PRED EXIT CODE = 1
0INDIVIDUAL NO.       1   ID= 1.00000000000000E+00   (WITHIN-INDIVIDUAL) DATA REC NO.   1
 THETA=
  1.05E-02   1.05E+00
 ETA=
 -1.87E-01  -3.00E-02
 ERROR IN TRANS2 ROUTINE: CL IS NEGATIVE
 MESSAGE ISSUED FROM SIMULATION STEP
 PRED SIMULATION REDO

0PRED EXIT CODE = 1
0INDIVIDUAL NO.       1   ID= 1.00000000000000E+00   (WITHIN-INDIVIDUAL) DATA REC NO.   1
 THETA=
  1.05E-02   1.05E+00
 ETA=
 -1.32E-01  -3.74E-01
 ERROR IN TRANS2 ROUTINE: CL IS NEGATIVE
 MESSAGE ISSUED FROM SIMULATION STEP
 PRED SIMULATION REDO

0PRED EXIT CODE = 1
0INDIVIDUAL NO.       1   ID= 1.00000000000000E+00   (WITHIN-INDIVIDUAL) DATA REC NO.   1
 THETA=
  1.05E-02   1.05E+00
 ETA=
  4.30E-01   5.37E-01
 ERROR IN TRANS2 ROUTINE: CL IS NEGATIVE
 MESSAGE ISSUED FROM SIMULATION STEP
 PRED SIMULATION REDO

0PRED EXIT CODE = 1
0INDIVIDUAL NO.       1   ID= 1.00000000000000E+00   (WITHIN-INDIVIDUAL) DATA REC NO.   1
 THETA=
  1.05E-02   1.05E+00
 ETA=
 -2.27E-01   5.52E-01
 ERROR IN TRANS2 ROUTINE: CL IS NEGATIVE
 MESSAGE ISSUED FROM SIMULATION STEP
 PRED SIMULATION REDO

0PRED EXIT CODE = 1
0INDIVIDUAL NO.       1   ID= 1.00000000000000E+00   (WITHIN-INDIVIDUAL) DATA REC NO.   1
 THETA=
  1.05E-02   1.05E+00
 ETA=
 -1.47E+00   3.90E-01
 ERROR IN TRANS2 ROUTINE: CL IS NEGATIVE
 MESSAGE ISSUED FROM SIMULATION STEP
 PRED SIMULATION REDO

0PRED EXIT CODE = 1
0INDIVIDUAL NO.       1   ID= 1.00000000000000E+00   (WITHIN-INDIVIDUAL) DATA REC NO.   1
 THETA=
  1.05E-02   1.05E+00
 ETA=
 -3.98E-01  -2.57E-01
 ERROR IN TRANS2 ROUTINE: CL IS NEGATIVE
 MESSAGE ISSUED FROM SIMULATION STEP
 PRED ERROR OCCURRED TOO OFTEN ON SIMULATION

0PRED EXIT CODE = 1
0INDIVIDUAL NO.       1   ID= 1.00000000000000E+00   (WITHIN-INDIVIDUAL) DATA REC NO.   1
 THETA=
  1.05E-02   1.05E+00
 ETA=
 -5.21E-01  -1.20E-01
 ERROR IN TRANS2 ROUTINE: CL IS NEGATIVE
 MESSAGE ISSUED FROM SIMULATION STEP
 #CPUT: Total CPU Time in Seconds,        0.008
