Tue May 21 13:20:18 CEST 2013
$PROBLEM    PHENOBARB SIMPLE MODEL
$INPUT      ID TIME AMT WGT APGR DV
$DATA       pheno.dta IGNORE=@
$SUBROUTINE ADVAN1 TRANS2
$PK

      TVCL=THETA(1)
      TVV=THETA(2)
      CL=TVCL*EXP(ETA(1))
      V=TVV*EXP(ETA(2))
      S1=V
$ERROR

      W=F
      Y=F+W*EPS(1)

      IPRED=F         ;  individual-specific prediction
      IRES=DV-IPRED   ;  individual-specific residual
      IWRES=IRES/W    ;  individual-specific weighted residual

$THETA  (0,0.0105) ; CL
$THETA  (0,1.0500) ; V
$OMEGA  .4  ;       IVCL
 .25  ;        IVV
$SIGMA  .04
$SIMULATION NSUB=2 (1234)
$ESTIMATION MAXEVAL=9000
$COVARIANCE UNCOND

1NONLINEAR MIXED EFFECTS MODEL PROGRAM (NONMEM)    DOUBLE PRECISION NONMEM    VERSION VI LEVEL 1.0
 DEVELOPED AND PROGRAMMED BY STUART BEAL AND LEWIS SHEINER
 PROBLEM NO.:         1
 PHENOBARB SIMPLE MODEL
 TOT. NO. OF OBS RECS:     155
 TOT. NO. OF INDIVIDUALS:   59
 ONE COMPARTMENT MODEL (ADVAN1)
 PROBLEM NO.:         1     SUBPROBLEM NO.:      1
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 SIMULATION STEP PERFORMED
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
0MINIMIZATION SUCCESSFUL
 NO. OF FUNCTION EVALUATIONS USED:   83
 NO. OF SIG. DIGITS IN FINAL EST.:  3.4

 ********************                           MINIMUM VALUE OF OBJECTIVE FUNCTION                  ********************

 **************************************************        934.044     **************************************************

 ********************                                  FINAL PARAMETER ESTIMATE                      ********************

 THETA - VECTOR OF FIXED EFFECTS PARAMETERS   *********
            TH 1      TH 2
         9.03E-03  9.30E-01

 OMEGA - COV MATRIX FOR RANDOM EFFECTS - ETAS  ********
            ETA1      ETA2
 ETA1
+        3.99E-01
 ETA2
+        0.00E+00  2.32E-01

 SIGMA - COV MATRIX FOR RANDOM EFFECTS - EPSILONS  ****
            EPS1
 EPS1
+        5.67E-02

 ********************                             STANDARD ERROR OF ESTIMATE                         ********************

 THETA - VECTOR OF FIXED EFFECTS PARAMETERS   *********
            TH 1      TH 2
         7.30E-04  5.53E-02

 OMEGA - COV MATRIX FOR RANDOM EFFECTS - ETAS  ********
            ETA1      ETA2
 ETA1
+        8.81E-02
 ETA2
+       .........  6.33E-02

 SIGMA - COV MATRIX FOR RANDOM EFFECTS - EPSILONS  ****
            EPS1
 EPS1
+        1.32E-02

 ********************                          COVARIANCE MATRIX OF ESTIMATE                         ********************

            TH 1      TH 2      OM11      OM12      OM22      SG11
 TH 1
+        5.33E-07
 TH 2
+        1.09E-05  3.06E-03
 OM11
+       -3.38E-06  1.79E-03  7.76E-03
 OM12
+       ......... ......... ......... .........
 OM22
+       -8.24E-06 -4.05E-04  7.46E-04 .........  4.01E-03
 SG11
+        1.45E-06 -7.44E-05 -1.59E-04 ......... -3.01E-04  1.73E-04

 ********************                         CORRELATION MATRIX OF ESTIMATE                         ********************

            TH 1      TH 2      OM11      OM12      OM22      SG11
 TH 1
+        1.00E+00
 TH 2
+        2.69E-01  1.00E+00
 OM11
+       -5.25E-02  3.68E-01  1.00E+00
 OM12
+       ......... ......... ......... .........
 OM22
+       -1.78E-01 -1.16E-01  1.34E-01 .........  1.00E+00
 SG11
+        1.51E-01 -1.02E-01 -1.37E-01 ......... -3.61E-01  1.00E+00
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 PROBLEM NO.:         1     SUBPROBLEM NO.:      2
 SIMULATION STEP PERFORMED
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
0MINIMIZATION SUCCESSFUL
 NO. OF FUNCTION EVALUATIONS USED:   84
 NO. OF SIG. DIGITS IN FINAL EST.:  3.5

 ********************                           MINIMUM VALUE OF OBJECTIVE FUNCTION                  ********************

 **************************************************        901.694     **************************************************

 ********************                                  FINAL PARAMETER ESTIMATE                      ********************

 THETA - VECTOR OF FIXED EFFECTS PARAMETERS   *********
            TH 1      TH 2
         9.05E-03  1.01E+00

 OMEGA - COV MATRIX FOR RANDOM EFFECTS - ETAS  ********
            ETA1      ETA2
 ETA1
+        2.89E-01
 ETA2
+        0.00E+00  1.77E-01

 SIGMA - COV MATRIX FOR RANDOM EFFECTS - EPSILONS  ****
            EPS1
 EPS1
+        6.47E-02

 ********************                             STANDARD ERROR OF ESTIMATE                         ********************

 THETA - VECTOR OF FIXED EFFECTS PARAMETERS   *********
            TH 1      TH 2
         7.97E-04  6.50E-02

 OMEGA - COV MATRIX FOR RANDOM EFFECTS - ETAS  ********
            ETA1      ETA2
 ETA1
+        7.24E-02
 ETA2
+       .........  4.99E-02

 SIGMA - COV MATRIX FOR RANDOM EFFECTS - EPSILONS  ****
            EPS1
 EPS1
+        7.82E-03

 ********************                          COVARIANCE MATRIX OF ESTIMATE                         ********************

            TH 1      TH 2      OM11      OM12      OM22      SG11
 TH 1
+        6.35E-07
 TH 2
+        4.24E-06  4.22E-03
 OM11
+        6.43E-06  4.53E-04  5.24E-03
 OM12
+       ......... ......... ......... .........
 OM22
+       -1.22E-05 -1.25E-03  3.29E-04 .........  2.49E-03
 SG11
+        1.36E-06  6.42E-05  1.08E-04 ......... -8.46E-05  6.12E-05

 ********************                         CORRELATION MATRIX OF ESTIMATE                         ********************

            TH 1      TH 2      OM11      OM12      OM22      SG11
 TH 1
+        1.00E+00
 TH 2
+        8.20E-02  1.00E+00
 OM11
+        1.11E-01  9.63E-02  1.00E+00
 OM12
+       ......... ......... ......... .........
 OM22
+       -3.06E-01 -3.87E-01  9.11E-02 .........  1.00E+00
 SG11
+        2.18E-01  1.26E-01  1.91E-01 ......... -2.17E-01  1.00E+00
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