26/08/2015
11:03
; Script generated by the pharmML2Nmtran Converter v.0.1.0
; Source	: PharmML 0.6.0
; Target	: NMTRAN 7.3.0
; Model 	: UseCase1
; Dated 	: Wed Aug 26 11:03:25 BST 2015

$PROBLEM "UseCase1.mdl - generated by MDL2PharmML v.6.0"

$INPUT  ID TIME WT=DROP AMT DVID DV MDV LOGTWT
$DATA "warfarin_conc.csv" IGNORE=@
$SUBS ADVAN13 TOL=9

$MODEL
COMP (COMP1) 	;GUT
COMP (COMP2) 	;CENTRAL

$PK
POP_CL = THETA(1)
POP_V = THETA(2)
POP_KA = THETA(3)
POP_TLAG = THETA(4)
RUV_PROP = THETA(5)
RUV_ADD = THETA(6)
BETA_CL_WT = THETA(7)
BETA_V_WT = THETA(8)

ETA_CL = ETA(1)
ETA_V = ETA(2)
ETA_KA = ETA(3)
ETA_TLAG = ETA(4)

MU_1 = LOG(POP_CL)+BETA_CL_WT * LOGTWT;
CL = EXP(MU_1 + ETA(1));

MU_2 = LOG(POP_V)+BETA_V_WT * LOGTWT;
V = EXP(MU_2 + ETA(2));

MU_3 = LOG(POP_KA);
KA = EXP(MU_3 + ETA(3));

MU_4 = LOG(POP_TLAG);
TLAG = EXP(MU_4 + ETA(4));

A_0(1) = 0
A_0(2) = 0

$DES
GUT_DES = A(1)
CENTRAL_DES = A(2)
IF (T.GE.TLAG) THEN
	RATEIN_DES = GUT_DES*KA
ELSE
	RATEIN_DES = 0
ENDIF
CC_DES = CENTRAL_DES/V
DADT(1) = -(RATEIN_DES)
DADT(2) = (RATEIN_DES-CL*CENTRAL_DES/V)

$ERROR
GUT = A(1)
CENTRAL = A(2)
IF (TIME.GE.TLAG) THEN
	RATEIN = GUT*KA
ELSE
	RATEIN = 0
ENDIF
CC = CENTRAL/V
IPRED = CC
W = RUV_ADD+RUV_PROP*IPRED
Y = IPRED+W*EPS(1)
IRES = DV - IPRED
IWRES = IRES/W

$THETA
( 0.001 , 0.1 )	;POP_CL
( 0.001 , 8.0 )	;POP_V
( 0.001 , 0.362 )	;POP_KA
( 0.001 , 1.0 )	;POP_TLAG
( 0.0 , 0.1 )	;RUV_PROP
( 0.0 , 0.1 )	;RUV_ADD
(0.75  FIX )	;BETA_CL_WT
(1.0  FIX )	;BETA_V_WT

$OMEGA BLOCK(2) CORRELATION SD
(0.1 )	;PPV_CL
(0.01 )	;PPV_CL_PPV_V
(0.1 )	;PPV_V

$OMEGA
(0.1 SD )	;PPV_KA
(0.1  FIX SD )	;PPV_TLAG

$SIGMA
1.0 FIX

$EST METHOD=SAEM AUTO=1 PRINT=100

$TABLE  ID TIME AMT DVID MDV LOGTWT PRED IPRED RES IRES WRES IWRES Y DV NOAPPEND NOPRINT FILE=sdtab

$TABLE  ID CL V KA TLAG ETA_CL ETA_V ETA_KA ETA_TLAG NOAPPEND NOPRINT FILE=patab

$TABLE  ID LOGTWT NOAPPEND NOPRINT FILE=cotab

NM-TRAN MESSAGES
 WARNINGS AND ERRORS (IF ANY) FOR PROBLEM    1
 (WARNING  2) NM-TRAN INFERS THAT THE DATA ARE POPULATION.
 (WARNING  121) INTERACTION IS IMPLIED WITH EM/BAYES ESTIMATION METHODS
 (MU_WARNING 26) DATA ITEM(S) USED IN DEFINITION OF MU_(S) SHOULD BE CONSTANT FOR INDIV. REC.:
  LOGTWT

1NONLINEAR MIXED EFFECTS MODEL PROGRAM (NONMEM) VERSION 7.3.0
 ORIGINALLY DEVELOPED BY STUART BEAL, LEWIS SHEINER, AND ALISON BOECKMANN
 CURRENT DEVELOPERS ARE ROBERT BAUER, ICON DEVELOPMENT SOLUTIONS,
 AND ALISON BOECKMANN. IMPLEMENTATION, EFFICIENCY, AND STANDARDIZATION
 PERFORMED BY NOUS INFOSYSTEMS.
 PROBLEM NO.:         1
 "UseCase1.mdl - generated by MDL2PharmML v.6.0"
 TOT. NO. OF OBS RECS:      250
 TOT. NO. OF INDIVIDUALS:     32
 GENERAL NONLINEAR KINETICS MODEL USING LSODA (ADVAN13)
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 #TBLN:      1
 #METH: Stochastic Approximation Expectation-Maximization (No Prior)
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
 #TERM:
 STOCHASTIC PORTION WAS NOT TESTED FOR CONVERGENCE
 REDUCED STOCHASTIC PORTION WAS COMPLETED

 ETABAR IS THE ARITHMETIC MEAN OF THE ETA-ESTIMATES,
 AND THE P-VALUE IS GIVEN FOR THE NULL HYPOTHESIS THAT THE TRUE MEAN IS 0.

 ETABAR:         5.6106E-06 -4.2957E-06 -4.1354E-05 -9.2107E-08
 SE:             4.4652E-02  2.0951E-02  7.5243E-02  1.5755E-02
 N:                      32          32          32          32

 P VAL.:         9.9990E-01  9.9984E-01  9.9956E-01  1.0000E+00

 ETAshrink(%):   1.5349E+00  1.2847E+01  4.7200E+01  9.4501E+00
 EBVshrink(%):   1.5322E+00  1.2850E+01  4.7211E+01  6.5306E+01
 EPSshrink(%):   2.1772E+00

 #TERE:
 Elapsed estimation time in seconds:  3327.00

 ********************           STOCHASTIC APPROXIMATION EXPECTATION-MAXIMIZATION (NO PRIOR)         ********************
 #OBJT:**************                        FINAL VALUE OF LIKELIHOOD FUNCTION                      ********************
 #OBJV:********************************************     -526.793       **************************************************

 ********************           STOCHASTIC APPROXIMATION EXPECTATION-MAXIMIZATION (NO PRIOR)         ********************
 ********************                             FINAL PARAMETER ESTIMATE                           ********************

 THETA - VECTOR OF FIXED EFFECTS PARAMETERS   *********
         TH 1      TH 2      TH 3      TH 4      TH 5      TH 6      TH 7      TH 8
         1.33E-01  8.18E+00  1.79E+00  9.79E-01  1.08E-01  4.42E-17  7.50E-01  1.00E+00

 OMEGA - COV MATRIX FOR RANDOM EFFECTS - ETAS  ********
            ETA1      ETA2      ETA3      ETA4
 ETA1
+        6.79E-02
 ETA2
+        1.25E-02  1.91E-02
 ETA3
+        0.00E+00  0.00E+00  6.71E-01
 ETA4
+        0.00E+00  0.00E+00  0.00E+00  1.00E-02

 SIGMA - COV MATRIX FOR RANDOM EFFECTS - EPSILONS  ****
            EPS1
 EPS1
+        1.00E+00

 OMEGA - CORR MATRIX FOR RANDOM EFFECTS - ETAS  *******
            ETA1      ETA2      ETA3      ETA4
 ETA1
+        2.61E-01
 ETA2
+        3.47E-01  1.38E-01
 ETA3
+        0.00E+00  0.00E+00  8.19E-01
 ETA4
+        0.00E+00  0.00E+00  0.00E+00  1.00E-01

 SIGMA - CORR MATRIX FOR RANDOM EFFECTS - EPSILONS  ***
            EPS1
 EPS1
+        1.00E+00
 #CPUT: Total CPU Time in Seconds,     3294.460
