Mon Sep 28 14:52:07 CEST 2015
$PROBLEM    MOXONIDINE PK,FINAL ESTIMATES,ALL DATA
;;

;; run 1, FOCEI, Lag model, all data

;;
$ABBREVIATED DERIV2=NO COMRES=6
$INPUT      ID VISI XAT2=DROP DGRP=DROP DOSE=DROP FLAG=DROP ONO=DROP ;2
            XIME=DROP DVO=DROP NEUY=DROP SCR=DROP AGE SEX NYHA=DROP WT ;3
            COMP ACE DIG DIU NUMB=DROP TAD TIME VIDD=DROP CLCR AMT SS ;9
            II VID CMT=DROP CONO=DROP DV EVID=DROP OVID=DROP ;3
            SHR SHR2=DROP ;1
$DATA      mx19.csv IGNORE=@
$SUBROUTINE ADVAN2 TRANS1
$PK

;-----------OCCASIONS----------
   VIS3               = 0
   IF(VISI.EQ.3) VIS3 = 1
   VIS8               = 0
   IF(VISI.EQ.8) VIS8 = 1

;----------IOV--------------------

   KPCL  = VIS3*ETA(4)+VIS8*ETA(5)
   KPKA  = VIS3*ETA(6)+VIS8*ETA(7)

;---------- PK model ------------------

   TVCL  = THETA(1)*(1+THETA(6)*(CLCR-65))
   TVV   = THETA(2)*WT

   CL    = TVCL*EXP(ETA(1)+KPCL)
   V     = TVV*EXP(ETA(2))
   KA    = THETA(3)*EXP(ETA(3)+KPKA)
   ALAG1 = THETA(4)
   K     = CL/V
   S2    = V

$ERROR

     IPRED = LOG(.025)
     W     = THETA(5)
     IF(F.GT.0) IPRED = LOG(F)
     IRES  = IPRED-DV
     IWRES = IRES/W
     Y     = IPRED+ERR(1)*W

$THETA  (0,26.6) FIX ; TVCL
$THETA  (0,1.43) FIX ; TVV
$THETA  (0,4.45) FIX ; TVKA
$THETA  (0,.240) FIX ; LAG
$THETA  (0,.33) FIX ; RES ERR
$THETA  (0,.00758,.02941) FIX ; CRCL on CL
$OMEGA  BLOCK(2) FIX
 0.0444
 0.027 0.0241  ; IIV (CL-V)
$OMEGA  BLOCK(1) FIX
 3.0  ;     IIV KA
$OMEGA  BLOCK(1) FIX
 0.0165  ;     IOV CL
$OMEGA  BLOCK(1) SAME
$OMEGA  BLOCK(1) FIX
 0.495  ;     IOV KA
$OMEGA  BLOCK(1) SAME
$SIGMA  1  FIX
$ESTIMATION METHOD=1 INTER MAXEVALS=0 PRINT=2 POSTHOC
;$COVARIANCE PRINT=E
$TABLE      ID TAD IPRED IWRES VISI ONEHEADER NOPRINT FILE=sdtab1
$TABLE      ID CL V KA ALAG1 ETA(1) ETA(2) ETA(3) ONEHEADER NOPRINT
            FILE=patab1
$TABLE      ID AGE WT CLCR ONEHEADER NOPRINT FILE=cotab1
$TABLE      ID SEX ACE DIG DIU COMP ONEHEADER NOPRINT FILE=catab1
$TABLE      ID TAD NPRED NRES NWRES PREDI RESI WRESI CPRED CRES CWRES
            CPREDI CRESI CWRESI EPRED ERES EWRES PRED RES WRES NPDE
            ECWRES NOPRINT ONEHEADER FILE=mytab1

NM-TRAN MESSAGES
 WARNINGS AND ERRORS (IF ANY) FOR PROBLEM    1
 (WARNING  2) NM-TRAN INFERS THAT THE DATA ARE POPULATION.
Note: The following floating-point exceptions are signalling: IEEE_INVALID_FLAG IEEE_DIVIDE_BY_ZERO

1NONLINEAR MIXED EFFECTS MODEL PROGRAM (NONMEM) VERSION 7.3.0
 ORIGINALLY DEVELOPED BY STUART BEAL, LEWIS SHEINER, AND ALISON BOECKMANN
 CURRENT DEVELOPERS ARE ROBERT BAUER, ICON DEVELOPMENT SOLUTIONS,
 AND ALISON BOECKMANN. IMPLEMENTATION, EFFICIENCY, AND STANDARDIZATION
 PERFORMED BY NOUS INFOSYSTEMS.
 PROBLEM NO.:         1
 MOXONIDINE PK,FINAL ESTIMATES,ALL DATA
 TOT. NO. OF OBS RECS:     1022
 TOT. NO. OF INDIVIDUALS:     74
 ONE COMPARTMENT MODEL WITH FIRST-ORDER ABSORPTION (ADVAN2)
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 #TBLN:      1
 #METH: First Order Conditional Estimation with Interaction (Evaluation)
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
 ********************         FIRST ORDER CONDITIONAL ESTIMATION WITH INTERACTION (EVALUATION)       ********************
 #OBJT:**************                       MINIMUM VALUE OF OBJECTIVE FUNCTION                      ********************
 #OBJV:********************************************     -753.566       **************************************************

 ********************         FIRST ORDER CONDITIONAL ESTIMATION WITH INTERACTION (EVALUATION)       ********************
 ********************                             FINAL PARAMETER ESTIMATE                           ********************

 THETA - VECTOR OF FIXED EFFECTS PARAMETERS   *********
         TH 1      TH 2      TH 3      TH 4      TH 5      TH 6
         2.66E+01  1.43E+00  4.45E+00  2.40E-01  3.30E-01  7.58E-03

 OMEGA - COV MATRIX FOR RANDOM EFFECTS - ETAS  ********
            ETA1      ETA2      ETA3      ETA4      ETA5      ETA6      ETA7
 ETA1
+        4.44E-02
 ETA2
+        2.70E-02  2.41E-02
 ETA3
+        0.00E+00  0.00E+00  3.00E+00
 ETA4
+        0.00E+00  0.00E+00  0.00E+00  1.65E-02
 ETA5
+        0.00E+00  0.00E+00  0.00E+00  0.00E+00  1.65E-02
 ETA6
+        0.00E+00  0.00E+00  0.00E+00  0.00E+00  0.00E+00  4.95E-01
 ETA7
+        0.00E+00  0.00E+00  0.00E+00  0.00E+00  0.00E+00  0.00E+00  4.95E-01

 SIGMA - COV MATRIX FOR RANDOM EFFECTS - EPSILONS  ****
            EPS1
 EPS1
+        1.00E+00

 OMEGA - CORR MATRIX FOR RANDOM EFFECTS - ETAS  *******
            ETA1      ETA2      ETA3      ETA4      ETA5      ETA6      ETA7
 ETA1
+        2.11E-01
 ETA2
+        8.25E-01  1.55E-01
 ETA3
+        0.00E+00  0.00E+00  1.73E+00
 ETA4
+        0.00E+00  0.00E+00  0.00E+00  1.28E-01
 ETA5
+        0.00E+00  0.00E+00  0.00E+00  0.00E+00  1.28E-01
 ETA6
+        0.00E+00  0.00E+00  0.00E+00  0.00E+00  0.00E+00  7.04E-01
 ETA7
+        0.00E+00  0.00E+00  0.00E+00  0.00E+00  0.00E+00  0.00E+00  7.04E-01

 SIGMA - CORR MATRIX FOR RANDOM EFFECTS - EPSILONS  ***
            EPS1
 EPS1
+        1.00E+00
 #CPUT: Total CPU Time in Seconds,        1.312
