24/04/2015
14:46
; model the data using ETA on Cl and V and with covariance

$PROBLEM Fit simulated data from 1 comp model where large correlation between CL and V was used in simulation

$INPUT TIME MDV EVID AMT DV ID

$DATA C:\Users\Public\Projects\Rupert\Correlated_Parameters\Data\NM_data.csv IGNORE=@

$SUBROUTINES ADVAN13 TRANS1 TOL=9

$MODEL  NCOMPARTMENTS=2
	COMP=(CPT1 DEFDOSE)  ; Depot compartment
	COMP=(CPT2 DEFOBS)   ; Central compartment

$PK
MU_1 = LOG(THETA(1))
CL = EXP(MU_1 + ETA(1))

MU_2 = LOG(THETA(2))
V = EXP(MU_2 + ETA(2))

KA = THETA(3)

K20=CL/V

$DES

DADT(1) = - KA*A(1)
DADT(2) = KA*A(1) - K20*A(2)

$ERROR
IPRED = A(2)/V
Y = IPRED + IPRED*EPS(1)

$THETA
(0,2,20)           ; CL; Simulation value = 1
(0,10,50)          ; V; Simulation value = 5
(0,1,5)            ; KA; Simulation value = 0.5

$OMEGA BLOCK(2)
0.1			; IIV CL; Simulation value = 0.35
0.05 0.2		; IIV V;  Simulation values = 0.185   0.1

$SIGMA
0.1  			; RES; Simulation value = 0.05

$EST METHOD=COND INTERACTION MAXEVAL=9999 NSIG=3 SIGL=9 PRINT=1 MSFO=MSFO.txt

$COV PRINT=E CONDITIONAL

$TABLE ID TIME MDV EVID IPRED PRED CWRES ETA1 ETA2 CL V KA NOPRINT ONEHEADER FILE=run002.tab

NM-TRAN MESSAGES
 WARNINGS AND ERRORS (IF ANY) FOR PROBLEM    1
 (WARNING  2) NM-TRAN INFERS THAT THE DATA ARE POPULATION.

1NONLINEAR MIXED EFFECTS MODEL PROGRAM (NONMEM) VERSION 7.3.0
 ORIGINALLY DEVELOPED BY STUART BEAL, LEWIS SHEINER, AND ALISON BOECKMANN
 CURRENT DEVELOPERS ARE ROBERT BAUER, ICON DEVELOPMENT SOLUTIONS,
 AND ALISON BOECKMANN. IMPLEMENTATION, EFFICIENCY, AND STANDARDIZATION
 PERFORMED BY NOUS INFOSYSTEMS.
 PROBLEM NO.:         1
 Fit simulated data from 1 comp model where large correlation between CL
 TOT. NO. OF OBS RECS:      550
 TOT. NO. OF INDIVIDUALS:     50
 GENERAL NONLINEAR KINETICS MODEL USING LSODA (ADVAN13)
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 #TBLN:      1
 #METH: First Order Conditional Estimation with Interaction
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
 #TERM:
0MINIMIZATION SUCCESSFUL
 NO. OF FUNCTION EVALUATIONS USED:      230
 NO. OF SIG. DIGITS IN FINAL EST.:  3.5

 ETABAR IS THE ARITHMETIC MEAN OF THE ETA-ESTIMATES,
 AND THE P-VALUE IS GIVEN FOR THE NULL HYPOTHESIS THAT THE TRUE MEAN IS 0.

 ETABAR:         7.4885E-04  1.1630E-04
 SE:             8.6692E-02  4.7989E-02
 N:                      50          50

 P VAL.:         9.9311E-01  9.9807E-01

 ETAshrink(%):   1.0000E-10  1.0000E-10
 EBVshrink(%):   3.6934E-01  9.4231E-01
 EPSshrink(%):   4.9287E+00

 #TERE:
 Elapsed estimation time in seconds:    34.21
 Elapsed covariance time in seconds:    18.78

 ********************               FIRST ORDER CONDITIONAL ESTIMATION WITH INTERACTION              ********************
 #OBJT:**************                       MINIMUM VALUE OF OBJECTIVE FUNCTION                      ********************
 #OBJV:********************************************     5520.428       **************************************************

 ********************               FIRST ORDER CONDITIONAL ESTIMATION WITH INTERACTION              ********************
 ********************                             FINAL PARAMETER ESTIMATE                           ********************

 THETA - VECTOR OF FIXED EFFECTS PARAMETERS   *********
         TH 1      TH 2      TH 3
         9.80E-01  4.89E+00  5.06E-01

 OMEGA - COV MATRIX FOR RANDOM EFFECTS - ETAS  ********
            ETA1      ETA2
 ETA1
+        3.79E-01
 ETA2
+        2.10E-01  1.17E-01

 SIGMA - COV MATRIX FOR RANDOM EFFECTS - EPSILONS  ****
            EPS1
 EPS1
+        4.93E-02

 OMEGA - CORR MATRIX FOR RANDOM EFFECTS - ETAS  *******
            ETA1      ETA2
 ETA1
+        6.15E-01
 ETA2
+        9.96E-01  3.43E-01

 SIGMA - CORR MATRIX FOR RANDOM EFFECTS - EPSILONS  ***
            EPS1
 EPS1
+        2.22E-01

 ********************               FIRST ORDER CONDITIONAL ESTIMATION WITH INTERACTION              ********************
 ********************                            STANDARD ERROR OF ESTIMATE                          ********************

 THETA - VECTOR OF FIXED EFFECTS PARAMETERS   *********
         TH 1      TH 2      TH 3
         8.63E-02  2.68E-01  1.84E-02

 OMEGA - COV MATRIX FOR RANDOM EFFECTS - ETAS  ********
            ETA1      ETA2
 ETA1
+        8.15E-02
 ETA2
+        4.53E-02  2.56E-02

 SIGMA - COV MATRIX FOR RANDOM EFFECTS - EPSILONS  ****
            EPS1
 EPS1
+        3.07E-03

 OMEGA - CORR MATRIX FOR RANDOM EFFECTS - ETAS  *******
            ETA1      ETA2
 ETA1
+        6.62E-02
 ETA2
+        3.77E-03  3.74E-02

 SIGMA - CORR MATRIX FOR RANDOM EFFECTS - EPSILONS  ***
            EPS1
 EPS1
+        6.91E-03

 ********************               FIRST ORDER CONDITIONAL ESTIMATION WITH INTERACTION              ********************
 ********************                          COVARIANCE MATRIX OF ESTIMATE                         ********************

            TH 1      TH 2      TH 3      OM11      OM12      OM22      SG11
 TH 1
+        7.45E-03
 TH 2
+        2.17E-02  7.17E-02
 TH 3
+        1.36E-04  1.82E-03  3.40E-04
 OM11
+       -1.24E-05 -5.20E-05  3.12E-05  6.64E-03
 OM12
+       -3.12E-05  1.65E-05  3.92E-05  3.66E-03  2.05E-03
 OM22
+       -2.30E-05  6.55E-05  3.35E-05  2.01E-03  1.15E-03  6.56E-04
 SG11
+        3.06E-05  2.18E-04  2.14E-05 -5.57E-05 -2.96E-05 -1.59E-05  9.41E-06

 ********************               FIRST ORDER CONDITIONAL ESTIMATION WITH INTERACTION              ********************
 ********************                          CORRELATION MATRIX OF ESTIMATE                        ********************

            TH 1      TH 2      TH 3      OM11      OM12      OM22      SG11
 TH 1
+        8.63E-02
 TH 2
+        9.37E-01  2.68E-01
 TH 3
+        8.53E-02  3.69E-01  1.84E-02
 OM11
+       -1.77E-03 -2.38E-03  2.08E-02  8.15E-02
 OM12
+       -7.99E-03  1.36E-03  4.70E-02  9.91E-01  4.53E-02
 OM22
+       -1.04E-02  9.55E-03  7.10E-02  9.64E-01  9.90E-01  2.56E-02
 SG11
+        1.16E-01  2.66E-01  3.78E-01 -2.23E-01 -2.14E-01 -2.02E-01  3.07E-03
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
 ********************               FIRST ORDER CONDITIONAL ESTIMATION WITH INTERACTION              ********************
 ********************                      EIGENVALUES OF COR MATRIX OF ESTIMATE                     ********************

             1         2         3         4         5         6         7
         1.62E-04  1.76E-02  3.46E-02  5.85E-01  1.17E+00  2.16E+00  3.03E+00
 #CPUT: Total CPU Time in Seconds,       52.713
