$PROBLEM Mouse tumour growth

$INPUT ID TIME DV GROUP MDV EVID CEN

$DATA data.csv IGNORE=@

$SUBROUTINE ADVAN13 TRANS1 TOL=9

$MODEL  NCOMPARTMENTS=1
	COMP=(CPT1 DEFOBS DEFDOSE) ; Tumour compartment where tumour size observations are modelled

$PK

MU_1 = THETA(1)
MU_2 = THETA(2)
MU_3 = THETA(3)

BLN = EXP(MU_1 + ETA(1))           ; intial tumour size
KL = EXP(MU_2 + ETA(2))            ; rate constant for tumour growth
Eff = EXP(MU_3 + ETA(3))
KD0 = THETA(4)
L0 = THETA(5)

A_0(1) = BLN

$DES

LAM = L0 - Eff*CEN
KD = KD0*EXP(-LAM*T)

DADT(1) = KL*A(1) - KD*A(1)

A_1 = A(1)

$ERROR

IPRED = F
Y = F + F*EPS(1)

$THETA
3.4                             ; ln(BLN)
-2.25                           ; ln(KL)
-9                              ; ln(IC50)
0.119                   	; KD0
0.025                           ;  L0

$OMEGA BLOCK(3)
0.1                             ; ETA(1)
0.01 0.1                        ; ETA(2)
0.01 0.01 0.1			; ETA(3)

$SIGMA
0.0225                          ; EPS(1)

$EST METHOD=COND INTERACTION MAXEVAL=9999 NSIG=3 SIGL=9 PRINT=5 MSFO=run004.txt

$COV PRINT=E UNCONDITIONAL SIGL=9

$TABLE ID TIME MDV EVID GROUP CEN IPRED CWRES A_1 BLN KD0 KL Eff L0 NOPRINT ONEHEADER FILE=run004.tab

NM-TRAN MESSAGES
 WARNINGS AND ERRORS (IF ANY) FOR PROBLEM    1
 (WARNING  2) NM-TRAN INFERS THAT THE DATA ARE POPULATION.
 (WARNING  48) DES-DEFINED ITEMS ARE COMPUTED ONLY WHEN EVENT TIME
 INCREASES. E.G., DISPLAYED VALUES ASSOCIATED WITH THE FIRST EVENT RECORD
 OF AN INDIVIDUAL RECORD ARE COMPUTED WITH (THE LAST ADVANCE TO) AN EVENT
 TIME OF THE PRIOR INDIVIDUAL RECORD.

1NONLINEAR MIXED EFFECTS MODEL PROGRAM (NONMEM) VERSION 7.2.0
 ORIGINALLY DEVELOPED BY STUART BEAL, LEWIS SHEINER, AND ALISON BOECKMANN
 CURRENT DEVELOPERS ARE ROBERT BAUER, ICON DEVELOPMENT SOLUTIONS,
 AND ALISON BOECKMANN. IMPLEMENTATION, EFFICIENCY, AND STANDARDIZATION
 PERFORMED BY NOUS INFOSYSTEMS.
 PROBLEM NO.:         1
 Mouse tumour growth for MPS1 project BAY1161909
 TOT. NO. OF OBS RECS:      607
 TOT. NO. OF INDIVIDUALS:     32
 GENERAL NONLINEAR KINETICS MODEL USING LSODA (ADVAN13)
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 #TBLN:      1
 #METH: First Order Conditional Estimation with Interaction
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
 #TERM:
0MINIMIZATION TERMINATED
 DUE TO MAX. NO. OF FUNCTION EVALUATIONS EXCEEDED
 NO. OF FUNCTION EVALUATIONS USED:    10004
 NO. OF SIG. DIGITS UNREPORTABLE

 ETABAR IS THE ARITHMETIC MEAN OF THE ETA-ESTIMATES,
 AND THE P-VALUE IS GIVEN FOR THE NULL HYPOTHESIS THAT THE TRUE MEAN IS 0.

 ETABAR:        -1.6357E-03  2.0845E-03  5.8921E-02
 SE:             1.6147E-02  1.9567E-02  3.2795E-01

 P VAL.:         9.1931E-01  9.1516E-01  8.5742E-01

 ETAshrink(%):   7.0276E+00  1.9407E+00  9.8765E+00
 EPSshrink(%):   4.6988E+00

 #TERE:
 Elapsed estimation time in seconds:  1469.99
 Elapsed covariance time in seconds:    28.13

 ********************               FIRST ORDER CONDITIONAL ESTIMATION WITH INTERACTION              ********************
 #OBJT:**************                       MINIMUM VALUE OF OBJECTIVE FUNCTION                      ********************
 #OBJV:********************************************     2746.064       **************************************************

 ********************               FIRST ORDER CONDITIONAL ESTIMATION WITH INTERACTION              ********************
 ********************                             FINAL PARAMETER ESTIMATE                           ********************

 THETA - VECTOR OF FIXED EFFECTS PARAMETERS   *********
         TH 1      TH 2      TH 3      TH 4      TH 5
         3.38E+00 -2.21E+00 -1.07E+01  1.22E-01  2.39E-02

 OMEGA - COV MATRIX FOR RANDOM EFFECTS - ETAS  ********
            ETA1      ETA2      ETA3
 ETA1
+        9.96E-03
 ETA2
+        4.56E-03  1.32E-02
 ETA3
+       -1.26E-01 -1.87E-01  4.37E+00

 SIGMA - COV MATRIX FOR RANDOM EFFECTS - EPSILONS  ****
            EPS1
 EPS1
+        1.24E-02

 OMEGA - CORR MATRIX FOR RANDOM EFFECTS - ETAS  *******
            ETA1      ETA2      ETA3
 ETA1
+        9.98E-02
 ETA2
+        3.98E-01  1.15E-01
 ETA3
+       -6.05E-01 -7.81E-01  2.09E+00

 SIGMA - CORR MATRIX FOR RANDOM EFFECTS - EPSILONS  ***
            EPS1
 EPS1
+        1.11E-01

 ********************               FIRST ORDER CONDITIONAL ESTIMATION WITH INTERACTION              ********************
 ********************                            STANDARD ERROR OF ESTIMATE                          ********************

 THETA - VECTOR OF FIXED EFFECTS PARAMETERS   *********
         TH 1      TH 2      TH 3      TH 4      TH 5
         2.21E-02  6.77E-01  5.21E+00  6.85E-02  2.36E-02

 OMEGA - COV MATRIX FOR RANDOM EFFECTS - ETAS  ********
            ETA1      ETA2      ETA3
 ETA1
+        3.19E-03
 ETA2
+        3.83E-03  1.75E-02
 ETA3
+        2.12E-01  3.21E-01  1.37E+01

 SIGMA - COV MATRIX FOR RANDOM EFFECTS - EPSILONS  ****
            EPS1
 EPS1
+        1.36E-03

 OMEGA - CORR MATRIX FOR RANDOM EFFECTS - ETAS  *******
            ETA1      ETA2      ETA3
 ETA1
+        1.60E-02
 ETA2
+        2.00E-01  7.62E-02
 ETA3
+        3.13E-01  4.71E-01  3.27E+00

 SIGMA - CORR MATRIX FOR RANDOM EFFECTS - EPSILONS  ***
            EPS1
 EPS1
+        6.12E-03

 ********************               FIRST ORDER CONDITIONAL ESTIMATION WITH INTERACTION              ********************
 ********************                          COVARIANCE MATRIX OF ESTIMATE                         ********************

            TH 1      TH 2      TH 3      TH 4      TH 5      OM11      OM12      OM13      OM22      OM23      OM33      SG11
 TH 1
+        4.87E-04
 TH 2
+       -1.12E-02  4.58E-01
 TH 3
+        7.36E-02 -3.04E+00  2.71E+01
 TH 4
+       -1.12E-03  4.63E-02 -2.99E-01  4.69E-03
 TH 5
+        4.01E-04 -1.59E-02  1.10E-01 -1.60E-03  5.56E-04
 OM11
+        5.45E-06 -4.10E-04  1.99E-03 -4.70E-05  1.29E-05  1.02E-05
 OM12
+        4.57E-05 -1.80E-03  1.04E-02 -1.88E-04  6.15E-05  8.01E-06  1.47E-05
 OM13
+        2.60E-03 -9.13E-02  9.73E-01 -8.67E-03  3.43E-03 -7.52E-05  1.97E-04  4.49E-02
 OM22
+        2.83E-04 -1.17E-02  7.34E-02 -1.18E-03  4.01E-04  1.20E-05  4.73E-05  2.09E-03  3.05E-04
 OM23
+        3.22E-03 -1.18E-01  1.45E+00 -1.11E-02  4.56E-03  2.15E-05  3.05E-04  6.40E-02  2.52E-03  1.03E-01
 OM33
+       -1.92E-01  7.46E+00 -7.03E+01  7.26E-01 -2.72E-01 -3.85E-03 -2.46E-02 -2.71E+00 -1.77E-01 -4.06E+00  1.87E+02
 SG11
+       -4.35E-06  1.05E-04 -1.19E-03  9.22E-06 -3.88E-06  1.85E-06  1.30E-06 -6.53E-05 -1.36E-06 -1.01E-04  3.56E-03  1.86E-06

 ********************               FIRST ORDER CONDITIONAL ESTIMATION WITH INTERACTION              ********************
 ********************                          CORRELATION MATRIX OF ESTIMATE                        ********************

            TH 1      TH 2      TH 3      TH 4      TH 5      OM11      OM12      OM13      OM22      OM23      OM33      SG11
 TH 1
+        2.21E-02
 TH 2
+       -7.49E-01  6.77E-01
 TH 3
+        6.40E-01 -8.63E-01  5.21E+00
 TH 4
+       -7.39E-01  9.98E-01 -8.37E-01  6.85E-02
 TH 5
+        7.71E-01 -9.96E-01  8.92E-01 -9.90E-01  2.36E-02
 OM11
+        7.74E-02 -1.90E-01  1.20E-01 -2.15E-01  1.72E-01  3.19E-03
 OM12
+        5.41E-01 -6.94E-01  5.23E-01 -7.15E-01  6.81E-01  6.56E-01  3.83E-03
 OM13
+        5.56E-01 -6.36E-01  8.81E-01 -5.98E-01  6.86E-01 -1.11E-01  2.43E-01  2.12E-01
 OM22
+        7.33E-01 -9.86E-01  8.06E-01 -9.89E-01  9.73E-01  2.15E-01  7.08E-01  5.65E-01  1.75E-02
 OM23
+        4.54E-01 -5.43E-01  8.68E-01 -5.03E-01  6.01E-01  2.09E-02  2.48E-01  9.40E-01  4.49E-01  3.21E-01
 OM33
+       -6.36E-01  8.06E-01 -9.88E-01  7.76E-01 -8.44E-01 -8.82E-02 -4.69E-01 -9.37E-01 -7.40E-01 -9.23E-01  1.37E+01
 SG11
+       -1.45E-01  1.14E-01 -1.67E-01  9.88E-02 -1.21E-01  4.27E-01  2.49E-01 -2.26E-01 -5.70E-02 -2.30E-01  1.91E-01  1.36E-03
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
 ********************               FIRST ORDER CONDITIONAL ESTIMATION WITH INTERACTION              ********************
 ********************                      EIGENVALUES OF COR MATRIX OF ESTIMATE                     ********************

             1         2         3         4         5         6         7         8         9        10        11        12
         1.36E-04  5.64E-04  1.71E-03  8.66E-03  2.01E-02  4.82E-02  1.47E-01  3.83E-01  5.71E-01  1.05E+00  2.07E+00  7.70E+00
