Thu Mar 19 14:58:26 CET 2015
;; Final bjorkman
$SIZES      PC=44 LTH=80 LVR=46 PCT=50 PD=70
$PROBLEM    PBPK model rat Bjorkman - CMS and coli sequential
; Simulatenous estimation of both CMS and colistin parameters using final estimates form sequential estimation

; Colistin concentration dependent conversion rate constant for all tissues estimated

; Kp from Björkman S

; Dataset excluding the first data point for rat 10.

; Prior on all Kp, SLF and F. Uncertainty of 50% for Kp and SLF priors except Kp of the biggest tissues and F RSE=25%.

; Reabsorption clearance set to 9XQURI.

; IIV on relevant parameters: coli Kp, SLF, KHYD and KNR.
$INPUT      ID TIME TAG CM=DROP CONC=DROP LNCO=DV AMT RATE EVID
            MDV=DROP CMT L2 SPE WT CRCLTYP TVART TVVEN TVLUN TVBRA
            TVHRT TVSKN TVMUS TVADI TVSPL TVGIO TVHEP TVKID TVTUB
            TVRES TQART TQVEN TQLUN TQBRA TQHRT TQSKN TQMUS TQADI
            TQSPL TQGIO TQHEPT TQHEPA TQKID TQRES QURI RBP
$DATA      ANA_DAT_VF_DEL.csv IGNORE=#
$SUBROUTINE ADVAN13 TOL=12
$PRIOR      NWPRI ;NTHETA=18 NETA=10 NTHP=10 NETP=0 NPEXP=1
$MODEL      COMP=(ART1) ;; 1- Arteries CMS
            COMP=(VEN1) ;; 2- Veins CMS
            COMP=(LUN1) ;; 3- Lungs CMS
            COMP=(BRA1) ;; 4- Brain CMS
            COMP=(HRT1) ;; 5- Heart CMS
            COMP=(SKN1) ;; 6- Skin CMS
            COMP=(MUS1) ;; 7- Muscle CMS
            COMP=(ADI1) ;; 8- Adipose CMS
            COMP=(SPL1) ;; 9- Spleen CMS
            COMP=(GIO1) ;; 10-GIO CMS
            COMP=(LIV1) ;; 11-Liver CMS
            COMP=(KID1) ;; 12-Kidney CMS
            COMP=(URIT1) ;; 13-Kidney tubules CMS
            COMP=(RES1) ;; 14-Rest CMS
            COMP=(ART2) ;; 15-Arteries Coli
            COMP=(VEN2) ;; 16-Veins Coli
            COMP=(LUN2) ;; 17-Lungs Coli
            COMP=(BRA2) ;; 18-Brain Coli
            COMP=(HRT2) ;; 19-Heart Coli
            COMP=(SKN2) ;; 20-Skin Coli
            COMP=(MUS2) ;; 21-Muscle Coli
            COMP=(ADI2) ;; 22-Adipose Coli
            COMP=(SPL2) ;; 23-Spleen Coli
            COMP=(GIO2) ;; 24-GIO Coli
            COMP=(LIV2) ;; 25-Liver Coli
            COMP=(KID2) ;; 26-Kidney Coli
            COMP=(URIT3) ;; 27-Kidney tubules Coli
            COMP=(RES2) ;; 28-Rest Coli
$PK
IF(NEWIND.NE.2)DOSE=AMT
;; ----------------------- Tissue-plasma Partition Coefficients ---------------------- ;;
TVFACT1= THETA(1)
FACT1  = TVFACT1*EXP(ETA(1))

TVFACT2= THETA(2)
FACT2  = TVFACT2*EXP(ETA(1))

TVFACT3= THETA(3)
FACT3  = TVFACT3*EXP(ETA(1))

TVFACT4= THETA(4)
FACT4  = TVFACT4*EXP(ETA(1))

TVFACT5= THETA(5)
FACT5  = TVFACT5*EXP(ETA(2))

TVFACT6= THETA(6)
FACT6  = TVFACT6*EXP(ETA(2))

TVFACT7= THETA(7)
FACT7  = TVFACT7*EXP(ETA(2))

TVFACT8= THETA(8)
FACT8  = TVFACT8*EXP(ETA(2))

TVSLF  = THETA(9)
SLF    = TVSLF*EXP(ETA(3))

TVF2   = THETA(10)
F2     = TVF2*EXP(ETA(4))
F16    = 1-F2

TVSLKH = THETA(11)
SLKH   = TVSLKH*EXP(ETA(5))

TVKH   = THETA(12)
KH     = TVKH*EXP(ETA(5))

KLU1   = FACT2*0.5150
KBR1   = FACT1*0.1075
KHR1   = FACT1*0.2750
KSK1   = FACT3*0.3120
KMU1   = FACT3*0.1250
KAD1   = FACT3*0.0995
KSP1   = FACT1*0.1975
KGI1   = FACT1*0.1195
KHE1   = FACT1*0.3288
KKI1   = FACT4*0.2600
KRE1   = FACT3*0.2236

KLU2   = FACT6*0.5050
KBR2   = FACT5*0.1025
KHR2   = FACT5*0.2690
KSK2   = FACT7*0.3120
KMU2   = FACT7*0.1202
KAD2   = FACT7*0.0945
KSP2   = FACT5*0.1925
KGI2   = FACT5*0.1185
KHE2   = FACT5*0.3203
KKI2   = FACT8*0.2500
KRE2   = FACT7*0.2185

VART = TVART*EXP(ETA(9))
VVEN = TVVEN*EXP(ETA(9))
VLUN = TVLUN*EXP(ETA(9))
VBRA = TVBRA*EXP(ETA(9))
VHRT = TVHRT*EXP(ETA(9))
VSKN = TVSKN*EXP(ETA(9))
VMUS = TVMUS*EXP(ETA(9))
VADI = TVADI*EXP(ETA(9))
VSPL = TVSPL*EXP(ETA(9))
VGIO = TVGIO*EXP(ETA(9))
VHEP = TVHEP*EXP(ETA(9))
VKID = TVKID*EXP(ETA(9))
VTUB = TVTUB*EXP(ETA(9))
VRES = TVRES*EXP(ETA(9))

QART = TQART*EXP(ETA(10))
QVEN = TQVEN*EXP(ETA(10))
QLUN = TQLUN*EXP(ETA(10))
QBRA = TQBRA*EXP(ETA(10))
QHRT = TQHRT*EXP(ETA(10))
QSKN = TQSKN*EXP(ETA(10))
QMUS = TQMUS*EXP(ETA(10))
QADI = TQADI*EXP(ETA(10))
QSPL = TQSPL*EXP(ETA(10))
QGIO = TQGIO*EXP(ETA(10))
QHEPA = TQHEPA*EXP(ETA(10))
QHEPT = TQHEPT*EXP(ETA(10))
QKID = TQKID*EXP(ETA(10))
QRES = TQRES*EXP(ETA(10))

;; ------------------------------- CL Parameters -------------------------------- ;;
TVKNR  = THETA(13)
KNR    = TVKNR*EXP(ETA(6))
;; ------------------------------- Unboun fractions ---------------------------- ;;
FUP1=0.70                       ;; CMS
FUP2=0.65                       ;; Colistin
;; ---------------------------- Volume of distribution ------------------------- ;;
SS11 = (KLU1*VLUN)+(KBR1*VBRA)+(KHR1*VHRT)+(KSK1*VSKN)+(KMU1*VMUS)+(KAD1*VADI)+(KSP1*VSPL)
SS12 = (KGI1*VGIO)+(KHE1*VHEP)+(KKI1*VKID)+(KRE1*VRES)+VART+VVEN+VTUB
VSS1 = SS11+SS12
SS21 = (KLU2*VLUN)+(KBR2*VBRA)+(KHR2*VHRT)+(KSK2*VSKN)+(KMU2*VMUS)+(KAD2*VADI)+(KSP2*VSPL)
SS22 = (KGI2*VGIO)+(KHE2*VHEP)+(KKI2*VKID)+(KRE2*VRES)+VART+VVEN+VTUB
VSS2 = SS21+SS22
$DES
;; ------------------------- Compartment concentrations ----------------------- ;;
C1 = A(1)/VART                                       ;; AMT/Arterial volume CMS
C2 = A(2)/VVEN                                       ;; AMT/Venous volume CMS
C3 = A(3)/VLUN                                       ;; AMT/Lung volume CMS
C4 = A(4)/VBRA                                       ;; AMT/Brain volume CMS
C5 = A(5)/VHRT                                       ;; AMT/Heart volume CMS
C6 = A(6)/VSKN                                       ;; AMT/Skin volume CMS
C7 = A(7)/VMUS                                       ;; AMT/Muscle volume CMS
C8 = A(8)/VADI                                       ;; AMT/Adipose volume CMS
C9 = A(9)/VSPL                                       ;; AMT/Spleen volume CMS
C10= A(10)/VGIO                                      ;; AMT/GIO volume CMS
C11= A(11)/VHEP                                      ;; AMT/Hepatic volume CMS
C12= A(12)/VKID                                      ;; AMT/Kidney volume CMS
C13= A(13)/VTUB                                      ;; AMT/Kidney tubules volume CMS
C14= A(14)/VRES                                      ;; AMT/Rest volume CMS

C15= A(15)/VART                                      ;; AMT/Arterial volume Coli
C16= A(16)/VVEN                                      ;; AMT/Venous volume Coli
C17= A(17)/VLUN                                      ;; AMT/Lung volume Coli
C18= A(18)/VBRA                                      ;; AMT/Brain volume Coli
C19= A(19)/VHRT                                      ;; AMT/Heart volume Coli
C20= A(20)/VSKN                                      ;; AMT/Skin volume Coli
C21= A(21)/VMUS                                      ;; AMT/Muscle volume Coli
C22= A(22)/VADI                                      ;; AMT/Adipose volume Coli
C23= A(23)/VSPL                                      ;; AMT/Spleen volume Coli
C24= A(24)/VGIO                                      ;; AMT/GIO volume Coli
C25= A(25)/VHEP                                      ;; AMT/Hepatic volume Coli
C26= A(26)/VKID                                      ;; AMT/Kidney volume Coli
C27= A(27)/VTUB                                      ;; AMT/Kidney tubules volume Coli
C28= A(28)/VRES                                      ;; AMT/Rest volume Coli
;; ---------------------------- Tissue clearances ----------------------------- ;;
;CMS hydrolysis
CLAR1 = SLKH*EXP(-KH*C1)*VART
CLVE1 = SLKH*EXP(-KH*C2)*VVEN
CLLU1 = SLKH*EXP(-KH*C3)*VLUN
CLBR1 = SLKH*EXP(-KH*C4)*VBRA
CLHR1 = SLKH*EXP(-KH*C5)*VHRT
CLSK1 = SLKH*EXP(-KH*C6)*VSKN
CLMU1 = SLKH*EXP(-KH*C7)*VMUS
CLAD1 = SLKH*EXP(-KH*C8)*VADI
CLSP1 = SLKH*EXP(-KH*C9)*VSPL
CLGI1 = SLKH*EXP(-KH*C10)*VGIO
CLHE1 = SLKH*EXP(-KH*C11)*VHEP
CLKI1 = SLKH*EXP(-KH*C12)*VKID
CLTUB1= SLKH*EXP(-KH*C13)*VTUB
CLRE1 = SLKH*EXP(-KH*C14)*VRES
;Colistin non-renal clearance
CLAR2 = KNR*VART
CLVE2 = KNR*VVEN
CLLU2 = KNR*VLUN
CLBR2 = KNR*VBRA
CLHR2 = KNR*VHRT
CLSK2 = KNR*VSKN
CLMU2 = KNR*VMUS
CLAD2 = KNR*VADI
CLSP2 = KNR*VSPL
CLGI2 = KNR*VGIO
CLHE2 = KNR*VHEP
CLKI2 = KNR*VKID
CLTUB2= KNR*VTUB
CLRE2 = KNR*VRES
CLREA = 9*QURI
CLHYD = CLAR1+CLVE1+CLLU1+CLBR1+CLHR1+CLSK1+CLMU1+CLAD1+CLSP1+CLGI1+CLHE1+CLKI1+CLTUB1+CLRE1
CLNR  = CLAR2+CLVE2+CLLU2+CLBR2+CLHR2+CLSK2+CLMU2+CLAD2+CLSP2+CLGI2+CLHE2+CLKI2+CLTUB2+CLRE2
;; ------------------------------- Abbreviations ------------------------------ ;;
VENIN1 = (C4*QBRA*RBP/KBR1)+(C5*QHRT*RBP/KHR1)+(C6*QSKN*RBP/KSK1)+(C7*QMUS*RBP/KMU1)
VENIN2 = (C8*QADI*RBP/KAD1)+(C11*QHEPT*RBP/KHE1)+(C12*QKID*RBP/KKI1)+(C14*QRES*RBP/KRE1)
VENOU1 = (QVEN*C2)+(C2*CLVE1)

HEPI1  = (C1*QHEPA)+(C9*QSPL*RBP/KSP1)+(C10*QGIO*RBP/KGI1)
HEPOU1 = (C11*QHEPT*RBP/KHE1)+(C11*CLHE1*RBP/KHE1)

VENIN3 = (C18*QBRA*RBP/KBR2)+(C19*QHRT*RBP/KHR2)+(C20*QSKN*RBP/KSK2)+(C21*QMUS*RBP/KMU2)
VENIN4 = (C22*QADI*RBP/KAD2)+(C25*QHEPT*RBP/KHE2)+(C26*QKID*RBP/KKI2)+(C28*QRES*RBP/KRE2)+(C2*CLVE1)
VENOU2 = (C16*QLUN)+(C16*CLVE2)

HEPI2  = (C15*QHEPA)+(C23*QSPL*RBP/KSP2)+(C24*QGIO*RBP/KGI2)+(C11*CLHE1*RBP/KHE1)
HEPOU2 = (C25*QHEPT*RBP/KHE2)+(CLHE2*C25*RBP/KHE2)

CLR1   = SLF*CRCLTYP
;QREA   = CRCLTYP-QURI
;; -------------------------- Differential equations -------------------------- ;;
DADT(1) = (QLUN*C3*RBP/KLU1)-(C1*CLAR1)-(QART*C1)
DADT(2) = (VENIN1+VENIN2-VENOU1)
DADT(3) = (QLUN*C2)-(C3*CLLU1*RBP/KLU1)-(QLUN*C3*RBP/KLU1)
DADT(4) = (QBRA*C1)-(C4*CLBR1*RBP/KBR1)-(QBRA*C4*RBP/KBR1)
DADT(5) = (QHRT*C1)-(C5*CLHR1*RBP/KHR1)-(QHRT*C5*RBP/KHR1)
DADT(6) = (QSKN*C1)-(C6*CLSK1*RBP/KSK1)-(QSKN*C6*RBP/KSK1)
DADT(7) = (QMUS*C1)-(C7*CLMU1*RBP/KMU1)-(QMUS*C7*RBP/KMU1)
DADT(8) = (QADI*C1)-(C8*CLAD1*RBP/KAD1)-(QADI*C8*RBP/KAD1)
DADT(9) = (QSPL*C1)-(C9*CLSP1*RBP/KSP1)-(QSPL*C9*RBP/KSP1)
DADT(10)= (QGIO*C1)-(C10*CLGI1*RBP/KGI1)-(QGIO*C10*RBP/KGI1)
DADT(11)= (HEPI1-HEPOU1)
DADT(12)= (QKID*C1)-(C12*CLKI1*RBP/KKI1)-(QKID*C12*RBP/KKI1)-(C1*CLR1)
DADT(13)= (C12*CLR1)-C13*(CLTUB1+QURI)
DADT(14)= (QRES*C1)-(C14*CLRE1*RBP/KRE1)-(QRES*C14*RBP/KRE1)

DADT(15)= (QLUN*C17*RBP/KLU2)+(C1*CLAR1)-(QART*C15)-(C15*CLAR2)
DADT(16)= (VENIN3+VENIN4-VENOU2)
DADT(17)= (QLUN*C16)+(C3*CLLU1*RBP/KLU1)-(QLUN*C17*RBP/KLU2)-(C17*CLLU2*RBP/KLU2)
DADT(18)= (QBRA*C15)+(C4*CLBR1*RBP/KBR1)-(QBRA*C18*RBP/KBR2)-(C18*CLBR2*RBP/KBR2)
DADT(19)= (QHRT*C15)+(C5*CLHR1*RBP/KHR1)-(QHRT*C19*RBP/KHR2)-(C19*CLHR2*RBP/KHR2)
DADT(20)= (QSKN*C15)+(C6*CLSK1*RBP/KSK1)-(QSKN*C20*RBP/KSK2)-(C20*CLSK2*RBP/KSK2)
DADT(21)= (QMUS*C15)+(C7*CLMU1*RBP/KMU1)-(QMUS*C21*RBP/KMU2)-(C21*CLMU2*RBP/KMU2)
DADT(22)= (QADI*C15)+(C8*CLAD1*RBP/KAD1)-(QADI*C22*RBP/KAD2)-(C22*CLAD2*RBP/KAD2)
DADT(23)= (QSPL*C15)+(C9*CLSP1*RBP/KSP1)-(QSPL*C23*RBP/KSP2)-(C23*CLSP2*RBP/KSP2)
DADT(24)= (QGIO*C15)+(C10*CLGI1*RBP/KGI1)-(QGIO*C24*RBP/KGI2)-(C24*CLGI2*RBP/KGI2)
DADT(25)= (HEPI2-HEPOU2)
DADT(26)= (QKID*C15)+(C12*CLKI1*RBP/KKI1)-(QKID*C26*RBP/KKI2)-(C26*CLKI2*RBP/KKI2)+(C27*CLREA)
DADT(27)= (C13*CLTUB1)-C27*(CLREA+CLTUB2+QURI)
DADT(28)= (QRES*C15)+(C14*CLRE1*RBP/KRE1)-(QRES*C28*RBP/KRE2)-(C28*CLRE2*RBP/KRE2)

$ERROR                                      (OBSERVATION ONLY)
AA1 = A(1)                                           ;; AMT/Arteries CMS
AA2 = A(2)                                           ;; AMT/Veins CMS
AA3 = A(3)                                           ;; AMT/Lungs CMS
AA4 = A(4)                                           ;; AMT/Brain CMS
AA5 = A(5)                                           ;; AMT/Heart CMS
AA6 = A(6)                                           ;; AMT/Skin CMS
AA7 = A(7)                                           ;; AMT/Muscle CMS
AA8 = A(8)                                           ;; AMT/Adipose CMS
AA9 = A(9)                                           ;; AMT/Spleen CMS
AA10= A(10)                                          ;; AMT/GIO CMS
AA11= A(11)                                          ;; AMT/Liver CMS
AA12= A(12)                                          ;; AMT/Kidney CMS
AA13= A(13)                                          ;; AMT/Kidney tubules CMS
AA14= A(14)                                          ;; AMT/Rest CMS

AA15= A(15)                                           ;; AMT/Arteries Coli
AA16= A(16)                                           ;; AMT/Veins Coli
AA17= A(17)                                           ;; AMT/Lungs Coli
AA18= A(18)                                           ;; AMT/Brain Coli
AA19= A(19)                                           ;; AMT/Heart Coli
AA20= A(20)                                           ;; AMT/Skin Coli
AA21= A(21)                                           ;; AMT/Muscle Coli
AA22= A(22)                                           ;; AMT/Adipose Coli
AA23= A(23)                                           ;; AMT/Spleen Coli
AA24= A(24)                                           ;; AMT/GIO Coli
AA25= A(25)                                           ;; AMT/Liver Coli
AA26= A(26)                                           ;; AMT/Kidney Coli
AA27= A(27)                                           ;; AMT/Kidney tubules Coli
AA28= A(28)                                           ;; AMT/Rest Coli

CC1 = A(1)/VART                                       ;; AMT/Arterial volume CMS
CC2 = A(2)/VVEN                                       ;; AMT/Venous volume CMS
CC3 = A(3)/VLUN                                       ;; AMT/Lung volume CMS
CC4 = A(4)/VBRA                                       ;; AMT/Brain volume CMS
CC5 = A(5)/VHRT                                       ;; AMT/Heart volume CMS
CC6 = A(6)/VSKN                                       ;; AMT/Skin volume CMS
CC7 = A(7)/VMUS                                       ;; AMT/Muscle volume CMS
CC8 = A(8)/VADI                                       ;; AMT/Adipose volume CMS
CC9 = A(9)/VSPL                                       ;; AMT/Spleen volume CMS
CC10= A(10)/VGIO                                      ;; AMT/GIO volume CMS
CC11= A(11)/VHEP                                      ;; AMT/Hepatic volume CMS
CC12= A(12)/VKID                                      ;; AMT/Kidney volume CMS
CC13= A(13)/VTUB                                      ;; AMT/Kidney tubules volume CMS
CC14= A(14)/VRES                                      ;; AMT/Rest volume CMS

CC15= A(15)/VART                                      ;; AMT/Arterial volume Coli
CC16= A(16)/VVEN                                      ;; AMT/Venous volume Coli
CC17= A(17)/VLUN                                      ;; AMT/Lung volume Coli
CC18= A(18)/VBRA                                      ;; AMT/Brain volume Coli
CC19= A(19)/VHRT                                      ;; AMT/Heart volume Coli
CC20= A(20)/VSKN                                      ;; AMT/Skin volume Coli
CC21= A(21)/VMUS                                      ;; AMT/Muscle volume Coli
CC22= A(22)/VADI                                      ;; AMT/Adipose volume Coli
CC23= A(23)/VSPL                                      ;; AMT/Spleen volume Coli
CC24= A(24)/VGIO                                      ;; AMT/GIO volume Coli
CC25= A(25)/VHEP                                      ;; AMT/Hepatic volume Coli
CC26= A(26)/VKID                                      ;; AMT/Kidney volume Coli
CC27= A(27)/VTUB                                      ;; AMT/Kidney tubules volume Coli
CC28= A(28)/VRES                                      ;; AMT/Rest volume Coli

IPRD1 = A(1)/(VART*RBP)
IF (IPRD1.LE.0) IPRD1=0.000001
IPRD2 = A(15)/(VART*RBP)
IF (IPRD2.LE.0) IPRD2=0.000001

IF(CMT.EQ.1) THEN
IPRED = LOG(IPRD1)
IRES  = DV-IPRED
W     =SQRT(THETA(14)**2+(THETA(15)/IPRD1)**2)
;IF(W.EQ.0) W=1
W2    = THETA(18)
IWRES = IRES/(W*EXP(ETA(7)))
Y = IPRED+(W*EXP(ETA(7)))*EPS(1)+W2*EPS(3)
ENDIF
IF(CMT.EQ.15) THEN
IPRED = LOG(IPRD2)
IRES  = DV-IPRED
W     =SQRT(THETA(16)**2+(THETA(17)/IPRD2)**2)
;IF(W.EQ.0) W=1
W2    = THETA(18)
IWRES = IRES/(W*EXP(ETA(8)))
Y = IPRED+(W*EXP(ETA(8)))*EPS(2)+W2*EPS(3)
ENDIF
;; ------------------------- Initial estimates THETA -------------------------- ;;
$THETA  (0,1.070270) ; 1 ~FACT1
$THETA  (0,1.011060) ; 2 ~FACT2
$THETA  (0,1.621790) ; 3 ~FACT3
$THETA  (0,0.994810) ; 4 ~FACT4
$THETA  (0,0.991695) ; 5 ~FACT5
$THETA  (0,0.999383) ; 6 ~FACT6
$THETA  (0,0.966497) ; 7 ~FACT7
$THETA  (0,296.5310) ; 8 ~FACT8
$THETA  (0,1.009430) ; 9 ~SLF
$THETA  (0,0.855659,1) ; 10~F2
$THETA  (0,0.580170) ; 11~SLKH
$THETA  0 FIX ; 12~KH
$THETA  (0,3.935360) ; 13~KNR
$THETA  (0,0.294797) ; 14 ~Res Prop
$THETA  (0,0.006751) FIX ; 15 ~Res Add
$THETA  (0,0.123423) ; 16~Prop Res Err Coli
$THETA  0 FIX ; 17~Add Res Err Coli
$THETA  (0,0.097491) ; 18~Common Res Err
;; ------------------------------- THETA prior values ------------------------- ;;
$THETAP  1 FIX ; ; 1 ~FACT1 prior
$THETAP  1 FIX ; ; 2 ~FACT2 prior
$THETAP  1 FIX ; ; 3 ~FACT3 prior
$THETAP  1 FIX ; ; 4 ~FACT4 prior
$THETAP  1 FIX ; ; 5 ~FACT5 prior
$THETAP  1 FIX ; ; 6 ~FACT6 prior
$THETAP  1 FIX ; ; 7 ~FACT7 prior
$THETAP  1 FIX ; ; 8 ~FACT8 prior
$THETAP  1 FIX ; ; 9 ~SLF prior
$THETAP  1 FIX ; ; 10~F2 prior
;; --------------------------- Initial estimates OMEGA ------------------------ ;;
$OMEGA  0  FIX  ; 1 ~IIV_KP CMS
$OMEGA  0.063255  ; 2 ~IIV_KP Coli
$OMEGA  0.080209  ; 3 ~IIV_SLF
$OMEGA  0  FIX  ;  4 ~IIV_F2
$OMEGA  0  FIX  ; 5 ~IIV_KHYD
$OMEGA  0.013412  ; 6 ~IIV_KNR
$OMEGA  0  FIX  ; 7 ~IIV_Res Err CMS
$OMEGA  0  FIX  ; 8 ~IIV_Res Err Coli
$OMEGA  0  FIX  ;  9 ~IIV_Vt
$OMEGA  0  FIX  ;  10~IIV_Qt
;; --------------------------- Prior Uncertainty in THETAS -------------------- ;;
$THETAPV  0.25  FIX  ;             ; 1 ~FACT1 prior
$THETAPV  0.25  FIX  ;             ; 2 ~FACT2 prior
$THETAPV  0.0625  FIX  ;             ; 3 ~FACT3 prior
$THETAPV  0.25  FIX  ;             ; 4 ~FACT4 prior
$THETAPV  0.25  FIX  ;             ; 5 ~FACT5 prior
$THETAPV  0.25  FIX  ;             ; 6 ~FACT6 prior
$THETAPV  0.0625  FIX  ;             ; 7 ~FACT7 prior
$THETAPV  10000  FIX  ;             ; 8 ~FACT8 prior
$THETAPV  0.01  FIX  ;             ; 9 ~SLF prior
$THETAPV  0.01  FIX  ;             ; 10~F2 prior
;; --------------------------- Initial estimates SIGMA ------------------------- ;;
$SIGMA  1  FIX  ;             ; 1 ~RES_ERR CMS plasma
$SIGMA  1  FIX  ;          _  ; 2 ~RES_ERR Coli plasma
$SIGMA  1  FIX  ;          _  ; 3 ~RES_ERR Common plasma
$ESTIMATION PRINT=5 MAX=1 POSTHOC NSIG=2 SIGL=6 METHOD=1 INTER
;             NOABORT

;$ESTIMATION METHOD=1 INTER POSTHOC NOABORT PRINT=5 MAXEVALS=0
$COVARIANCE UNCONDITIONAL MATRIX=R PRINT=E
; $TABLE      ID TIME CMT DV PRED IPRED IRES WRES IWRES CWRES NOPRINT

;             ONEHEADER FILE=sdtab1

; $TABLE      ID TIME WT CRCLTYP NOPRINT ONEHEADER NOAPPEND FILE=cotab1

; $TABLE      ID TIME SPE NOPRINT ONEHEADER NOAPPEND FILE=catab1

; $TABLE      ID TIME CLR1 CLNR CLHYD VSS1 VSS2 ETA1 ETA2 ETA3 ETA4 ETA5

;             ETA6 ETA7 ETA8 ETA9 ETA10 F2 NOPRINT ONEHEADER NOAPPEND

;             FILE=patab1

; $TABLE      ID TIME TAG AA1 AA2 AA3 AA4 AA5 AA6 AA7 AA8 AA9 AA10 AA11

;             AA12 AA13 AA14 AA15 AA16 AA17 AA18 AA19 AA20 AA21 AA22

;             AA23 AA24 AA25 AA26 AA27 AA28 NOPRINT ONEHEADER

;             FILE=mytab1_1

; $TABLE      ID TIME TAG CC1 CC2 CC3 CC4 CC5 CC6 CC7 CC8 CC9 CC10 CC11

;             CC12 CC13 CC14 CC15 CC16 CC17 CC18 CC19 CC20 CC21 CC22

;             CC23 CC24 CC25 CC26 CC27 CC28 NOPRINT ONEHEADER

;             FILE=mytab1_2

; $TABLE      ID TIME TAG KLU1 KLU2 KBR1 KBR2 KHR1 KHR2 KSK1 KSK2 KMU1

;             KMU2 KAD1 KAD2 KSP1 KSP2 KGI1 KGI2 KHE1 KHE2 KKI1 KKI2

;             KRE1 KRE2 NOPRINT ONEHEADER FILE=mytab1_3

; $TABLE      ID TIME TAG CLAR1 CLAR2 CLVE1 CLVE2 CLLU1 CLLU2 CLBR1

;             CLBR2 CLHR1 CLHR2 CLSK1 CLSK2 CLMU1 CLMU2 CLAD1 CLAD2

;             CLSP1 CLSP2 CLGI1 CLGI2 CLHE1 CLHE2 CLKI1 CLKI2 CLTUB1

;             CLTUB2 NOPRINT ONEHEADER FILE=mytab1_4

;

NM-TRAN MESSAGES
 WARNING: -prdefault OPTION IS OVER-RIDING USER SPECIFIED PC VALUE OF 44 WITH 30
THEREFORE OVER-RIDING -prdefault
 WARNINGS AND ERRORS (IF ANY) FOR PROBLEM    1
 (WARNING  2) NM-TRAN INFERS THAT THE DATA ARE POPULATION.
 (WARNING  3) THERE MAY BE AN ERROR IN THE ABBREVIATED CODE. THE FOLLOWING
 ONE OR MORE RANDOM VARIABLES ARE DEFINED WITH "IF" STATEMENTS THAT DO NOT
 PROVIDE DEFINITIONS FOR BOTH THE "THEN" AND "ELSE" CASES. IF ALL
 CONDITIONS FAIL, THE VALUES OF THESE VARIABLES WILL BE ZERO.
   IPRED IRES W IWRES Y

1NONLINEAR MIXED EFFECTS MODEL PROGRAM (NONMEM) VERSION 7.3.0
 ORIGINALLY DEVELOPED BY STUART BEAL, LEWIS SHEINER, AND ALISON BOECKMANN
 CURRENT DEVELOPERS ARE ROBERT BAUER, ICON DEVELOPMENT SOLUTIONS,
 AND ALISON BOECKMANN. IMPLEMENTATION, EFFICIENCY, AND STANDARDIZATION
 PERFORMED BY NOUS INFOSYSTEMS.
 PROBLEM NO.:         1
 PBPK model rat Bjorkman - CMS and coli sequential
 TOT. NO. OF OBS RECS:       93
 TOT. NO. OF INDIVIDUALS:      6
 GENERAL NONLINEAR KINETICS MODEL USING LSODA (ADVAN13)
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 #TBLN:      1
 #METH: First Order Conditional Estimation with Interaction
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
 #TERM:
0MINIMIZATION TERMINATED
 DUE TO MAX. NO. OF FUNCTION EVALUATIONS EXCEEDED
 NO. OF FUNCTION EVALUATIONS USED:       17
 NO. OF SIG. DIGITS UNREPORTABLE

 ETABAR IS THE ARITHMETIC MEAN OF THE ETA-ESTIMATES,
 AND THE P-VALUE IS GIVEN FOR THE NULL HYPOTHESIS THAT THE TRUE MEAN IS 0.

 ETABAR:         0.0000E+00  8.2357E-02  1.6299E-02  0.0000E+00  0.0000E+00 -2.4840E-03  0.0000E+00  0.0000E+00  0.0000E+00  0.0000E+00
 SE:             0.0000E+00  8.6310E-02  1.1186E-01  0.0000E+00  0.0000E+00  4.1828E-02  0.0000E+00  0.0000E+00  0.0000E+00  0.0000E+00
 N:                       6           6           6           6           6           6           6           6           6           6

 P VAL.:         1.0000E+00  3.3998E-01  8.8415E-01  1.0000E+00  1.0000E+00  9.5264E-01  1.0000E+00  1.0000E+00  1.0000E+00  1.0000E+00

 ETAshrink(%):   1.0000E+02  7.9171E+00  1.0000E-10  1.0000E+02  1.0000E+02  3.0853E+00  1.0000E+02  1.0000E+02  1.0000E+02  1.0000E+02
 EBVshrink(%):   0.0000E+00  7.6177E+00  2.4360E+00  0.0000E+00  0.0000E+00  1.1712E+01  0.0000E+00  0.0000E+00  0.0000E+00  0.0000E+00
 EPSshrink(%):   7.2447E+00  8.4994E+00  8.4994E+00

 #TERE:
 Elapsed estimation time in seconds:    15.40
 Elapsed covariance time in seconds:  1844.16

 ********************               FIRST ORDER CONDITIONAL ESTIMATION WITH INTERACTION              ********************
 #OBJT:**************                       MINIMUM VALUE OF OBJECTIVE FUNCTION                      ********************
 #OBJV:********************************************     -126.072       **************************************************

 ********************               FIRST ORDER CONDITIONAL ESTIMATION WITH INTERACTION              ********************
 ********************                             FINAL PARAMETER ESTIMATE                           ********************

 THETA - VECTOR OF FIXED EFFECTS PARAMETERS   *********
         TH 1      TH 2      TH 3      TH 4      TH 5      TH 6      TH 7      TH 8      TH 9      TH10      TH11      TH12
          TH13      TH14      TH15      TH16      TH17      TH18
         1.07E+00  1.01E+00  1.62E+00  9.95E-01  9.92E-01  9.99E-01  9.66E-01  2.97E+02  1.01E+00  8.56E-01  5.80E-01  0.00E+00
          3.94E+00  2.95E-01  6.75E-03  1.23E-01  0.00E+00  9.75E-02

 OMEGA - COV MATRIX FOR RANDOM EFFECTS - ETAS  ********
            ETA1      ETA2      ETA3      ETA4      ETA5      ETA6      ETA7      ETA8      ETA9      ET10
 ETA1
+        0.00E+00
 ETA2
+        0.00E+00  6.33E-02
 ETA3
+        0.00E+00  0.00E+00  8.02E-02
 ETA4
+        0.00E+00  0.00E+00  0.00E+00  0.00E+00
 ETA5
+        0.00E+00  0.00E+00  0.00E+00  0.00E+00  0.00E+00
 ETA6
+        0.00E+00  0.00E+00  0.00E+00  0.00E+00  0.00E+00  1.34E-02
 ETA7
+        0.00E+00  0.00E+00  0.00E+00  0.00E+00  0.00E+00  0.00E+00  0.00E+00
 ETA8
+        0.00E+00  0.00E+00  0.00E+00  0.00E+00  0.00E+00  0.00E+00  0.00E+00  0.00E+00
 ETA9
+        0.00E+00  0.00E+00  0.00E+00  0.00E+00  0.00E+00  0.00E+00  0.00E+00  0.00E+00  0.00E+00
 ET10
+        0.00E+00  0.00E+00  0.00E+00  0.00E+00  0.00E+00  0.00E+00  0.00E+00  0.00E+00  0.00E+00  0.00E+00

 SIGMA - COV MATRIX FOR RANDOM EFFECTS - EPSILONS  ****
            EPS1      EPS2      EPS3
 EPS1
+        1.00E+00
 EPS2
+        0.00E+00  1.00E+00
 EPS3
+        0.00E+00  0.00E+00  1.00E+00

 OMEGA - CORR MATRIX FOR RANDOM EFFECTS - ETAS  *******
            ETA1      ETA2      ETA3      ETA4      ETA5      ETA6      ETA7      ETA8      ETA9      ET10
 ETA1
+        0.00E+00
 ETA2
+        0.00E+00  2.52E-01
 ETA3
+        0.00E+00  0.00E+00  2.83E-01
 ETA4
+        0.00E+00  0.00E+00  0.00E+00  0.00E+00
 ETA5
+        0.00E+00  0.00E+00  0.00E+00  0.00E+00  0.00E+00
 ETA6
+        0.00E+00  0.00E+00  0.00E+00  0.00E+00  0.00E+00  1.16E-01
 ETA7
+        0.00E+00  0.00E+00  0.00E+00  0.00E+00  0.00E+00  0.00E+00  0.00E+00
 ETA8
+        0.00E+00  0.00E+00  0.00E+00  0.00E+00  0.00E+00  0.00E+00  0.00E+00  0.00E+00
 ETA9
+        0.00E+00  0.00E+00  0.00E+00  0.00E+00  0.00E+00  0.00E+00  0.00E+00  0.00E+00  0.00E+00
 ET10
+        0.00E+00  0.00E+00  0.00E+00  0.00E+00  0.00E+00  0.00E+00  0.00E+00  0.00E+00  0.00E+00  0.00E+00

 SIGMA - CORR MATRIX FOR RANDOM EFFECTS - EPSILONS  ***
            EPS1      EPS2      EPS3
 EPS1
+        1.00E+00
 EPS2
+        0.00E+00  1.00E+00
 EPS3
+        0.00E+00  0.00E+00  1.00E+00

 ********************               FIRST ORDER CONDITIONAL ESTIMATION WITH INTERACTION              ********************
 ********************                            STANDARD ERROR OF ESTIMATE                          ********************

 THETA - VECTOR OF FIXED EFFECTS PARAMETERS   *********
         TH 1      TH 2      TH 3      TH 4      TH 5      TH 6      TH 7      TH 8      TH 9      TH10      TH11      TH12
          TH13      TH14      TH15      TH16      TH17      TH18
         5.86E-01  5.04E-01  1.43E-01  5.12E-01  5.43E-01  5.40E-01  2.46E-01  4.13E+01  9.77E-02  2.67E-02  1.30E-01 .........
          5.81E-01  4.08E-02 .........  4.18E-02 .........  5.59E-02

 OMEGA - COV MATRIX FOR RANDOM EFFECTS - ETAS  ********
            ETA1      ETA2      ETA3      ETA4      ETA5      ETA6      ETA7      ETA8      ETA9      ET10
 ETA1
+       .........
 ETA2
+       .........  5.11E-02
 ETA3
+       ......... .........  5.42E-02
 ETA4
+       ......... ......... ......... .........
 ETA5
+       ......... ......... ......... ......... .........
 ETA6
+       ......... ......... ......... ......... .........  1.02E-02
 ETA7
+       ......... ......... ......... ......... ......... ......... .........
 ETA8
+       ......... ......... ......... ......... ......... ......... ......... .........
 ETA9
+       ......... ......... ......... ......... ......... ......... ......... ......... .........
 ET10
+       ......... ......... ......... ......... ......... ......... ......... ......... ......... .........

 SIGMA - COV MATRIX FOR RANDOM EFFECTS - EPSILONS  ****
            EPS1      EPS2      EPS3
 EPS1
+       .........
 EPS2
+       ......... .........
 EPS3
+       ......... ......... .........

 OMEGA - CORR MATRIX FOR RANDOM EFFECTS - ETAS  *******
            ETA1      ETA2      ETA3      ETA4      ETA5      ETA6      ETA7      ETA8      ETA9      ET10
 ETA1
+       .........
 ETA2
+       .........  1.02E-01
 ETA3
+       ......... .........  9.57E-02
 ETA4
+       ......... ......... ......... .........
 ETA5
+       ......... ......... ......... ......... .........
 ETA6
+       ......... ......... ......... ......... .........  4.40E-02
 ETA7
+       ......... ......... ......... ......... ......... ......... .........
 ETA8
+       ......... ......... ......... ......... ......... ......... ......... .........
 ETA9
+       ......... ......... ......... ......... ......... ......... ......... ......... .........
 ET10
+       ......... ......... ......... ......... ......... ......... ......... ......... ......... .........

 SIGMA - CORR MATRIX FOR RANDOM EFFECTS - EPSILONS  ***
            EPS1      EPS2      EPS3
 EPS1
+       .........
 EPS2
+       ......... .........
 EPS3
+       ......... ......... .........
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
 ********************               FIRST ORDER CONDITIONAL ESTIMATION WITH INTERACTION              ********************
 ********************                      EIGENVALUES OF COR MATRIX OF ESTIMATE                     ********************

             1         2         3         4         5         6         7         8         9        10        11        12
             13        14        15        16        17        18
         5.07E-02  1.42E-01  2.82E-01  4.38E-01  4.87E-01  7.06E-01  7.54E-01  7.75E-01  8.44E-01  8.94E-01  9.01E-01  1.05E+00
          1.06E+00  1.28E+00  1.32E+00  1.52E+00  2.24E+00  3.26E+00
 #CPUT: Total CPU Time in Seconds,     6718.663
