Tue Nov  5 14:28:01 CET 2013
$PROBLEM    PHENOBARB SIMPLE MODEL
$INPUT      ID TIME AMT WGT APGR DV
$DATA       pheno.dta IGNORE=@
$SUBROUTINE ADVAN1 TRANS2
$PRIOR      NWPRI NTHETA=2 NETA=2 NEPS=1 NTHP=2 NETP=2 PLEV=0.99
            NPEXP=1
$PK

      TVCL=THETA(1)
      TVV=THETA(2)
      CL=TVCL*EXP(ETA(1))
      V=TVV*EXP(ETA(2))
      S1=V
$ERROR

      W=F
      Y=F+W*EPS(1)

      IPRED=F         ;  individual-specific prediction
      IRES=DV-IPRED   ;  individual-specific residual
      IWRES=IRES/W    ;  individual-specific weighted residual

$THETA  (0,0.00555363) ; CL
$THETA  (0,1.33638) ; V
$THETA  0.005 FIX
$THETA  1.3 FIX
$THETA  2 FIX
$OMEGA  BLOCK(2)
 0.247074  ;       IVCL
 0 0.141581  ;        IVV
$OMEGA  BLOCK(2) FIX
 1.55838E-07
 0 0.00638429
$OMEGA  BLOCK(2) FIX
 0.247074
 0 0.141581
$SIGMA  0.0164153
$ESTIMATION MAXEVALS=3 SIGDIGITS=4 POSTHOC
$COVARIANCE PRINT=E

NM-TRAN MESSAGES
 WARNINGS AND ERRORS (IF ANY) FOR PROBLEM    1
 (WARNING  107) $PRIOR: THE FOLLOWING OPTIONS ARE IGNORED BY NONMEM:
   NEPS NEPP
 (WARNING  2) NM-TRAN INFERS THAT THE DATA ARE POPULATION.

1NONLINEAR MIXED EFFECTS MODEL PROGRAM (NONMEM) VERSION 7.2.0
 ORIGINALLY DEVELOPED BY STUART BEAL, LEWIS SHEINER, AND ALISON BOECKMANN
 CURRENT DEVELOPERS ARE ROBERT BAUER, ICON DEVELOPMENT SOLUTIONS,
 AND ALISON BOECKMANN. IMPLEMENTATION, EFFICIENCY, AND STANDARDIZATION
 PERFORMED BY NOUS INFOSYSTEMS.
 PROBLEM NO.:         1
 PHENOBARB SIMPLE MODEL
 TOT. NO. OF OBS RECS:      155
 TOT. NO. OF INDIVIDUALS:     59
 ONE COMPARTMENT MODEL (ADVAN1)
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 #TBLN:      1
 #METH: First Order
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
 #TERM:
0MINIMIZATION TERMINATED
 DUE TO MAX. NO. OF FUNCTION EVALUATIONS EXCEEDED
 NO. OF FUNCTION EVALUATIONS USED:        5
 NO. OF SIG. DIGITS UNREPORTABLE

 #TERE:
 Elapsed estimation time in seconds:     0.00

 ********************                                   FIRST ORDER                                  ********************
 #OBJT:**************                       MINIMUM VALUE OF OBJECTIVE FUNCTION                      ********************
 #OBJV:********************************************      741.519       **************************************************

 ********************                                   FIRST ORDER                                  ********************
 ********************                             FINAL PARAMETER ESTIMATE                           ********************

 THETA - VECTOR OF FIXED EFFECTS PARAMETERS   *********
         TH 1      TH 2
         5.55E-03  1.34E+00

 OMEGA - COV MATRIX FOR RANDOM EFFECTS - ETAS  ********
            ETA1      ETA2
 ETA1
+        2.47E-01
 ETA2
+        0.00E+00  1.42E-01

 SIGMA - COV MATRIX FOR RANDOM EFFECTS - EPSILONS  ****
            EPS1
 EPS1
+        1.64E-02

 OMEGA - CORR MATRIX FOR RANDOM EFFECTS - ETAS  *******
            ETA1      ETA2
 ETA1
+        4.97E-01
 ETA2
+        0.00E+00  3.76E-01

 SIGMA - CORR MATRIX FOR RANDOM EFFECTS - EPSILONS  ***
            EPS1
 EPS1
+        1.28E-01
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