Wed Mar 26 00:22:28 CET 2014
$PROBLEM    TDM type censoring
; Estimation model, all data

; 2-comp model IV bolus
$INPUT      ID TIME AMT DV TCENS RCENS BCENS
$DATA       ../../m1/mc-sim-96.dat IGNORE=@
$SUBROUTINE ADVAN3 TRANS4
$PK
   MU_1  = LOG(THETA(1))

$ERROR
   IPRD  = A(1)/V1

$THETA  (1E-16,9.9) ; CL
$THETA  (1E-16,50) ; V1
$THETA  (1E-16,0.1) ; Q
$THETA  (1E-16,10) ; V2
$OMEGA  0.09  ;     BSV_CL
$OMEGA  0.09  ;      BSV_V
$SIGMA  0.0225  ;   Res_prop
$ESTIMATION METHOD=SAEM INTER CINTERVAL=10 CTYPE=3 POSTHOC SIGDIG=3
            PRINT=1

NM-TRAN MESSAGES
 WARNINGS AND ERRORS (IF ANY) FOR PROBLEM    1
 (WARNING  2) NM-TRAN INFERS THAT THE DATA ARE POPULATION.
 (WARNING  23) $PK DOES NOT DEFINE A SCALE PARAMETER FOR THE CENTRAL
 COMPARTMENT.  WITH THIS TRANS, IT MAY NOT BE POSSIBLE TO SEPARATELY
 OBTAIN ESTIMATES OF PARAMETERS AFFECTING CLEARANCE AND VOLUME.

1NONLINEAR MIXED EFFECTS MODEL PROGRAM (NONMEM) VERSION 7.3.0
 ORIGINALLY DEVELOPED BY STUART BEAL, LEWIS SHEINER, AND ALISON BOECKMANN
 CURRENT DEVELOPERS ARE ROBERT BAUER, ICON DEVELOPMENT SOLUTIONS,
 AND ALISON BOECKMANN. IMPLEMENTATION, EFFICIENCY, AND STANDARDIZATION
 PERFORMED BY NOUS INFOSYSTEMS.
 PROBLEM NO.:         1
 TDM type censoring
 TOT. NO. OF OBS RECS:     2400
 TOT. NO. OF INDIVIDUALS:    400
 TWO COMPARTMENT MODEL (ADVAN3)
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 #TBLN:      1
 #METH: Stochastic Approximation Expectation-Maximization
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
 #TERM:
 OBJECTIVE FUNCTION IS INFINITE. PROBLEM ENDED
 REDUCED STOCHASTIC PORTION WAS NOT COMPLETED

 ETABAR IS THE ARITHMETIC MEAN OF THE ETA-ESTIMATES,
 AND THE P-VALUE IS GIVEN FOR THE NULL HYPOTHESIS THAT THE TRUE MEAN IS 0.

 ETABAR:        -2.3036E-02 -1.9398E-02
 SE:             4.0730E-02  5.6773E-02
 N:                     400         400

 P VAL.:         5.7167E-01  7.3259E-01

 ETAshrink(%):   1.6062E+01  5.2045E+00
 EBVshrink(%):   1.5465E+01  7.4966E+00
 EPSshrink(%):   1.0000E-10

 #TERE:
 Elapsed estimation time in seconds:   158.58
 #CPUT: Total CPU Time in Seconds,      158.695
