Thu Jun 11 12:04:42 CEST 2015
; Script generated by the pharmML2Nmtran Converter v.0.1.0
; Source	: PharmML 0.6.0
; Target	: NMTRAN 7.3.0
; Model 	: UseCase1FOCE
; Dated 	: Wed Jun 03 09:03:16 CEST 2015
$PROBLEM
;           "C:\see\converter-toolbox-distribution\converter-toolbox-service\tmp\3ad03064-b5dc-4985-a100-192f62a16499\inputs\UseCase1FOCE.mdl
;           - generated by MDL2PharmML v.6.0"
$INPUT      ID TIME WT AMT DVID DV MDV LOGTWT
$DATA      warfarin_conc.csv IGNORE=@
$SUBROUTINE ADVAN13 TOL=9
$MODEL      COMP (COMP1) ;GUT
            COMP (COMP2) ;CENTRAL
$PK
POP_CL = THETA(1)
POP_V = THETA(2)
POP_KA = THETA(3)
POP_TLAG = THETA(4)
BETA_CL_WT = THETA(5)
BETA_V_WT = THETA(6)
RUV_PROP = THETA(7)
RUV_ADD = THETA(8)

ETA_CL = ETA(1)
ETA_V = ETA(2)
ETA_KA = ETA(3)
ETA_TLAG = ETA(4)

MU_1 = LOG(POP_CL)+BETA_CL_WT * logtWT;
CL = EXP(MU_1 + ETA(1));

MU_2 = LOG(POP_V)+BETA_V_WT * logtWT;
V = EXP(MU_2 + ETA(2));

MU_3 = LOG(POP_KA);
KA = EXP(MU_3 + ETA(3));

MU_4 = LOG(POP_TLAG);
TLAG = EXP(MU_4 + ETA(4));

A_0(1) = 0
A_0(2) = 0

$DES
GUT = A(1)
CENTRAL = A(2)

IF (T.GE.TLAG) THEN
	RATEIN = (GUT*KA)
ELSE
	RATEIN = 0
ENDIF

CC_DES =  (CENTRAL/V)
DADT(1) = -(RATEIN)
DADT(2) = RATEIN-((CL*CENTRAL)/V)

$ERROR
CC =  (A(2)/V)

IPRED = CC
W = RUV_ADD+RUV_PROP*IPRED
Y = IPRED+W*EPS(1)
IRES = DV - IPRED
IWRES = IRES/W

$THETA  (0.001,0.1329) ; POP_CL
 (0.001,8.0) ; POP_V
 (0.001,3.197) ; POP_KA
 (0.001,0.8469,10.0) ; POP_TLAG
 0.6696 ; BETA_CL_WT
 0.8536 ; BETA_V_WT
 (0.0,0.1045) ; RUV_PROP
 (0.0,1.0E-4) ; RUV_ADD
$OMEGA  0.06541  ;     PPV_CL
 0.01693  ;      PPV_V
 1.893  ;     PPV_KA
 0.01  ;   PPV_TLAG
$SIGMA  1.0  FIX
$ESTIMATION METHOD=COND MAXEVALS=9999 PRINT=10 NOABORT
$TABLE      ID TIME WT AMT DVID MDV LOGTWT PRED IPRED RES IRES WRES
            IWRES Y DV NOAPPEND NOPRINT FILE=sdtab
$TABLE      ID CL V KA TLAG ETA_CL ETA_V ETA_KA ETA_TLAG NOAPPEND
            NOPRINT FILE=patab
$TABLE      ID LOGTWT NOAPPEND NOPRINT FILE=cotab

NM-TRAN MESSAGES
 WARNINGS AND ERRORS (IF ANY) FOR PROBLEM    1
 (WARNING  2) NM-TRAN INFERS THAT THE DATA ARE POPULATION.
 (MU_WARNING 26) DATA ITEM(S) USED IN DEFINITION OF MU_(S) SHOULD BE CONSTANT FOR INDIV. REC.:
  LOGTWT

1NONLINEAR MIXED EFFECTS MODEL PROGRAM (NONMEM) VERSION 7.4.0 alpha6 (nm74a6)
 ORIGINALLY DEVELOPED BY STUART BEAL, LEWIS SHEINER, AND ALISON BOECKMANN
 CURRENT DEVELOPERS ARE ROBERT BAUER, ICON DEVELOPMENT SOLUTIONS,
 AND ALISON BOECKMANN. IMPLEMENTATION, EFFICIENCY, AND STANDARDIZATION
 PERFORMED BY NOUS INFOSYSTEMS.
 PROBLEM NO.:         1

 TOT. NO. OF OBS RECS:      250
 TOT. NO. OF INDIVIDUALS:     32
 GENERAL NONLINEAR KINETICS MODEL USING LSODA (ADVAN13)
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 #TBLN:      1
 #METH: First Order Conditional Estimation
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
 #TERM:
0MINIMIZATION TERMINATED
 DUE TO ROUNDING ERRORS (ERROR=134)
 NO. OF FUNCTION EVALUATIONS USED:      580
 NO. OF SIG. DIGITS UNREPORTABLE
0PARAMETER ESTIMATE IS NEAR ITS BOUNDARY

 ETABAR IS THE ARITHMETIC MEAN OF THE ETA-ESTIMATES,
 AND THE P-VALUE IS GIVEN FOR THE NULL HYPOTHESIS THAT THE TRUE MEAN IS 0.

 ETABAR:        -9.8199E-03 -3.0096E-03 -3.0360E-01  0.0000E+00
 SE:             4.4598E-02  1.9878E-02  1.1825E-01  0.0000E+00
 N:                      32          32          32          32

 P VAL.:         8.2573E-01  8.7966E-01  1.0242E-02  1.0000E+00

 ETAshrink(%):   5.7517E-02  1.2654E+01  5.0293E+01  1.0000E+02
 EBVshrink(%):   1.3095E+00  1.3653E+01  4.7505E+01  1.0000E+02
 EPSshrink(%):   1.4641E+01

 #TERE:
 Elapsed estimation  time in seconds:   478.93
 Elapsed postprocess time in seconds:     1.11

 ********************                        FIRST ORDER CONDITIONAL ESTIMATION                      ********************
 #OBJT:**************                       MINIMUM VALUE OF OBJECTIVE FUNCTION                      ********************
 #OBJV:********************************************       77.975       **************************************************

 ********************                        FIRST ORDER CONDITIONAL ESTIMATION                      ********************
 ********************                             FINAL PARAMETER ESTIMATE                           ********************

 THETA - VECTOR OF FIXED EFFECTS PARAMETERS   *********
         TH 1      TH 2      TH 3      TH 4      TH 5      TH 6      TH 7      TH 8
         1.33E-01  8.00E+00  3.14E+00  8.45E-01  6.69E-01  8.56E-01  1.05E-01  1.00E-06

 OMEGA - COV MATRIX FOR RANDOM EFFECTS - ETAS  ********
         ETA1      ETA2      ETA3      ETA4
 ETA1
+        6.58E-02
 ETA2
+        0.00E+00  1.71E-02
 ETA3
+        0.00E+00  0.00E+00  1.87E+00
 ETA4
+        0.00E+00  0.00E+00  0.00E+00  1.00E-02

 SIGMA - COV MATRIX FOR RANDOM EFFECTS - EPSILONS  ****
         EPS1
 EPS1
+        1.00E+00

 OMEGA - CORR MATRIX FOR RANDOM EFFECTS - ETAS  *******
         ETA1      ETA2      ETA3      ETA4
 ETA1
+        2.56E-01
 ETA2
+        0.00E+00  1.31E-01
 ETA3
+        0.00E+00  0.00E+00  1.37E+00
 ETA4
+        0.00E+00  0.00E+00  0.00E+00  1.00E-01

 SIGMA - CORR MATRIX FOR RANDOM EFFECTS - EPSILONS  ***
         EPS1
 EPS1
+        1.00E+00
 #CPUT: Total CPU Time in Seconds,      480.131
