Wed Nov 20 15:35:29 CET 2013
$PROBLEM    MOXONIDINE PK,FINAL ESTIMATES,ALL DATA
;;

;;
$INPUT      ID VISI XAT2=DROP DGRP=DROP DOSE=DROP FLAG=DROP ONO=DROP
            XIME=DROP DVO=DROP NEUY SCR AGE SEX NYH=DROP WT DROP ACE
            DIG DIU NUMB=DROP TAD TIME VIDD=DROP CRCL AMT SS II DROP
            CMT=DROP CONO=DROP DV EVID=DROP OVID=DROP DROP SHR2=DROP
            NYHA
$DATA       ../../../../xv_data/est_data0.dta IGNORE=@
$SUBROUTINE ADVAN2 TRANS1
$PK

;;; LASSO-BEGIN
    TVALUE  = THETA(16)
    ABSSUM = ABS(THETA(6))+ABS(THETA(7))+ABS(THETA(8))+ABS(THETA(9))
    ABSSUM = ABSSUM+ABS(THETA(10))+ABS(THETA(11))+ABS(THETA(12))+ABS(THETA(13))
    ABSSUM = ABSSUM+ABS(THETA(14))+ABS(THETA(15))

    RATIO = ABSSUM/TVALUE
    IF (RATIO .GT. 5) EXIT 1 1
    FACTOR = EXP(1-RATIO)

    HAGE = 0
    NYHA1 = 0
    SEX2 = 0
    ACE0 = 0
    DIG0 = 0
    IF (AGE .GT. 66.00000) HAGE = AGE-66.00000
    IF (NYHA .EQ. 1) NYHA1=1
    IF (SEX .EQ. 2) SEX2=1
    IF (ACE .EQ. 0) ACE0=1
    IF (DIG .EQ. 0) DIG0=1

    CLCRCL = THETA(6)*(CRCL-67.15944)/21.00314*FACTOR
    CLAGE = THETA(7)*(AGE-65.29652)/7.81198*FACTOR
    CLHAGE = THETA(8)*(HAGE-2.78830)/3.80400*FACTOR
    CLNYHA1 = THETA(9)*(NYHA1-0.49827)/0.47001*FACTOR
    CLSEX2 = THETA(10)*(SEX2-0.20270)/0.40476*FACTOR
    VACE0 = THETA(11)*(ACE0-0.36486)/0.48468*FACTOR
    VAGE = THETA(12)*(AGE-65.29652)/7.81198*FACTOR
    VNYHA1 = THETA(13)*(NYHA1-0.49827)/0.47001*FACTOR
    VDIG0 = THETA(14)*(DIG0-0.35135)/0.48065*FACTOR
    VWT = THETA(15)*(WT-78.54226)/15.50568*FACTOR

    VCOV = (VACE0+1)*(VAGE+1)*(VNYHA1+1)*(VDIG0+1)*(VWT+1)
    CLCOV = (CLCRCL+1)*(CLAGE+1)*(CLHAGE+1)*(CLNYHA1+1)*(CLSEX2+1)
;;; LASSO-END

;-----------OCCASIONS----------
   VIS3               = 0
   IF(VISI.EQ.3) VIS3 = 1
   VIS8               = 0
   IF(VISI.EQ.8) VIS8 = 1

;----------IOV--------------------

   KPCL  = VIS3*ETA(4)+VIS8*ETA(5)
   KPKA  = VIS3*ETA(6)+VIS8*ETA(7)

;---------- PK model ------------------

   TVCL  = THETA(1)

    TVCL = TVCL*CLCOV
   TVV   = THETA(2)

    TVV = TVV*VCOV

   CL    = TVCL*EXP(ETA(1)+KPCL)
   V     = TVV*EXP(ETA(2))
   KA    = THETA(3)*EXP(ETA(3)+KPKA)
   ALAG1 = THETA(4)
   K     = CL/V
   S2    = V

$ERROR

     IPRED = LOG(.025)
     WA     = THETA(5)
     W      = WA
     IF(F.GT.0) IPRED = LOG(F)
     IRES  = IPRED-DV
     IWRES = IRES/W
     Y     = IPRED+ERR(1)*W

$THETA  (0,26.7) ; TVCL
$THETA  (0,110) ; TVV
$THETA  (0,4.5) ; TVKA
$THETA  (0,0.2149) ; LAG
$THETA  (0,0.331) ; RES ERR
$THETA  (-0.28064,0.0001,0.58085) ; TH6 CLCRCL
$THETA  (-0.61495,0.0001,0.35037) ; TH7 CLAGE
$THETA  (-0.41295,0.0001,1.36427) ; TH8 CLHAGE
$THETA  (-0.93678,0.0001,0.94327) ; TH9 CLNYHA1
$THETA  (-0.50766,0.0001,1.99680) ; TH10 CLSEX2
$THETA  (-0.76311,0.0001,1.32838) ; TH11 VACE0
$THETA  (-0.61495,0.0001,0.35037) ; TH12 VAGE
$THETA  (-0.93678,0.0001,0.94327) ; TH13 VNYHA1
$THETA  (-0.74100,0.0001,1.36801) ; TH14 VDIG0
$THETA  (-0.33376,0.0001,0.41302) ; TH15 VWT
$THETA  (-1000000,0.15) FIX ; TH16 T-VALUE
$OMEGA  BLOCK(2)
 0.0819
 0.0413 0.0564  ; IIV (CL-V)
$OMEGA  BLOCK(1)
 2.82  ;     IIV KA
$OMEGA  BLOCK(1)
 0.0194  ;     IOV CL
$OMEGA  BLOCK(1) SAME

$OMEGA  BLOCK(1)
 0.506  ;     IOV KA
$OMEGA  BLOCK(1) SAME

$SIGMA  1  FIX
$ESTIMATION METHOD=1 MAXEVALS=9999 NOABORT MSFO=lasso_t_0.15_0.msfo1

NM-TRAN MESSAGES
 WARNINGS AND ERRORS (IF ANY) FOR PROBLEM    1
 (WARNING  2) NM-TRAN INFERS THAT THE DATA ARE POPULATION.

1NONLINEAR MIXED EFFECTS MODEL PROGRAM (NONMEM) VERSION 7.2.0
 ORIGINALLY DEVELOPED BY STUART BEAL, LEWIS SHEINER, AND ALISON BOECKMANN
 CURRENT DEVELOPERS ARE ROBERT BAUER, ICON DEVELOPMENT SOLUTIONS,
 AND ALISON BOECKMANN. IMPLEMENTATION, EFFICIENCY, AND STANDARDIZATION
 PERFORMED BY NOUS INFOSYSTEMS.
 PROBLEM NO.:         1
 MOXONIDINE PK,FINAL ESTIMATES,ALL DATA
 TOT. NO. OF OBS RECS:      815
 TOT. NO. OF INDIVIDUALS:     59
 ONE COMPARTMENT MODEL WITH FIRST-ORDER ABSORPTION (ADVAN2)
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 #TBLN:      1
 #METH: First Order Conditional Estimation
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
 #TERM:
0MINIMIZATION TERMINATED
 DUE TO ROUNDING ERRORS (ERROR=134)
 NO. OF FUNCTION EVALUATIONS USED:     1440
 NO. OF SIG. DIGITS IN FINAL EST.:  2.0

 ETABAR IS THE ARITHMETIC MEAN OF THE ETA-ESTIMATES,
 AND THE P-VALUE IS GIVEN FOR THE NULL HYPOTHESIS THAT THE TRUE MEAN IS 0.

 ETABAR:        -4.1324E-04 -1.4272E-02 -2.4305E-01  9.5224E-03  3.5841E-03  5.5616E-02 -9.1549E-02
 SE:             2.9013E-02  1.7296E-02  1.7973E-01  8.2013E-03  1.0304E-02  3.8943E-02  3.8425E-02

 P VAL.:         9.8864E-01  4.0927E-01  1.7628E-01  2.4561E-01  7.2796E-01  1.5326E-01  1.7194E-02

 ETAshrink(%):   1.1745E+01  2.0791E+01  1.9436E+01  4.9491E+01  3.6542E+01  5.4601E+01  5.5204E+01
 EPSshrink(%):   1.0584E+01

 #TERE:
 Elapsed estimation time in seconds:    44.79

 ********************                        FIRST ORDER CONDITIONAL ESTIMATION                      ********************
 #OBJT:**************                       MINIMUM VALUE OF OBJECTIVE FUNCTION                      ********************
 #OBJV:********************************************     -585.767       **************************************************

 ********************                        FIRST ORDER CONDITIONAL ESTIMATION                      ********************
 ********************                             FINAL PARAMETER ESTIMATE                           ********************

 THETA - VECTOR OF FIXED EFFECTS PARAMETERS   *********
         TH 1      TH 2      TH 3      TH 4      TH 5      TH 6      TH 7      TH 8      TH 9      TH10      TH11      TH12
          TH13      TH14      TH15      TH16
         2.63E+01  1.08E+02  3.91E+00  2.42E-01  3.30E-01  4.72E-02 -1.50E-05 -6.67E-06 -2.98E-05  2.00E-06 -1.60E-05  3.92E-06
          2.77E-05  2.39E-05  1.02E-01  1.50E-01

 OMEGA - COV MATRIX FOR RANDOM EFFECTS - ETAS  ********
            ETA1      ETA2      ETA3      ETA4      ETA5      ETA6      ETA7
 ETA1
+        6.49E-02
 ETA2
+        3.55E-02  2.86E-02
 ETA3
+        0.00E+00  0.00E+00  2.99E+00
 ETA4
+        0.00E+00  0.00E+00  0.00E+00  1.58E-02
 ETA5
+        0.00E+00  0.00E+00  0.00E+00  0.00E+00  1.58E-02
 ETA6
+        0.00E+00  0.00E+00  0.00E+00  0.00E+00  0.00E+00  4.42E-01
 ETA7
+        0.00E+00  0.00E+00  0.00E+00  0.00E+00  0.00E+00  0.00E+00  4.42E-01

 SIGMA - COV MATRIX FOR RANDOM EFFECTS - EPSILONS  ****
            EPS1
 EPS1
+        1.00E+00

 OMEGA - CORR MATRIX FOR RANDOM EFFECTS - ETAS  *******
            ETA1      ETA2      ETA3      ETA4      ETA5      ETA6      ETA7
 ETA1
+        2.55E-01
 ETA2
+        8.24E-01  1.69E-01
 ETA3
+        0.00E+00  0.00E+00  1.73E+00
 ETA4
+        0.00E+00  0.00E+00  0.00E+00  1.26E-01
 ETA5
+        0.00E+00  0.00E+00  0.00E+00  0.00E+00  1.26E-01
 ETA6
+        0.00E+00  0.00E+00  0.00E+00  0.00E+00  0.00E+00  6.65E-01
 ETA7
+        0.00E+00  0.00E+00  0.00E+00  0.00E+00  0.00E+00  0.00E+00  6.65E-01

 SIGMA - CORR MATRIX FOR RANDOM EFFECTS - EPSILONS  ***
            EPS1
 EPS1
+        1.00E+00
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