Mon 03/07/2011
10:55 PM
;Model Desc: Two compartment Model, Using ADVAN3, TRANS4
;Project Name: nm7examples
;Project ID: NO PROJECT DESCRIPTION

$PROB RUN# Example 1 (from samp5l)
$INPUT C SET ID JID TIME  DV=CONC AMT=DOSE RATE EVID MDV CMT CLX V1X QX V2X SDIX SDSX
$DATA example1.csv IGNORE=C

$SUBROUTINES ADVAN3 TRANS4

;NTHETA=number of Thetas to be estimated
;NETA=number of Etas to be estimated (and to be described by NETAxBETA OMEGA matrix)
;NTHP=number of thetas which have a prior
;NETP=number of Omegas with prior
;Prior information is important for MCMC Bayesian analysis, not necessary for maximization
; methods
$PRIOR NWPRI NTHETA=4, NETA=4, NTHP=4, NETP=4

$PK
; The thetas are MU modeled.  Best that there is a linear relationship between THETAs and Mus
;  The linear MU modeling of THETAS allows them to be efficiently Gibbs sampled.
MU_1=THETA(1)
MU_2=THETA(2)
MU_3=THETA(3)
MU_4=THETA(4)
CL=DEXP(MU_1+ETA(1))
V1=DEXP(MU_2+ETA(2))
Q=DEXP(MU_3+ETA(3))
V2=DEXP(MU_4+ETA(4))
S1=V1

$ERROR
Y = F + F*EPS(1)

; Initial values of THETA
$THETA
(0.001, 2.0) ;[LN(CL)]
(0.001, 2.0) ;[LN(V1)]
(0.001, 2.0) ;[LN(Q)]
(0.001, 2.0) ;[LN(V2)]
;INITIAL values of OMEGA
$OMEGA BLOCK(4)
0.15   ;[P]
0.01  ;[F]
0.15   ;[P]
0.01  ;[F]
0.01  ;[F]
0.15   ;[P]
0.01  ;[F]
0.01  ;[F]
0.01  ;[F]
0.15   ;[P]
;Initial value of SIGMA
$SIGMA
(0.6 )   ;[P]

; Prior information of THETAS
$THETA (2.0 FIX) (2.0 FIX) (2.0 FIX) (2.0 FIX)

; Variance to prior information of THETAS.  Because variances are very large, this
; means that the prior information to the THETAS is highly uninformative.
$OMEGA BLOCK(4)
10000 FIX
0.00 10000
0.00  0.00 10000
0.00  0.00 0.0 10000

; Prior information to the OMEGAS.
$OMEGA BLOCK(4)
0.2 FIX
0.0  0.2
0.0  0.0 0.2
0.0  0.0 0.0 0.2
;Degrees of freedom to prior OMEGA matrix.  Because degrees of freedom is very low, equal to the
; the dimension of the prior OMEGA, this means that the prior information to the OMEGAS is
; highly uninformative
$THETA (4 FIX)

; The first analysis is iterative two-stage, maximum of 500 iterations (NITER), iteration results
; are printed every 5 iterations, gradient precision (SIGL) is 4. Termination is tested on all of
; the population parameters (CTYPE=3), and for less then 2 significant digits change (NSIG).
; Prior information is not necessary for ITS, so NOPRIOR=1.  The intermediate and final results
; of the ITS method will be recoded in row/column format in example1.ext
$EST METHOD=ITS INTERACTION FILE=example1.ext NITER=500 PRINT=5 NOABORT SIGL=4 CTYPE=3 CITER=10
     CALPHA=0.05 NOPRIOR=1 NSIG=2
$COV MATRIX=R PRINT=E UNCONDITIONAL SIGL=12
; Print out results in tables. Include some of the new weighted residual types
$TABLE ID TIME PRED RES WRES CPRED CWRES EPRED ERES EWRES NOAPPEND ONEHEADER
 FILE=example1.TAB NOPRINT
$TABLE ID CL V1 Q V2 FIRSTONLY NOAPPEND NOPRINT FILE=example1.PAR
$TABLE ID ETA1 ETA2 ETA3 ETA4 FIRSTONLY NOAPPEND NOPRINT FILE=example1.ETA

NM-TRAN MESSAGES
 WARNINGS AND ERRORS (IF ANY) FOR PROBLEM    1
 (WARNING  2) NM-TRAN INFERS THAT THE DATA ARE POPULATION.

1NONLINEAR MIXED EFFECTS MODEL PROGRAM (NONMEM) VERSION 7.2b5.9
 ORIGINALLY DEVELOPED BY STUART BEAL, LEWIS SHEINER, AND ALISON BOECKMANN
 CURRENT DEVELOPERS ARE ROBERT BAUER, ICON DEVELOPMENT SOLUTIONS,
 AND ALISON BOECKMANN. IMPLEMENTATION, EFFICIENCY, AND STANDARDIZATION
 PERFORMED BY NOUS INFOSYSTEMS.
 PROBLEM NO.:         1
 RUN# Example 1 (from samp5l)
 TOT. NO. OF OBS RECS:      500
 TOT. NO. OF INDIVIDUALS:    100
 TWO COMPARTMENT MODEL (ADVAN3)
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 #TBLN:      1
 #METH: Iterative Two Stage (No Prior)
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
 #TERM:
 OPTIMIZATION COMPLETED

 ETABAR IS THE ARITHMETIC MEAN OF THE ETA-ESTIMATES,
 AND THE P-VALUE IS GIVEN FOR THE NULL HYPOTHESIS THAT THE TRUE MEAN IS 0.

 ETABAR:        -1.8920E-07 -1.0607E-06 -1.3820E-06  2.5790E-08
 SE:             3.9119E-02  2.9342E-02  3.5669E-02  3.4353E-02

 P VAL.:         1.0000E+00  9.9997E-01  9.9997E-01  1.0000E+00

 ETAshrink(%):   3.2921E+00  1.9372E+01  2.2485E+01  1.4424E+01
 EPSshrink(%):   3.1728E+01


 #TERE:
 Elapsed estimation time in seconds:    15.83
 Elapsed covariance time in seconds:     0.25

 ********************                          ITERATIVE TWO STAGE (NO PRIOR)                        ********************
 #OBJT:**************                        FINAL VALUE OF OBJECTIVE FUNCTION                       ********************
 #OBJV:********************************************    -1120.262       **************************************************

 ********************                          ITERATIVE TWO STAGE (NO PRIOR)                        ********************
 ********************                             FINAL PARAMETER ESTIMATE                           ********************

 THETA - VECTOR OF FIXED EFFECTS PARAMETERS   *********
         TH 1      TH 2      TH 3      TH 4
         1.68E+00  1.59E+00  8.13E-01  2.37E+00

 OMEGA - COV MATRIX FOR RANDOM EFFECTS - ETAS  ********
            ETA1      ETA2      ETA3      ETA4
 ETA1
+        1.65E-01
 ETA2
+        4.62E-03  1.34E-01
 ETA3
+        6.35E-03  1.69E-02  2.14E-01
 ETA4
+       -1.53E-02  1.26E-02  5.33E-02  1.63E-01

 SIGMA - COV MATRIX FOR RANDOM EFFECTS - EPSILONS  ****
            EPS1
 EPS1
+        5.45E-02

 OMEGA - CORR MATRIX FOR RANDOM EFFECTS - ETAS  *******
            ETA1      ETA2      ETA3      ETA4
 ETA1
+        4.07E-01
 ETA2
+        3.11E-02  3.66E-01
 ETA3
+        3.38E-02  1.00E-01  4.62E-01
 ETA4
+       -9.33E-02  8.53E-02  2.85E-01  4.03E-01

 SIGMA - CORR MATRIX FOR RANDOM EFFECTS - EPSILONS  ***
            EPS1
 EPS1
+        2.33E-01

 ********************                          ITERATIVE TWO STAGE (NO PRIOR)                        ********************
 ********************                          STANDARD ERROR OF ESTIMATE (S)                        ********************

 THETA - VECTOR OF FIXED EFFECTS PARAMETERS   *********
         TH 1      TH 2      TH 3      TH 4
         4.62E-02  4.90E-02  6.53E-02  5.39E-02

 OMEGA - COV MATRIX FOR RANDOM EFFECTS - ETAS  ********
            ETA1      ETA2      ETA3      ETA4
 ETA1
+        2.90E-02
 ETA2
+        2.31E-02  3.49E-02
 ETA3
+        3.25E-02  3.83E-02  6.48E-02
 ETA4
+        2.76E-02  2.73E-02  4.50E-02  4.06E-02

 SIGMA - COV MATRIX FOR RANDOM EFFECTS - EPSILONS  ****
            EPS1
 EPS1
+        7.61E-03

 OMEGA - CORR MATRIX FOR RANDOM EFFECTS - ETAS  *******
            ETA1      ETA2      ETA3      ETA4
 ETA1
+        3.56E-02
 ETA2
+        1.53E-01  4.77E-02
 ETA3
+        1.71E-01  2.22E-01  7.01E-02
 ETA4
+        1.73E-01  1.79E-01  1.86E-01  5.04E-02

 SIGMA - CORR MATRIX FOR RANDOM EFFECTS - EPSILONS  ***
            EPS1
 EPS1
+        1.63E-02
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
 ********************                          ITERATIVE TWO STAGE (NO PRIOR)                        ********************
 ********************                    EIGENVALUES OF COR MATRIX OF ESTIMATE (S)                   ********************

             1         2         3         4         5         6         7         8         9        10        11        12
             13        14        15
         1.29E-01  2.52E-01  3.20E-01  3.38E-01  4.49E-01  5.04E-01  6.18E-01  7.73E-01  9.51E-01  1.06E+00  1.37E+00  1.44E+00
          1.57E+00  1.76E+00  3.45E+00
