Thu May  7 14:05:43 CEST 2015
$PROBLEM    MOXONIDINE PK ANALYSIS
; Logit transformation for IIV_KA
$ABBREVIATED DERIV2=NO COMRES=6
$INPUT      ID VISI XAT2=DROP DGRP=DROP DOSE=DROP FLAG=DROP ONO=DROP
            XIME=DROP DVO=DROP NEUY=DROP SCR=DROP AGE SEX NYHA=DROP WT
            COMP ACE DIG DIU NUMB=DROP TAD TIME VIDD=DROP CLCR AMT SS
            II VID CMT=DROP CONO=DROP DV EVID=DROP OVID=DROP
$DATA      mx19.dat IGNORE=#
$SUBROUTINE ADVAN2 TRANS1
$PK

;-------- OCCASIONS ------------------

   VIS3               = 0
   IF(VISI.EQ.3) VIS3 = 1
   VIS8               = 0
   IF(VISI.EQ.8) VIS8 = 1

;--------- IOV -----------------------

   KPCL  = VIS3*ETA(4)+VIS8*ETA(5)
   KPKA  = VIS3*ETA(6)+VIS8*ETA(7)

;------ LOGIT transformation ---------

   LGP1  = THETA(7)                   ; Skewness parameter
   LGP2  = THETA(8)                   ; “Broadness” parameter
   PHI   = LOG(LGP1/(1-LGP1))         ; Transformation of LGP1
   PAR1  = EXP(PHI+ETA(3))            ; Transformation and addition of random effect
   ETATR = (PAR1/(1+PAR1)-LGP1)*LGP2  ; Transformed ETA

;---------- PK model -----------------

   TVCL  = THETA(1)*(1+THETA(6)*(CLCR-65))
   TVV   = THETA(2)*WT

   CL    = TVCL*EXP(ETA(1)+KPCL)
   V     = TVV*EXP(ETA(2))
   KA    = THETA(3)*EXP(ETATR+KPKA)
   ALAG1 = THETA(4)
   K     = CL/V
   S2    = V

$ERROR

   IPRED = LOG(.025)
   W     = THETA(5)
   IF(F.GT.0) IPRED = LOG(F)
   IRES  = IPRED-DV
   IWRES = IRES/W
   Y     = IPRED+ERR(1)*W

$THETA  (0,26.6) ; TVCL
$THETA  (0,1.43) ; TVV
$THETA  (0,3.5) ; TVKA
$THETA  (0,0.24) ; LAG_TIME
$THETA  (0,0.33) ; RES_ERR
$THETA  (0,0.0076,0.02941) ; CRCL_on_CL
$THETA  (0,0.1,1) ; Logit_Parameter_1
$THETA  (0,10) ; Logit_Parameter_2
$OMEGA  BLOCK(2)
 0.04  ;     IIV CL
 0.02  ;   COV CL-V
 0.03  ;      IIV V
$OMEGA  BLOCK(1)
 2.5  ;     IIV KA
$OMEGA  BLOCK(1)
 0.02  ;     IOV CL
$OMEGA  BLOCK(1) SAME
$OMEGA  BLOCK(1)
 0.5  ;     IOV KA
$OMEGA  BLOCK(1) SAME
$SIGMA  1  FIX
$ESTIMATION METHOD=1 INTER MAXEVALS=9990 PRINT=1
$COVARIANCE UNCONDITIONAL PRINT=E
$TABLE      ID TAD IPRED IWRES CWRES NPDE ONEHEADER NOPRINT
            FILE=sdtab3
$TABLE      ID CL V KA ALAG1 ETA(1) ETA(2) ETA(3) KPCL KPKA ONEHEADER
            NOPRINT FILE=patab3
$TABLE      ID AGE WT CLCR ONEHEADER NOPRINT FILE=cotab3
$TABLE      ID SEX ACE DIG DIU COMP VISI ONEHEADER NOPRINT FILE=catab3

NM-TRAN MESSAGES
 WARNINGS AND ERRORS (IF ANY) FOR PROBLEM    1
 (WARNING  2) NM-TRAN INFERS THAT THE DATA ARE POPULATION.

1NONLINEAR MIXED EFFECTS MODEL PROGRAM (NONMEM) VERSION 7.3.0
 ORIGINALLY DEVELOPED BY STUART BEAL, LEWIS SHEINER, AND ALISON BOECKMANN
 CURRENT DEVELOPERS ARE ROBERT BAUER, ICON DEVELOPMENT SOLUTIONS,
 AND ALISON BOECKMANN. IMPLEMENTATION, EFFICIENCY, AND STANDARDIZATION
 PERFORMED BY NOUS INFOSYSTEMS.
 PROBLEM NO.:         1
 MOXONIDINE PK ANALYSIS
 TOT. NO. OF OBS RECS:     1022
 TOT. NO. OF INDIVIDUALS:     74
 ONE COMPARTMENT MODEL WITH FIRST-ORDER ABSORPTION (ADVAN2)
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 #TBLN:      1
 #METH: First Order Conditional Estimation with Interaction
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
 #TERM:
0MINIMIZATION SUCCESSFUL
 NO. OF FUNCTION EVALUATIONS USED:      467
 NO. OF SIG. DIGITS IN FINAL EST.:  3.1

 ETABAR IS THE ARITHMETIC MEAN OF THE ETA-ESTIMATES,
 AND THE P-VALUE IS GIVEN FOR THE NULL HYPOTHESIS THAT THE TRUE MEAN IS 0.

 ETABAR:        -3.0086E-03 -1.2772E-02  2.4575E-01  1.0691E-02  4.0822E-03 -1.2140E-01 -2.7470E-01
 SE:             1.9565E-02  1.4857E-02  1.7808E-01  8.9744E-03  1.0848E-02  6.6437E-02  6.2417E-02
 N:                      74          74          74          74          74          74          74

 P VAL.:         8.7779E-01  3.8997E-01  1.6758E-01  2.3355E-01  7.0669E-01  6.7657E-02  1.0783E-05

 ETAshrink(%):   1.7525E+01  2.3649E+01  4.4313E+01  4.3277E+01  3.1435E+01  3.7152E+01  4.0955E+01
 EBVshrink(%):   1.7245E+01  2.3464E+01  3.1032E+01  4.2377E+01  3.2052E+01  3.7987E+01  3.8729E+01
 EPSshrink(%):   1.0968E+01

 #TERE:
 Elapsed estimation time in seconds:    12.24
 Elapsed covariance time in seconds:    14.17

 ********************               FIRST ORDER CONDITIONAL ESTIMATION WITH INTERACTION              ********************
 #OBJT:**************                       MINIMUM VALUE OF OBJECTIVE FUNCTION                      ********************
 #OBJV:********************************************     -780.518       **************************************************

 ********************               FIRST ORDER CONDITIONAL ESTIMATION WITH INTERACTION              ********************
 ********************                             FINAL PARAMETER ESTIMATE                           ********************

 THETA - VECTOR OF FIXED EFFECTS PARAMETERS   *********
         TH 1      TH 2      TH 3      TH 4      TH 5      TH 6      TH 7      TH 8
         2.66E+01  1.45E+00  2.63E+00  2.46E-01  3.27E-01  7.70E-03  5.46E-02  8.09E+00

 OMEGA - COV MATRIX FOR RANDOM EFFECTS - ETAS  ********
            ETA1      ETA2      ETA3      ETA4      ETA5      ETA6      ETA7
 ETA1
+        4.22E-02
 ETA2
+        2.89E-02  2.84E-02
 ETA3
+        0.00E+00  0.00E+00  7.67E+00
 ETA4
+        0.00E+00  0.00E+00  0.00E+00  1.88E-02
 ETA5
+        0.00E+00  0.00E+00  0.00E+00  0.00E+00  1.88E-02
 ETA6
+        0.00E+00  0.00E+00  0.00E+00  0.00E+00  0.00E+00  8.38E-01
 ETA7
+        0.00E+00  0.00E+00  0.00E+00  0.00E+00  0.00E+00  0.00E+00  8.38E-01

 SIGMA - COV MATRIX FOR RANDOM EFFECTS - EPSILONS  ****
            EPS1
 EPS1
+        1.00E+00

 OMEGA - CORR MATRIX FOR RANDOM EFFECTS - ETAS  *******
            ETA1      ETA2      ETA3      ETA4      ETA5      ETA6      ETA7
 ETA1
+        2.05E-01
 ETA2
+        8.36E-01  1.69E-01
 ETA3
+        0.00E+00  0.00E+00  2.77E+00
 ETA4
+        0.00E+00  0.00E+00  0.00E+00  1.37E-01
 ETA5
+        0.00E+00  0.00E+00  0.00E+00  0.00E+00  1.37E-01
 ETA6
+        0.00E+00  0.00E+00  0.00E+00  0.00E+00  0.00E+00  9.16E-01
 ETA7
+        0.00E+00  0.00E+00  0.00E+00  0.00E+00  0.00E+00  0.00E+00  9.16E-01

 SIGMA - CORR MATRIX FOR RANDOM EFFECTS - EPSILONS  ***
            EPS1
 EPS1
+        1.00E+00

 ********************               FIRST ORDER CONDITIONAL ESTIMATION WITH INTERACTION              ********************
 ********************                            STANDARD ERROR OF ESTIMATE                          ********************

 THETA - VECTOR OF FIXED EFFECTS PARAMETERS   *********
         TH 1      TH 2      TH 3      TH 4      TH 5      TH 6      TH 7      TH 8
         7.58E-01  4.07E-02  3.87E-01  3.35E-03  2.53E-02  1.05E-03  3.57E-02  8.72E-01

 OMEGA - COV MATRIX FOR RANDOM EFFECTS - ETAS  ********
            ETA1      ETA2      ETA3      ETA4      ETA5      ETA6      ETA7
 ETA1
+        9.59E-03
 ETA2
+        7.45E-03  8.42E-03
 ETA3
+       ......... .........  5.02E+00
 ETA4
+       ......... ......... .........  4.99E-03
 ETA5
+       ......... ......... ......... ......... .........
 ETA6
+       ......... ......... ......... ......... .........  3.00E-01
 ETA7
+       ......... ......... ......... ......... ......... ......... .........

 SIGMA - COV MATRIX FOR RANDOM EFFECTS - EPSILONS  ****
            EPS1
 EPS1
+       .........

 OMEGA - CORR MATRIX FOR RANDOM EFFECTS - ETAS  *******
            ETA1      ETA2      ETA3      ETA4      ETA5      ETA6      ETA7
 ETA1
+        2.33E-02
 ETA2
+        1.08E-01  2.50E-02
 ETA3
+       ......... .........  9.06E-01
 ETA4
+       ......... ......... .........  1.82E-02
 ETA5
+       ......... ......... ......... ......... .........
 ETA6
+       ......... ......... ......... ......... .........  1.64E-01
 ETA7
+       ......... ......... ......... ......... ......... ......... .........

 SIGMA - CORR MATRIX FOR RANDOM EFFECTS - EPSILONS  ***
            EPS1
 EPS1
+       .........
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
 ********************               FIRST ORDER CONDITIONAL ESTIMATION WITH INTERACTION              ********************
 ********************                      EIGENVALUES OF COR MATRIX OF ESTIMATE                     ********************

             1         2         3         4         5         6         7         8         9        10        11        12
             13        14
         5.55E-02  6.55E-02  1.41E-01  2.29E-01  3.65E-01  4.10E-01  4.74E-01  8.02E-01  8.57E-01  1.02E+00  1.44E+00  2.18E+00
          2.22E+00  3.73E+00
 #CPUT: Total CPU Time in Seconds,       27.490
