Wed May  6 10:59:52 CEST 2015
$PROBLEM    THEOPHYLLINE POPULATION DATA
$INPUT      ID DOSE TIME DV WT
$DATA      theo.csv IGNORE=@
$PRED
;THETA(1)=MEAN ABSORPTION RATE CONSTANT (1/HR)
;THETA(2)=MEAN ELIMINATION RATE CONSTANT (1/HR)
;THETA(3)=SLOPE OF CLEARANCE VS WEIGHT RELATIONSHIP (LITERS/HR/KG)
;DOSE=WT-ADJUSTED DOSE (MG/KG)
;DS=NON-WT-ADJUSTED DOSE (MG)
   IF (DOSE.NE.0) THEN
      DS=DOSE*WT
      W=WT
   ENDIF
   KA=THETA(1)*(THETA(4)*W+ETA(4))+ETA(1)
   KE=THETA(2)+ETA(2)
   CL=THETA(3)*W+ETA(3)
   D=EXP(-KE*TIME)-EXP(-KA*TIME)
   E=CL*(KA-KE)
   F=DS*KE*KA/E*D
   Y=F+EPS(1)

$THETA  (0.1,3,10)
 (0.008,0.08,0.8)
 (0.004,0.04,0.9)
$THETA  (0,1)
$OMEGA  BLOCK(3)
 2
 0.001 0.05
 0.001 0.006 0.4
$OMEGA  0.1  FIX
$SIGMA  0.4
$ESTIMATION MAXEVAL=9999
$COVARIANCE UNCONDITIONAL

NM-TRAN MESSAGES
 WARNINGS AND ERRORS (IF ANY) FOR PROBLEM    1
 (WARNING  2) NM-TRAN INFERS THAT THE DATA ARE POPULATION.
 (WARNING  13) WITH USER-WRITTEN PRED OR $PRED, NM-TRAN CANNOT APPEND THE
 MDV DATA ITEM.

1NONLINEAR MIXED EFFECTS MODEL PROGRAM (NONMEM) VERSION 7.3.0
 ORIGINALLY DEVELOPED BY STUART BEAL, LEWIS SHEINER, AND ALISON BOECKMANN
 CURRENT DEVELOPERS ARE ROBERT BAUER, ICON DEVELOPMENT SOLUTIONS,
 AND ALISON BOECKMANN. IMPLEMENTATION, EFFICIENCY, AND STANDARDIZATION
 PERFORMED BY NOUS INFOSYSTEMS.
 PROBLEM NO.:         1
 THEOPHYLLINE POPULATION DATA
 TOT. NO. OF OBS RECS:      131
 TOT. NO. OF INDIVIDUALS:     12
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 #TBLN:      1
 #METH: First Order
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
 #TERM:
0MINIMIZATION TERMINATED
 DUE TO ROUNDING ERRORS (ERROR=134)
 NO. OF FUNCTION EVALUATIONS USED:      567
 NO. OF SIG. DIGITS UNREPORTABLE
0PARAMETER ESTIMATE IS NEAR ITS BOUNDARY

 #TERE:
 Elapsed estimation time in seconds:     0.12
0R MATRIX ALGORITHMICALLY SINGULAR
0COVARIANCE MATRIX UNOBTAINABLE
0R MATRIX IS OUTPUT
0S MATRIX ALGORITHMICALLY SINGULAR
0S MATRIX IS OUTPUT
0T MATRIX - EQUAL TO RS*RMAT, WHERE S* IS A PSEUDO INVERSE OF S - IS OUTPUT
 Elapsed covariance time in seconds:     0.02

 ********************                                   FIRST ORDER                                  ********************
 #OBJT:**************                       MINIMUM VALUE OF OBJECTIVE FUNCTION                      ********************
 #OBJV:********************************************      273.913       **************************************************

 ********************                                   FIRST ORDER                                  ********************
 ********************                             FINAL PARAMETER ESTIMATE                           ********************

 THETA - VECTOR OF FIXED EFFECTS PARAMETERS   *********
         TH 1      TH 2      TH 3      TH 4
         9.93E+00  2.36E-01  7.16E-02  6.43E+07

 OMEGA - COV MATRIX FOR RANDOM EFFECTS - ETAS  ********
            ETA1      ETA2      ETA3      ETA4
 ETA1
+        2.00E+00
 ETA2
+        9.73E-04  7.57E-02
 ETA3
+        9.99E-04  5.81E-01  5.52E+00
 ETA4
+        0.00E+00  0.00E+00  0.00E+00  1.00E-01

 SIGMA - COV MATRIX FOR RANDOM EFFECTS - EPSILONS  ****
            EPS1
 EPS1
+        1.52E+00

 OMEGA - CORR MATRIX FOR RANDOM EFFECTS - ETAS  *******
            ETA1      ETA2      ETA3      ETA4
 ETA1
+        1.41E+00
 ETA2
+        2.50E-03  2.75E-01
 ETA3
+        3.00E-04  8.98E-01  2.35E+00
 ETA4
+        0.00E+00  0.00E+00  0.00E+00  3.16E-01

 SIGMA - CORR MATRIX FOR RANDOM EFFECTS - EPSILONS  ***
            EPS1
 EPS1
+        1.23E+00
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 #CPUT: Total CPU Time in Seconds,        0.142
