Tue Nov  5 14:24:57 CET 2013
$PROBLEM    STUDY DESIGN COURSE
$INPUT      ID DOSE TIME DV ARM CRCL MDV1 MDV2
$DATA       data_tnpri.csv IGNORE=@
$MSFI       msf_tnpri ONLYREAD
$PRIOR      TNPRI (PROBLEM 2) IVAR=0
$PRED

  BASELINE    = THETA(1)*EXP(ETA(1))
  PLACEBO_MAX = THETA(2)* (1+ETA(2))
  PLACEBO_HL  = THETA(3)
  SLP         = THETA(4)*EXP(ETA(3))
  PLACEBO     = PLACEBO_MAX*(1-EXP(-LOG(2)/PLACEBO_HL*TIME))
  IPRED       = BASELINE + PLACEBO + SLP*DOSE
  Y           = IPRED+EPS(1)
; Change from baseline (CFB) for diagnostics
   IF(TIME.EQ.0) BASE_DV=DV
   CFB         = DV - BASE_DV

$PROBLEM    2
$INPUT      ID DOSE TIME DV ARM CRCL MDV1 MDV2
$DATA       data_tnpri.csv IGNORE=@ REWIND
$THETA  98.7078 ; 1_BASELINE
$THETA  22.759 ; 2_PLACEBO_MAX
$THETA  0.745253 ; 3_PLACEBO_HL
$THETA  0.556133 ; 4_SLP
$OMEGA  BLOCK(2)
 0.232539  ; 1_OM_BASELINE
 -0.021345 0.113703  ; 2_OM_PLC_MAX
$OMEGA  0.107531  ;   3_OM_SLP
$SIGMA  127.891  ;    1_SIGMA
;$SIML (98798) NSUB=1 TRUE=PRIOR
$ESTIMATION METHOD=COND MAXEVAL=3

NM-TRAN MESSAGES
 WARNINGS AND ERRORS (IF ANY) FOR PROBLEM    1
 (WARNING  2) NM-TRAN INFERS THAT THE DATA ARE POPULATION.
 (WARNING  13) WITH USER-WRITTEN PRED OR $PRED, NM-TRAN CANNOT APPEND THE
 MDV DATA ITEM.
 WARNINGS AND ERRORS (IF ANY) FOR PROBLEM    2
 (WARNING  2) NM-TRAN INFERS THAT THE DATA ARE POPULATION.
 (WARNING  13) WITH USER-WRITTEN PRED OR $PRED, NM-TRAN CANNOT APPEND THE
 MDV DATA ITEM.

1NONLINEAR MIXED EFFECTS MODEL PROGRAM (NONMEM) VERSION 7.2.0
 ORIGINALLY DEVELOPED BY STUART BEAL, LEWIS SHEINER, AND ALISON BOECKMANN
 CURRENT DEVELOPERS ARE ROBERT BAUER, ICON DEVELOPMENT SOLUTIONS,
 AND ALISON BOECKMANN. IMPLEMENTATION, EFFICIENCY, AND STANDARDIZATION
 PERFORMED BY NOUS INFOSYSTEMS.
 PROBLEM NO.:         1
 STUDY DESIGN COURSE
 TOT. NO. OF OBS RECS:      360
 TOT. NO. OF INDIVIDUALS:     90
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 #TBLN:      0
 #METH: First Order Conditional Estimation (Evaluation)

 PROBLEM NO.:         2
 2
 TOT. NO. OF OBS RECS:      360
 TOT. NO. OF INDIVIDUALS:     90
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 #TBLN:      1
 #METH: First Order Conditional Estimation
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
 #TERM:
0MINIMIZATION TERMINATED
 DUE TO MAX. NO. OF FUNCTION EVALUATIONS EXCEEDED
 NO. OF FUNCTION EVALUATIONS USED:        7
 NO. OF SIG. DIGITS UNREPORTABLE

 ETABAR IS THE ARITHMETIC MEAN OF THE ETA-ESTIMATES,
 AND THE P-VALUE IS GIVEN FOR THE NULL HYPOTHESIS THAT THE TRUE MEAN IS 0.

 ETABAR:        -3.3157E-03 -1.3243E-02  3.9851E-04
 SE:             4.9486E-02  1.5590E-02  7.6840E-03

 P VAL.:         9.4658E-01  3.9564E-01  9.5864E-01

 ETAshrink(%):   2.1009E+00  5.5893E+01  7.7645E+01
 EPSshrink(%):   1.6360E+01

 #TERE:
 Elapsed estimation time in seconds:     0.02

 ********************                        FIRST ORDER CONDITIONAL ESTIMATION                      ********************
 #OBJT:**************                       MINIMUM VALUE OF OBJECTIVE FUNCTION                      ********************
 #OBJV:********************************************     2514.208       **************************************************

 ********************                        FIRST ORDER CONDITIONAL ESTIMATION                      ********************
 ********************                             FINAL PARAMETER ESTIMATE                           ********************

 THETA - VECTOR OF FIXED EFFECTS PARAMETERS   *********
         TH 1      TH 2      TH 3      TH 4
         9.87E+01  2.28E+01  7.45E-01  5.56E-01

 OMEGA - COV MATRIX FOR RANDOM EFFECTS - ETAS  ********
            ETA1      ETA2      ETA3
 ETA1
+        2.33E-01
 ETA2
+       -2.13E-02  1.14E-01
 ETA3
+        0.00E+00  0.00E+00  1.08E-01

 SIGMA - COV MATRIX FOR RANDOM EFFECTS - EPSILONS  ****
            EPS1
 EPS1
+        1.28E+02

 OMEGA - CORR MATRIX FOR RANDOM EFFECTS - ETAS  *******
            ETA1      ETA2      ETA3
 ETA1
+        4.82E-01
 ETA2
+       -1.31E-01  3.37E-01
 ETA3
+        0.00E+00  0.00E+00  3.28E-01

 SIGMA - CORR MATRIX FOR RANDOM EFFECTS - EPSILONS  ***
            EPS1
 EPS1
+        1.13E+01
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