$PROB Diprivan PK
;; Run No. 341
;; 1. Based on run336 - Different t50
;;
;; 2. Structural model
;;    4-compartment
;; 3. Interindividual variability
;;    Exponential etas on all parameters
;;
;; 4. Residual variability
;;    proportional
;;
;; 5. Covariate model
;;    -
;; 6. Estimation method
;;    FOCE-INTER
;; 7. Other
;;
;;
$INPUT ID PNO OCC DAT=DROP TIM=DROP TIME FLAG DOSE AMT RATE DV LNDV EVID
 BLOQ SEX AGE WT BMI HT
$DATA DiprivanPK.dta IGNORE=# IGNORE=(FLAG.EQ.1)
$SUBROUTINES ADVAN5 TRANS1
$MODEL COMP (CENTRAL, DEFOBS, DEFDOSE)
       COMP (PERIPH1)
       COMP (PERIPH2)
       COMP (PERIPH3)
$PK
;----------------------------------
;Covariate model
;----------------------------------
CLWT  = THETA(14)*(WT-70)
CLCOV = 1+CLWT
;----------------------------------
;PK parameters
;----------------------------------

TVCL   = THETA(1)*CLCOV
TVV1   = THETA(2)
TVQ2   = THETA(3)
TVV2   = THETA(4)
TVQ3   = THETA(5)
TVV3   = THETA(6)
TVQ4   = THETA(8)
TVV4   = THETA(9)
TVLAG  = THETA(10)
TVINH  = THETA(11)
TVT50  = THETA(12)
IF(DOSE.EQ.1) TVT50 = THETA(15)

INH    = TVINH*EXP(ETA(9))
T50    = TVT50*EXP(ETA(10))

CLB    = TVCL*EXP(ETA(1))
Q2B    = TVQ2*EXP(ETA(3))
Q3B    = TVQ3*EXP(ETA(5))
Q4B    = TVQ4*EXP(ETA(7))

CL     = (CLB/(1-INH))*(1-(INH*TIME/(T50+TIME)))
V1     = TVV1*EXP(ETA(2))
Q2     = (Q2B/(1-INH))*(1-(INH*TIME/(T50+TIME)))
V2     = TVV2*EXP(ETA(4))
Q3     = (Q3B/(1-INH))*(1-(INH*TIME/(T50+TIME)))
V3     = TVV3*EXP(ETA(6))
Q4     = (Q4B/(1-INH))*(1-(INH*TIME/(T50+TIME)))
V4     = TVV4*EXP(ETA(8))
ALAG1  = TVLAG

; Transforming from ng/mL to umol/L
S1     = V1/178.270  ;MW=178.27

V1    = V1
K10   = CL/V1
K12   = Q2/V1
K21   = Q2/V2
K13   = Q3/V1
K31   = Q3/V3
K14   = Q4/V1
K41   = Q4/V4

$ERROR
;------------------------------------------------
; Residual error model
;------------------------------------------------

IPRED  = F
W=THETA(7)*IPRED
IF(TIME.LT.2) W=THETA(13)*IPRED
IF(IPRED.EQ.0) W=1
IRES   = DV - IPRED
IWRES  = IRES/W
Y      = IPRED+EPS(1)*W


;------------------------------------------------
; INITIAL ESTIMATES FOR THETAS, OMEGAS AND SIGMA
;------------------------------------------------
$THETA (0,1.75)            ;1  CL (L/min)
$THETA (0,3.9)             ;2  V1 (L)
$THETA (0,1.4)             ;3  Q2
$THETA (0,6.0)             ;4  V2
$THETA (0,0.80)            ;5  Q3
$THETA (0,18)              ;6  V3
$THETA (0,0.13)            ;7  Proportional Error
$THETA (0,0.50)            ;8  Q4
$THETA (0,95)              ;9  V4
$THETA (0,0.10)            ;10 Lagtime
$THETA (0,0.7)             ;11 INH
$THETA (0,1.0)             ;12 t50
$THETA (0,0.20)            ;13 Error 1st minutes
$THETA (-0.035, 0.02,0.055) ;14 WT on CL
$THETA (0,1.0)             ;15 t50 for bolus

$OMEGA 0.1                 ;1  CL
$OMEGA 0.1                 ;2  V1
$OMEGA 0 FIX               ;3  Q2
$OMEGA 0.1                 ;4  V2
$OMEGA 0 FIX               ;5  Q3
$OMEGA 0.1                 ;6  V3
$OMEGA 0 FIX               ;7  Q4
$OMEGA 0.1                 ;8  V4
$OMEGA 0 FIX               ;9  inh
$OMEGA 0.1                 ;10  t50

$SIGMA 1 FIX

$EST PRINT=5 METHOD=1 INTER NOABORT MAX=9999
$COV

1NONLINEAR MIXED EFFECTS MODEL PROGRAM (NONMEM)    DOUBLE PRECISION NONMEM    VERSION VI LEVEL 2.0
 DEVELOPED AND PROGRAMMED BY STUART BEAL AND LEWIS SHEINER
 PROBLEM NO.:         1
 Diprivan PK
 TOT. NO. OF OBS RECS:      548
 TOT. NO. OF INDIVIDUALS:     21
 GENERAL LINEAR KINETICS MODEL (ADVAN5)
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
0MINIMIZATION SUCCESSFUL
 HOWEVER, PROBLEMS OCCURRED WITH THE MINIMIZATION.
 REGARD THE RESULTS OF THE ESTIMATION STEP CAREFULLY, AND ACCEPT THEM ONLY
 AFTER CHECKING THAT THE COVARIANCE STEP PRODUCES REASONABLE OUTPUT.
 NO. OF FUNCTION EVALUATIONS USED:      899
 NO. OF SIG. DIGITS IN FINAL EST.:  3.2

 ETABAR IS THE ARITHMETIC MEAN OF THE ETA-ESTIMATES,
 AND THE P-VALUE IS GIVEN FOR THE NULL HYPOTHESIS THAT THE TRUE MEAN IS 0.

 ETABAR:   0.93E-03  0.57E-02  0.00E+00 -0.29E-02  0.00E+00  0.14E-02  0.00E+00 -0.65E-03  0.00E+00 -0.32E-04
 SE:       0.17E-01  0.24E-01  0.00E+00  0.97E-01  0.00E+00  0.42E-01  0.00E+00  0.14E-01  0.00E+00  0.16E+00

 P VAL.:   0.96E+00  0.81E+00  0.10E+01  0.98E+00  0.10E+01  0.97E+00  0.10E+01  0.96E+00  0.10E+01  0.10E+01

 ********************                           MINIMUM VALUE OF OBJECTIVE FUNCTION                  ********************

 **************************************************       6263.676     **************************************************

 ********************                                  FINAL PARAMETER ESTIMATE                      ********************

 THETA - VECTOR OF FIXED EFFECTS PARAMETERS   *********
            TH 1      TH 2      TH 3      TH 4      TH 5      TH 6      TH 7      TH 8      TH 9      TH10      TH11      TH12
             TH13      TH14      TH15
         1.60E+00  2.88E+00  1.29E+00  4.47E+00  6.80E-01  1.24E+01  1.29E-01  4.58E-01  7.12E+01  8.72E-02  7.57E-01  1.17E+00
          2.16E-01  7.26E-03  8.42E-01

 OMEGA - COV MATRIX FOR RANDOM EFFECTS - ETAS  ********
            ETA1      ETA2      ETA3      ETA4      ETA5      ETA6      ETA7      ETA8      ETA9      ET10
 ETA1
+        7.59E-03
 ETA2
+        0.00E+00  3.70E-02
 ETA3
+        0.00E+00  0.00E+00  0.00E+00
 ETA4
+        0.00E+00  0.00E+00  0.00E+00  2.29E-01
 ETA5
+        0.00E+00  0.00E+00  0.00E+00  0.00E+00  0.00E+00
 ETA6
+        0.00E+00  0.00E+00  0.00E+00  0.00E+00  0.00E+00  5.36E-02
 ETA7
+        0.00E+00  0.00E+00  0.00E+00  0.00E+00  0.00E+00  0.00E+00  0.00E+00
 ETA8
+        0.00E+00  0.00E+00  0.00E+00  0.00E+00  0.00E+00  0.00E+00  0.00E+00  1.53E-02
 ETA9
+        0.00E+00  0.00E+00  0.00E+00  0.00E+00  0.00E+00  0.00E+00  0.00E+00  0.00E+00  0.00E+00
 ET10
+        0.00E+00  0.00E+00  0.00E+00  0.00E+00  0.00E+00  0.00E+00  0.00E+00  0.00E+00  0.00E+00  6.07E-01

 SIGMA - COV MATRIX FOR RANDOM EFFECTS - EPSILONS  ****
            EPS1
 EPS1
+        1.00E+00

 ********************                             STANDARD ERROR OF ESTIMATE                         ********************

 THETA - VECTOR OF FIXED EFFECTS PARAMETERS   *********
            TH 1      TH 2      TH 3      TH 4      TH 5      TH 6      TH 7      TH 8      TH 9      TH10      TH11      TH12
             TH13      TH14      TH15
         7.90E-02  3.06E-01  2.30E-01  6.65E-01  8.62E-02  1.54E+00  5.23E-03  5.10E-02  8.74E+00  6.57E-02  3.01E-02  2.20E-01
          5.04E-02  1.79E-03  1.55E-01

 OMEGA - COV MATRIX FOR RANDOM EFFECTS - ETAS  ********
            ETA1      ETA2      ETA3      ETA4      ETA5      ETA6      ETA7      ETA8      ETA9      ET10
 ETA1
+        3.05E-03
 ETA2
+       .........  3.60E-02
 ETA3
+       ......... ......... .........
 ETA4
+       ......... ......... .........  1.12E-01
 ETA5
+       ......... ......... ......... ......... .........
 ETA6
+       ......... ......... ......... ......... .........  2.64E-02
 ETA7
+       ......... ......... ......... ......... ......... ......... .........
 ETA8
+       ......... ......... ......... ......... ......... ......... .........  1.85E-02
 ETA9
+       ......... ......... ......... ......... ......... ......... ......... ......... .........
 ET10
+       ......... ......... ......... ......... ......... ......... ......... ......... .........  2.50E-01

 SIGMA - COV MATRIX FOR RANDOM EFFECTS - EPSILONS  ****
            EPS1
 EPS1
+       .........
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