Fri Feb 12 16:54:09 CET 2016
;; 1. Based on: 61
;; 2. Description: 169 - As 61 - 3LV
;; x1. Author: user
;*******************************************************************************
;        IRT in Parkinson's - combined model for UPDRS and MDS - UPDRS
;
; NOTE1: 	If reading in UPDRS data, in $INPUT have ITEMU = ITEM
;    and If reading in MDSUPDRS data, in $INPUT have ITEMM = ITEM
;
; NOTE2:  Create another column in dataset itself:
;         ITEMM or ITEMU (respective to NOTE1) with 0 values
;*******************************************************************************
$SIZES      LTH=500 MAXIDS=50000 DIMNEW=7000
$PROBLEM    IRT in Parkinson's Disease (GSK data) - Combined model for
;           UPDRS and MDS-UPDRS
$INPUT      STID ID ITEMU DV TIME PRD DOSE AGE WT HT ETHNICITY SEX
            CMSE CMAM CMAC CMDP FORM TSDW EXCL ENDPTCAT SEQ TMT
            DROPOUT RDO VISITW VISITD TDOW ITEMM
$DATA      Beta2.csv IGNORE=@ IGNORE=(EXCL.EQ.1) IGNORE=(STID.EQ.168)
            IGNORE=(ENDPTCAT.NE.1) IGNORE=(ITEMU.EQ.44)
            IGNORE=(ITEMU.EQ.50) IGNORE=(TIME.GT.0) IGNORE=(DV.EQ.-99)
$PRED


;Sim_start for VPC

$ESTIMATION MAXEVAL=999999 METHOD=COND LAPLACE MCETA=1000 -2LL PRINT=1
            NOABORT MSFO=msf_run68
;$SIMULATION (21398012) (32131288 UNI) ONLYSIMULATION NOPREDICTION NSUB=100 ; for VPC

;Sim_end for VPC
$TABLE      ID ITEM DV PSI ETA1 ETA2 ETA3 TIME IPRED RES
            FILE=psi_estimates_tab68 NOAPPEND ONEHEADER NOPRINT
$TABLE      ITEM DIS DIF GUE DIF1 DIF2 DIF3 DIF4 DIF5
            FILE=item_parameters_tab68 NOAPPEND ONEHEADER NOPRINT
$TABLE      ID ITEM DV PSI TIME P0 P1 P2 P3 P4 UP0 UP1 UP2 UP3 UP4 SDV
            UPGE1 UPGE2 UPGE3 UPGE4 PGE1 PGE2 PGE3 PGE4
            FILE=prop_estimates_tab68 NOAPPEND ONEHEADER NOPRINT
$THETA  0.803713 FIX ; 1 I1DISGR4
$THETA  1.40615 FIX ; 2	I1DIF1GR4
$THETA  2.83611 FIX ; 3 I1DIF2GR4
$THETA  2.43466 FIX ; 4	I1DIF3GR4
$THETA  50 FIX ; 5	I1DIF4GR4
$THETA  (0,0.390321,1) ; 6 I1 - FR1
$THETA  1 FIX ; 7 I1 - FR4
$THETA  0.71797 FIX ; 8	I2DISGR4
$THETA  4.44303 FIX ; 9	I2DIF1GR4
$THETA  3.88909 FIX ; 10 I2DIF2GR4
$THETA  50 FIX ; 11 I2DIF3GR4
$THETA  50 FIX ; 12 I2DIF4GR4
$THETA  (0,0.805851,1) ; 13 I2 - FR0
$THETA  0.761187 FIX ; 14 I3DISGR4
$THETA  1.60376 FIX ; 15 I3DIF1GR4
$THETA  2.44851 FIX ; 16 I3DIF2GR4
$THETA  2.18606 FIX ; 17 I3DIF3GR4
$THETA  50 FIX ; 18 I3DIF4GR4
$THETA  1.06393 FIX ; 19 I4DISGR4
$THETA  1.65482 FIX ; 20 I4DIF1GR4
$THETA  1.63278 FIX ; 21 I4DIF2GR4
$THETA  2.2184 FIX ; 22 I4DIF3GR4
$THETA  50 FIX ; 23 I4DIF4GR4
$THETA  1.10263 FIX ; 24 I5DISGR4
$THETA  0.654278 FIX ; 25 I5DIF1GR4
$THETA  1.39602 FIX ; 26 I5DIF2GR4
$THETA  2.07094 FIX ; 27 I5DIF3GR4
$THETA  50 FIX ; 28 I5DIF4GR4
$THETA  0.996294 FIX ; 29 I6DISGR4
$THETA  0.704732 FIX ; 30 I6DIF1GR4
$THETA  0.972972 FIX ; 31 I6DIF2GR4
$THETA  1.29208 FIX ; 32 I6DIF3GR4
$THETA  2.27295 FIX ; 33 I6DIF4GR4
$THETA  1 FIX ; 34 I6 - FR1
$THETA  (0,0.733335,1) ; 35 I6 - FR3
$THETA  1.03404 FIX ; 36 I7DISGR4
$THETA  1.87628 FIX ; 37 I7DIF1GR4
$THETA  2.90417 FIX ; 38 I7DIF2GR4
$THETA  0.791996 FIX ; 39 I7DIF3GR4
$THETA  50 FIX ; 40 I7DIF4GR4
$THETA  (0,0.533465,1) ; 41 I7 - FR1
$THETA  0 FIX ; 42 I7 - FR3
$THETA  0.897659 FIX ; 43 I8DISGR4
$THETA  -0.653523 FIX ; 44 I8DIF1GR4
$THETA  2.11213 FIX ; 45 I8DIF2GR4
$THETA  1.93243 FIX ; 46 I8DIF3GR4
$THETA  2.26932 FIX ; 47 I8DIF4GR4
$THETA  (0,0.637681,1) ; 48 I8 - FR1
$THETA  1.29642 FIX ; 49 I9DISGR4
$THETA  0.627478 FIX ; 50 I9DIF1GR4
$THETA  2.1697 FIX ; 51	I9DIF2GR4
$THETA  3.68103 FIX ; 52 I9DIF3GR4
$THETA  (0,1.99613,50) ; 53	I9DIF4GR4
$THETA  1.6966 FIX ; 54 I10DISGR4
$THETA  0.248416 FIX ; 55 I10DIF1GR4
$THETA  1.9276 FIX ; 56	I10DIF2GR4
$THETA  2.55871 FIX ; 57 I10DIF3GR4
$THETA  (0,1.74686,50) ; 58 I10DIF4GR4
$THETA  1.32065 FIX ; 59 I11DISGR4
$THETA  0.883551 FIX ; 60 I11DIF1GR4
$THETA  3.61457 FIX ; 61 I11DIF2GR4
$THETA  (0,1.3311,50) ; 62	I11DIF3GR4
$THETA  50 FIX ; 63	I11DIF4GR4
$THETA  1.49996 FIX ; 64 I12DISGR4
$THETA  0.782463 FIX ; 65 I12DIF1GR4
$THETA  2.5981 FIX ; 66	I12DIF2GR4
$THETA  2.2005 FIX ; 67	I12DIF3GR4
$THETA  (0,1.87461,50) ; 68	I12DIF4GR4
$THETA  0 FIX ; 69 I12 - FR3
$THETA  (0,0.00432323,1) ; 70 I12 - FR4
$THETA  (0,1.23175) ; 71	I13DISGR4
$THETA  2.45272 ; 72 I13DIF1GR4
$THETA  (0,1.45259,50) ; 73 I13DIF2GR4
$THETA  (0,1.759,50) ; 74 I13DIF3GR4
$THETA  50 FIX ; 75 I13DIF4GR4
$THETA  1.53813 FIX ; 76 I14DISGR4
$THETA  2.39558 FIX ; 77 I14DIF1GR4
$THETA  1.40572 FIX ; 78 I14DIF2GR4
$THETA  1.52182 FIX ; 79 I14DIF3GR4
$THETA  (0,1.77937,50) ; 80 I14DIF4GR4
$THETA  1.44877 FIX ; 81 I15DISGR4
$THETA  0.38194 FIX ; 82 I15DIF1GR4
$THETA  2.60576 FIX ; 83 I15DIF2GR4
$THETA  0.879622 FIX ; 84 I15DIF3GR4
$THETA  50 FIX ; 85 I15DIF4GR4
$THETA  (0,0.911196,1) ; 86 I15 - FR1
$THETA  1 FIX ; 87 I15 - FR4
$THETA  0.288752 FIX ; 88 I16DISGR4
$THETA  -6.21885 FIX ; 89 I16DIF1GR4
$THETA  9.909 FIX ; 90 I16DIF2GR4
$THETA  7.69428 FIX ; 91 I16DIF3GR4
$THETA  7.86785 FIX ; 92 I16DIF4GR4
$THETA  0.846703 FIX ; 93 I17DISGR4
$THETA  -0.11323 FIX ; 94 I17DIF1GR4
$THETA  2.55438 FIX ; 95 I17DIF2GR4
$THETA  1.46382 FIX ; 96 I17DIF3GR4
$THETA  50 FIX ; 97 I17DIF4GR4
$THETA  1.13648 FIX ; 98 I18DISGR4
$THETA  0.0399426 FIX ; 99 I18DIF1GR4
$THETA  2.93027 FIX ; 100 I18DIF2GR4
$THETA  3.0166 FIX ; 101 I18DIF3GR4
$THETA  (0,2.59293,50) ; 102 I18DIF4GR4
$THETA  0 FIX ; 103 I18 - FR4
$THETA  1.56729 FIX ; 104 I19DISGR4
$THETA  -1.57629 FIX ; 105 I19DIF1GR4
$THETA  2.41614 FIX ; 106 I19DIF2GR4
$THETA  2.16117 FIX ; 107 I19DIF3GR4
$THETA  1.92412 FIX ; 108 I19DIF4GR4
$THETA  (0,0.720024) ; 109 I200DISGR4
$THETA  3.48383 ; 110 I200DIF1GR4
$THETA  (0,2.76038,50) ; 111 I200DIF2GR4
$THETA  (0,3.74476,50) ; 112 I200DIF3GR4
$THETA  50 FIX ; 113 I200DIF4GR4
$THETA  (0,0.40817) ; 114 I201DISGR4
$THETA  0.596602 ; 115 I201DIF1GR4
$THETA  (0,3.36181,50) ; 116 I201DIF2GR4
$THETA  (0,3.99386,50) ; 117 I201DIF3GR4
$THETA  (0,8.14016,50) ; 118 I201DIF4GR4
$THETA  (0,0.397119) ; 119 I202DISGR4
$THETA  0.420749 ; 120 I202DIF1GR4
$THETA  (0,3.23732,50) ; 121 I202DIF2GR4
$THETA  (0,3.88297,50) ; 122 I202DIF3GR4
$THETA  (0,6.15298,50) ; 123 I202DIF4GR4
$THETA  (0,0.560483) ; 124 I203DISGR4
$THETA  2.71549 ; 125 I203DIF1GR4
$THETA  (0,2.76734,50) ; 126 I203DIF2GR4
$THETA  (0,4.24858,50) ; 127 I203DIF3GR4
$THETA  50 FIX ; 128 I203DIF4GR4
$THETA  (0,0.541478) ; 129	I204DISGR4
$THETA  2.48566 ; 130 I204DIF1GR4
$THETA  (0,3.03981,50) ; 131 I204DIF2GR4
$THETA  (0,4.0619,50) ; 132 I204DIF3GR4
$THETA  50 FIX ; 133 I204DIF4GR4
$THETA  (0,0.603095) ; 134	I205DISGR4
$THETA  1.31124 ; 135 I205DIF1GR4
$THETA  (0,3.33311,50) ; 136 I205DIF2GR4
$THETA  (0,2.96589,50) ; 137 I205DIF3GR4
$THETA  50 FIX ; 138 I205DIF4GR4
$THETA  (0,0.650461) ; 139 I206DISGR4
$THETA  1.57126 ; 140 I206DIF1GR4
$THETA  (0,2.84126,50) ; 141 I206DIF2GR4
$THETA  (0,2.78664,50) ; 142 I206DIF3GR4
$THETA  (0,2.55467,50) ; 143 I206DIF4GR4
$THETA  1.0188 FIX ; 144 I207DISGR4
$THETA  -0.023059 FIX ; 145	I207DIF1GR4
$THETA  1.6141 FIX ; 146 I207DIF2GR4
$THETA  3.01527 FIX ; 147 I207DIF3GR4
$THETA  3.27526 FIX ; 148 I207DIF4GR4
$THETA  (0,0.813002,1) ; 149 I207 - FR2
$THETA  1 FIX ; 150 I207 - FR4
$THETA  1.22586 FIX ; 151 I208DISGR4
$THETA  -1.96464 FIX ; 152 I208DIF1GR4
$THETA  1.82279 FIX ; 153 I208DIF2GR4
$THETA  2.74521 FIX ; 154 I208DIF3GR4
$THETA  (0,0.0880468,50) ; 155 I208DIF4GR4
$THETA  1 FIX ; 156 I208 - FR2
$THETA  (0,0.944473,1) ; 157 I208 - FR4
$THETA  1.20822 FIX ; 158 I209DISGR4
$THETA  -2.12428 FIX ; 159 I209DIF1GR4
$THETA  1.90608 FIX ; 160 I209DIF2GR4
$THETA  3.05783 FIX ; 161 I209DIF3GR4
$THETA  3.23746 FIX ; 162 I209DIF4GR4
$THETA  (0,0.824453,1) ; 163 I209 - FR2
$THETA  1 FIX ; 164 I209 - FR4
$THETA  0.928848 FIX ; 165 I210DISGR4
$THETA  -0.728983 FIX ; 166	I210DIF1GR4
$THETA  1.65765 FIX ; 167 I210DIF2GR4
$THETA  2.712 FIX ; 168	I210DIF3GR4
$THETA  (0,9.99825E-07,50) ; 169 I210DIF4GR4
$THETA  1 FIX ; 170 I210 - FR2
$THETA  (0,0.896552,1) ; 171 I210 - FR4
$THETA  0.847223 FIX ; 172 I211DISGR4
$THETA  -0.700967 FIX ; 173 I211DIF1GR4
$THETA  1.93385 FIX ; 174 I211DIF2GR4
$THETA  3.13601 FIX ; 175 I211DIF3GR4
$THETA  5.01593 FIX ; 176 I211DIF4GR4
$THETA  (0,0.770586,1) ; 177 I211 - FR2
$THETA  1 FIX ; 178 I211 - FR4
$THETA  1.77344 FIX ; 179 I212DISGR4
$THETA  -2.11306 FIX ; 180 I212DIF1GR4
$THETA  1.72031 FIX ; 181 I212DIF2GR4
$THETA  1.64843 FIX ; 182 I212DIF3GR4
$THETA  2.03188 FIX ; 183 I212DIF4GR4
$THETA  (0,0.734118,1) ; 184 I212 - FR2
$THETA  (0,0.669506,1) ; 185 I212 - FR3
$THETA  1.78511 FIX ; 186 I213DISGR4
$THETA  -1.82053 FIX ; 187 I213DIF1GR4
$THETA  1.83348 FIX ; 188 I213DIF2GR4
$THETA  1.55998 FIX ; 189 I213DIF3GR4
$THETA  2.06541 FIX ; 190 I213DIF4GR4
$THETA  (0,0.638948,1) ; 191 I213 - FR2
$THETA  (0,0.673575,1) ; 192 I213 - FR3
$THETA  1.74286 FIX ; 193 I214DISGR4
$THETA  -1.74416 FIX ; 194 I214DIF1GR4
$THETA  1.71019 FIX ; 195 I214DIF2GR4
$THETA  1.69005 FIX ; 196 I214DIF3GR4
$THETA  50 FIX ; 197 I214DIF4GR4
$THETA  (0,0.787173,1) ; 198 I214 - FR2
$THETA  (0,0.725378,1) ; 199 I214 - FR3
$THETA  1.8687 FIX ; 200 I215DISGR4
$THETA  -1.27143 FIX ; 201 I215DIF1GR4
$THETA  1.71903 FIX ; 202 I215DIF2GR4
$THETA  1.50844 FIX ; 203 I215DIF3GR4
$THETA  50 FIX ; 204 I215DIF4GR4
$THETA  (0,0.659207,1) ; 205 I215 - FR2
$THETA  (0,0.773158,1) ; 206 I215 - FR3
$THETA  1.74941 FIX ; 207 I216DISGR4
$THETA  -1.55253 FIX ; 208 I216DIF1GR4
$THETA  1.60473 FIX ; 209 I216DIF2GR4
$THETA  1.5204 FIX ; 210 I216DIF3GR4
$THETA  1.94249 FIX ; 211 I216DIF4GR4
$THETA  (0,0.825075,1) ; 212 I216 - FR2
$THETA  (0,0.724374,1) ; 213 I216 - FR3
$THETA  1.56146 FIX ; 214 I217DISGR4
$THETA  -1.30857 FIX ; 215 I217DIF1GR4
$THETA  1.84053 FIX ; 216 I217DIF2GR4
$THETA  1.83978 FIX ; 217 I217DIF3GR4
$THETA  2.09752 FIX ; 218 I217DIF4GR4
$THETA  (0,0.606209,1) ; 219 I217 - FR2
$THETA  (0,0.658105,1) ; 220 I217 - FR3
$THETA  1.2669 FIX ; 221 I218DISGR4
$THETA  -0.965298 FIX ; 222 I218DIF1GR4
$THETA  1.88115 FIX ; 223 I218DIF2GR4
$THETA  2.07974 FIX ; 224 I218DIF3GR4
$THETA  3.37931 FIX ; 225 I218DIF4GR4
$THETA  (0,0.340241,1) ; 226 I218 - FR2
$THETA  (0,0.456409,1) ; 227 I218 - FR3
$THETA  1.01247 FIX ; 228 I219DISGR4
$THETA  -0.432787 FIX ; 229 I219DIF1GR4
$THETA  2.50412 FIX ; 230  I219DIF2GR4
$THETA  2.41378 FIX ; 231 I219DIF3GR4
$THETA  (0,2.09163,50) ; 232 I219DIF4GR4
$THETA  0 FIX ; 233 I219 - FR2
$THETA  0 FIX ; 234 I219 - FR3
$THETA  1.12653 FIX ; 235 I27DISGR4
$THETA  1.87872 FIX ; 236 I27DIF1GR4
$THETA  2.01436 FIX ; 237 I27DIF2GR4
$THETA  1.39345 FIX ; 238 I27DIF3GR4
$THETA  (0,1.16949,50) ; 239 I27DIF4GR4
$THETA  1.2741 FIX ; 240	I28DISGR4
$THETA  -0.267655 FIX ; 241	I28DIF1GR4
$THETA  2.3296 FIX ; 242	I28DIF2GR4
$THETA  2.183 FIX ; 243	I28DIF3GR4
$THETA  2.38394 FIX ; 244	I28DIF4GR4
$THETA  (0,0.916678,1) ; 245 I28 - FR4
$THETA  0.921066 FIX ; 246 I29DISGR4
$THETA  -0.530405 FIX ; 247	I29DIF1GR4
$THETA  3.9975 FIX ; 248 I29DIF2GR4
$THETA  2.53708 FIX ; 249 I29DIF3GR4
$THETA  (0,2.13932,50) ; 250 I29DIF4GR4
$THETA  0 FIX ; 251 I29 - FR4
$THETA  0.796367 FIX ; 252 I30DISGR4
$THETA  3.21117 FIX ; 253 I30DIF1GR4
$THETA  1.6323 FIX ; 254 I30DIF2GR4
$THETA  1.00485 FIX ; 255 I30DIF3GR4
$THETA  (0,2.89165,50) ; 256 I30DIF4GR4
$THETA  (0,0.923077,1) ; 257 I30 - FR4
$THETA  1.81744 FIX ; 258 I31DISGR4
$THETA  -1.47475 FIX ; 259 I31DIF1GR4
$THETA  1.88148 FIX ; 260 I31DIF2GR4
$THETA  1.81987 FIX ; 261 I31DIF3GR4
$THETA  3.58311 FIX ; 262 I31DIF4GR4
$THETA  0.377443 FIX ; 263 I32DISGR4
$THETA  10.2459 FIX ; 264 I32DIF1GR4
$THETA  3.95418 FIX ; 265 I32DIF2GR4
$THETA  2.92372 FIX ; 266 I32DIF3GR4
$THETA  50 FIX ; 267 I32DIF4GR4
$THETA  0.359014 FIX ; 268	I33DISGR4
$THETA  14.067 FIX ; 269 I33DIF1GR4
$THETA  (0,4.9935E-07,50) ; 270 I33DIF2GR4
$THETA  (0,2.70813,50) ; 271 I33DIF3GR4
$THETA  (0,5.29434,50) ; 272 I33DIF4GR4
$THETA  1 FIX ; 273 I33 - FR1
$THETA  (0,0.833333,1) ; 274 I33 - FR4
$THETA  (0,0.317804) ; 275	I34DISGR4
$THETA  7.51778 ; 276	I34DIF1GR4
$THETA  (0,3.9942,50) ; 277 I34DIF2GR4
$THETA  (0,5.17404,50) ; 278 I34DIF3GR4
$THETA  (0,3.47432,50) ; 279	I34DIF4GR4
$THETA  0.298901 FIX ; 280 I35DISGR4
$THETA  9.42826 FIX ; 281 I35DIF1GR4
$THETA  50 FIX ; 282 I35DIF2GR4
$THETA  50 FIX ; 283 I35DIF3GR4
$THETA  50 FIX ; 284 I35DIF4GR4
$THETA  (0,0.00165571) ; 285	I36DISPL3
$THETA  -991.637 ; 286 I36DIFPL3
$THETA  0 FIX ; 287	I36GUEPL3
$THETA  (0,0.362612) ; 288	I37DISPL3
$THETA  0.734792 ; 289 I37DIFPL3
$THETA  0 FIX ; 290 I37GUEPL3
$THETA  (0,0.499377) ; 291	I38DISPL3
$THETA  3.26469 ; 292 I38DIFPL3
$THETA  0 FIX ; 293 I38GUEPL3
$THETA  0.74432 FIX ; 294 I39DISGR4
$THETA  3.57594 FIX ; 295 I39DIF1GR4
$THETA  1.95622 FIX ; 296 I39DIF2GR4
$THETA  0.956383 FIX ; 297 I39DIF3GR4
$THETA  0.798142 FIX ; 298 I39DIF4GR4
$THETA  (0,0.0699565) ; 299	I40DISPL3
$THETA  38.8839 ; 300 I40DIFPL3
$THETA  0 FIX ; 301 I40GUEPL3
$THETA  (0,0.2313) ; 302	I41DISPL3
$THETA  2.87394 ; 303 I41DIFPL3
$THETA  0 FIX ; 304 I41GUEPL3
$THETA  0.945495 FIX ; 305 I42DISGR4
$THETA  1.34305 FIX ; 306 I42DIF1GR4
$THETA  50 FIX ; 307 I42DIF2GR4
$THETA  50 FIX ; 308 I42DIF3GR4
$THETA  50 FIX ; 309 I42DIF4GR4
$THETA  1.85038 FIX ; 310 I43DISGR5
$THETA  -3.86393 FIX ; 311	I43DIF1GR5
$THETA  3.41632 FIX ; 312 I43DIF2GR5
$THETA  3.53543 FIX ; 313 I43DIF3GR5
$THETA  1.54194 FIX ; 314 I43DIF4GR5
$THETA  50 FIX ; 315 I43DIF5GR5
$THETA  (0,0.3,1) ; 316 I43 FR1
$THETA  (0,0.50463,1) ; 317 I43 FR3
$THETA  -0.5 ; 318 PRS - PSI mean
$THETA  -0.5 ; 319 NDRS - PSI mean
$THETA  -0.5 ; 320 DRS - PSI mean
$THETA  (0,0.5) ; 321 decrease in psi for being the unaffected side
$THETA  (0,0.5,1) ; 322 Mixture prop
$OMEGA  0.5  ; 1 - Variance in PRS PSI (318)
$OMEGA  0.5  ; 2 - Variance in NDRS PSI (319)
$OMEGA  0.5  ; 3 - Variance in DRS PSI (320)
$OMEGA  0.5  ; 4 - Variance in decrease in psi for being the unaffected side (321)

$PROBLEM    IRT in Parkinson's Disease (GSK data) - Combined model for
;           UPDRS and MDS-UPDRS
$INPUT      STID ID ITEMU DV TIME PRD DOSE AGE WT HT ETHNICITY SEX
            CMSE CMAM CMAC CMDP FORM TSDW EXCL ENDPTCAT SEQ TMT
            DROPOUT RDO VISITW VISITD TDOW ITEMM
$DATA      Beta2.csv IGNORE=@ IGNORE=(EXCL.EQ.1)
            IGNORE=(ENDPTCAT.NE.1) IGNORE=(ITEMU.EQ.44)
            IGNORE=(STID.EQ.168) IGNORE=(ITEMU.EQ.50)
            IGNORE=(TIME.GT.0) IGNORE=(DV.EQ.-99) REWIND
$SIMULATION (21398012) (32131288 UNI) ONLYSIMULATION NOPREDICTION
            TRUE=FINAL NSUB=100
$MSFI       msf_run68
$TABLE      NID ID ITEM DV PSI TIME IPRED RES FILE=mirror_plot_tab68
            NOAPPEND ONEHEADER NOPRINT

NM-TRAN MESSAGES
 WARNINGS AND ERRORS (IF ANY) FOR PROBLEM    1
 (WARNING  2) NM-TRAN INFERS THAT THE DATA ARE POPULATION.
 (WARNING  3) THERE MAY BE AN ERROR IN THE ABBREVIATED CODE. THE FOLLOWING
 ONE OR MORE RANDOM VARIABLES ARE DEFINED WITH "IF" STATEMENTS THAT DO NOT
 PROVIDE DEFINITIONS FOR BOTH THE "THEN" AND "ELSE" CASES. IF ALL
 CONDITIONS FAIL, THE VALUES OF THESE VARIABLES WILL BE ZERO.
   PGE1 PGE2 PGE3 PGE4 P0 P1 P2 P3 P4 NP2 NP3 NP4 PGE5 P5 P UP0 UP1 UP2 UP3
 UP4 NWP0 NWP1 NWP2 NWP3 NWP4 PP0 PP1 PP1_5 PP2 PP2_5 PP3 PP4 PP5
 (WARNING  13) WITH USER-WRITTEN PRED OR $PRED, NM-TRAN CANNOT APPEND THE
 MDV DATA ITEM.
 (WARNING  27) THE ABBREVIATED CODE CONTAINS A SIMULATION BLOCK BUT THERE IS
 NO $SIMULATION RECORD.
 WARNINGS AND ERRORS (IF ANY) FOR PROBLEM    2
 (WARNING  2) NM-TRAN INFERS THAT THE DATA ARE POPULATION.
 (WARNING  13) WITH USER-WRITTEN PRED OR $PRED, NM-TRAN CANNOT APPEND THE
 MDV DATA ITEM.

1NONLINEAR MIXED EFFECTS MODEL PROGRAM (NONMEM) VERSION 7.3.0
 ORIGINALLY DEVELOPED BY STUART BEAL, LEWIS SHEINER, AND ALISON BOECKMANN
 CURRENT DEVELOPERS ARE ROBERT BAUER, ICON DEVELOPMENT SOLUTIONS,
 AND ALISON BOECKMANN. IMPLEMENTATION, EFFICIENCY, AND STANDARDIZATION
 PERFORMED BY NOUS INFOSYSTEMS.
 PROBLEM NO.:         1
 IRT in Parkinson's Disease (GSK data) - Combined model for
 TOT. NO. OF OBS RECS:    21656
 TOT. NO. OF INDIVIDUALS:    389
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 #TBLN:      1
 #METH: Laplacian Conditional Estimation
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
 #TERM:
0MINIMIZATION SUCCESSFUL
 HOWEVER, PROBLEMS OCCURRED WITH THE MINIMIZATION.
 REGARD THE RESULTS OF THE ESTIMATION STEP CAREFULLY, AND ACCEPT THEM ONLY
 AFTER CHECKING THAT THE COVARIANCE STEP PRODUCES REASONABLE OUTPUT.
 NO. OF FUNCTION EVALUATIONS USED:    55237
 NO. OF SIG. DIGITS IN FINAL EST.:  3.6
0PARAMETER ESTIMATE IS NEAR ITS BOUNDARY
 THIS MUST BE ADDRESSED BEFORE THE COVARIANCE STEP CAN BE IMPLEMENTED

 ETABAR IS THE ARITHMETIC MEAN OF THE ETA-ESTIMATES,
 AND SE IS THE ASSOCIATED STANDARD ERROR.

 SUBMODEL    1

 ETABAR:        -9.0584E-03  2.9160E-02 -1.7108E-03  7.7836E-02
 SE:             7.8624E-02  9.3667E-02  7.6996E-02  1.5870E-02
 N:                     208         208         208         208

 ETAshrink(%):   1.2837E+01  8.8808E+00  8.5410E+00  4.3533E+01
 EBVshrink(%):   6.3931E+00  5.9167E+00  6.0316E+00  4.7361E+01
 EPSshrink(%):   1.0000E+02

 SUBMODEL    2

 ETABAR:         6.7926E-02 -4.3891E-02 -5.9078E-03  4.1788E-02
 SE:             9.3312E-02  1.0805E-01  8.5790E-02  1.4783E-02
 N:                     181         181         181         181

 ETAshrink(%):   3.4661E+00  1.9152E+00  4.9040E+00  5.0913E+01
 EBVshrink(%):   6.5568E+00  5.9353E+00  6.1285E+00  4.8909E+01
 EPSshrink(%):   1.0000E+02

 #TERE:
 Elapsed estimation time in seconds: 69939.76

 ********************                         LAPLACIAN CONDITIONAL ESTIMATION                       ********************
 #OBJT:**************                       MINIMUM VALUE OF OBJECTIVE FUNCTION                      ********************
 #OBJV:********************************************    45546.171       **************************************************

 ********************                         LAPLACIAN CONDITIONAL ESTIMATION                       ********************
 ********************                             FINAL PARAMETER ESTIMATE                           ********************

 THETA - VECTOR OF FIXED EFFECTS PARAMETERS   *********
         TH  1     TH  2     TH  3     TH  4     TH  5     TH  6     TH  7     TH  8     TH  9     TH 10     TH 11     TH 12
          TH 13     TH 14     TH 15     TH 16     TH 17     TH 18     TH 19     TH 20     TH 21     TH 22     TH 23     TH 24
         TH 25     TH 26     TH 27     TH 28     TH 29     TH 30     TH 31     TH 32     TH 33     TH 34     TH 35     TH 36
          TH 37     TH 38     TH 39     TH 40     TH 41     TH 42     TH 43     TH 44     TH 45     TH 46     TH 47     TH 48
         TH 49     TH 50     TH 51     TH 52     TH 53     TH 54     TH 55     TH 56     TH 57     TH 58     TH 59     TH 60
          TH 61     TH 62     TH 63     TH 64     TH 65     TH 66     TH 67     TH 68     TH 69     TH 70     TH 71     TH 72
         TH 73     TH 74     TH 75     TH 76     TH 77     TH 78     TH 79     TH 80     TH 81     TH 82     TH 83     TH 84
          TH 85     TH 86     TH 87     TH 88     TH 89     TH 90     TH 91     TH 92     TH 93     TH 94     TH 95     TH 96
         TH 97     TH 98     TH 99     TH100     TH101     TH102     TH103     TH104     TH105     TH106     TH107     TH108
          TH109     TH110     TH111     TH112     TH113     TH114     TH115     TH116     TH117     TH118     TH119     TH120
         TH121     TH122     TH123     TH124     TH125     TH126     TH127     TH128     TH129     TH130     TH131     TH132
          TH133     TH134     TH135     TH136     TH137     TH138     TH139     TH140     TH141     TH142     TH143     TH144
         TH145     TH146     TH147     TH148     TH149     TH150     TH151     TH152     TH153     TH154     TH155     TH156
          TH157     TH158     TH159     TH160     TH161     TH162     TH163     TH164     TH165     TH166     TH167     TH168
         TH169     TH170     TH171     TH172     TH173     TH174     TH175     TH176     TH177     TH178     TH179     TH180
          TH181     TH182     TH183     TH184     TH185     TH186     TH187     TH188     TH189     TH190     TH191     TH192
         TH193     TH194     TH195     TH196     TH197     TH198     TH199     TH200     TH201     TH202     TH203     TH204
          TH205     TH206     TH207     TH208     TH209     TH210     TH211     TH212     TH213     TH214     TH215     TH216
         TH217     TH218     TH219     TH220     TH221     TH222     TH223     TH224     TH225     TH226     TH227     TH228
          TH229     TH230     TH231     TH232     TH233     TH234     TH235     TH236     TH237     TH238     TH239     TH240
         TH241     TH242     TH243     TH244     TH245     TH246     TH247     TH248     TH249     TH250     TH251     TH252
          TH253     TH254     TH255     TH256     TH257     TH258     TH259     TH260     TH261     TH262     TH263     TH264
         TH265     TH266     TH267     TH268     TH269     TH270     TH271     TH272     TH273     TH274     TH275     TH276
          TH277     TH278     TH279     TH280     TH281     TH282     TH283     TH284     TH285     TH286     TH287     TH288
         TH289     TH290     TH291     TH292     TH293     TH294     TH295     TH296     TH297     TH298     TH299     TH300
          TH301     TH302     TH303     TH304     TH305     TH306     TH307     TH308     TH309     TH310     TH311     TH312
         TH313     TH314     TH315     TH316     TH317     TH318     TH319     TH320     TH321     TH322
         8.04E-01  1.41E+00  2.84E+00  2.43E+00  5.00E+01  3.71E-01  1.00E+00  7.18E-01  4.44E+00  3.89E+00  5.00E+01  5.00E+01
          8.06E-01  7.61E-01  1.60E+00  2.45E+00  2.19E+00  5.00E+01  1.06E+00  1.65E+00  1.63E+00  2.22E+00  5.00E+01  1.10E+00
         6.54E-01  1.40E+00  2.07E+00  5.00E+01  9.96E-01  7.05E-01  9.73E-01  1.29E+00  2.27E+00  1.00E+00  7.33E-01  1.03E+00
          1.88E+00  2.90E+00  7.92E-01  5.00E+01  5.33E-01  0.00E+00  8.98E-01 -6.54E-01  2.11E+00  1.93E+00  2.27E+00  6.38E-01
         1.30E+00  6.27E-01  2.17E+00  3.68E+00  2.00E+00  1.70E+00  2.48E-01  1.93E+00  2.56E+00  1.77E+00  1.32E+00  8.84E-01
          3.61E+00  1.34E+00  5.00E+01  1.50E+00  7.82E-01  2.60E+00  2.20E+00  1.89E+00  0.00E+00  4.32E-05  1.22E+00  2.45E+00
         1.50E+00  1.78E+00  5.00E+01  1.54E+00  2.40E+00  1.41E+00  1.52E+00  1.80E+00  1.45E+00  3.82E-01  2.61E+00  8.80E-01
          5.00E+01  9.13E-01  1.00E+00  2.89E-01 -6.22E+00  9.91E+00  7.69E+00  7.87E+00  8.47E-01 -1.13E-01  2.55E+00  1.46E+00
         5.00E+01  1.14E+00  3.99E-02  2.93E+00  3.02E+00  2.85E+00  0.00E+00  1.57E+00 -1.58E+00  2.42E+00  2.16E+00  1.92E+00
          5.61E-01  5.00E+00  3.51E+00  4.82E+00  5.00E+01  7.51E-01 -3.41E-01  2.09E+00  2.40E+00  4.53E+00  7.55E-01 -3.02E-01
         1.95E+00  2.28E+00  3.38E+00  7.98E-01  1.27E+00  2.13E+00  3.09E+00  5.00E+01  8.98E-01  1.08E+00  2.07E+00  2.65E+00
          5.00E+01  8.22E-01  1.48E-01  2.68E+00  2.30E+00  5.00E+01  9.48E-01  4.64E-01  2.20E+00  2.13E+00  1.85E+00  1.02E+00
        -2.31E-02  1.61E+00  3.02E+00  3.28E+00  8.35E-01  1.00E+00  1.23E+00 -1.96E+00  1.82E+00  2.75E+00  8.80E-04  1.00E+00
          9.45E-01  1.21E+00 -2.12E+00  1.91E+00  3.06E+00  3.24E+00  7.99E-01  1.00E+00  9.29E-01 -7.29E-01  1.66E+00  2.71E+00
         5.12E-07  1.00E+00  8.97E-01  8.47E-01 -7.01E-01  1.93E+00  3.14E+00  5.02E+00  7.67E-01  1.00E+00  1.77E+00 -2.11E+00
          1.72E+00  1.65E+00  2.03E+00  2.00E-01  4.01E-01  1.79E+00 -1.82E+00  1.83E+00  1.56E+00  2.07E+00  8.60E-02  3.93E-01
         1.74E+00 -1.74E+00  1.71E+00  1.69E+00  5.00E+01  2.24E-01  4.55E-01  1.87E+00 -1.27E+00  1.72E+00  1.51E+00  5.00E+01
          6.59E-03  5.07E-01  1.75E+00 -1.55E+00  1.60E+00  1.52E+00  1.94E+00  2.49E-01  4.65E-01  1.56E+00 -1.31E+00  1.84E+00
         1.84E+00  2.10E+00  6.11E-02  2.24E-01  1.27E+00 -9.65E-01  1.88E+00  2.08E+00  3.38E+00  3.40E-03  4.56E-03  1.01E+00
         -4.33E-01  2.50E+00  2.41E+00  2.01E+00  0.00E+00  0.00E+00  1.13E+00  1.88E+00  2.01E+00  1.39E+00  1.45E+00  1.27E+00
        -2.68E-01  2.33E+00  2.18E+00  2.38E+00  9.17E-01  9.21E-01 -5.30E-01  4.00E+00  2.54E+00  2.36E+00  0.00E+00  7.96E-01
          3.21E+00  1.63E+00  1.00E+00  3.03E+00  9.23E-01  1.82E+00 -1.47E+00  1.88E+00  1.82E+00  3.58E+00  3.77E-01  1.02E+01
         3.95E+00  2.92E+00  5.00E+01  3.59E-01  1.41E+01  4.99E-09  2.72E+00  5.30E+00  1.00E+00  8.33E-01  3.14E-01  8.59E+00
          4.05E+00  5.24E+00  3.51E+00  2.99E-01  9.43E+00  5.00E+01  5.00E+01  5.00E+01  3.50E-05 -4.69E+04  0.00E+00  3.75E-01
         1.68E+00  0.00E+00  4.31E-01  4.54E+00  0.00E+00  7.44E-01  3.58E+00  1.96E+00  9.56E-01  7.98E-01  1.70E-01  1.68E+01
          0.00E+00  2.54E-01  2.70E+00  0.00E+00  9.45E-01  1.34E+00  5.00E+01  5.00E+01  5.00E+01  1.85E+00 -3.86E+00  3.42E+00
         3.54E+00  1.54E+00  5.00E+01  3.00E-01  5.05E-01  1.12E+00  2.10E+00  6.81E-01  1.09E+00  5.39E-01

 OMEGA - COV MATRIX FOR RANDOM EFFECTS - ETAS  ********
            ETA1      ETA2      ETA3      ETA4
 ETA1
+        1.70E+00
 ETA2
+        0.00E+00  2.21E+00
 ETA3
+        0.00E+00  0.00E+00  1.48E+00
 ETA4
+        0.00E+00  0.00E+00  0.00E+00  1.65E-01

 OMEGA - CORR MATRIX FOR RANDOM EFFECTS - ETAS  *******
            ETA1      ETA2      ETA3      ETA4
 ETA1
+        1.30E+00
 ETA2
+        0.00E+00  1.49E+00
 ETA3
+        0.00E+00  0.00E+00  1.22E+00
 ETA4
+        0.00E+00  0.00E+00  0.00E+00  4.06E-01

 PROBLEM NO.:         2
 IRT in Parkinson's Disease (GSK data) - Combined model for
 TOT. NO. OF OBS RECS:    21656
 TOT. NO. OF INDIVIDUALS:    389
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 #CPUT: Total CPU Time in Seconds,  1031363.978
