Thu Mar  5 17:45:14 CET 2015
;; Based on: warfarin_addprop_OD.mod
$PROBLEM    SAEM,No misspec,15%CV
$INPUT      ID TIME NR DV MDV AMT
$DATA      ../../m1/mc-sim-1.dat IGNORE=@
$SUBROUTINE ADVAN4 TRANS1
$PK

 MU_1 = LOG(THETA(1))
 MU_2 = LOG(THETA(2))
 MU_3 = LOG(THETA(3))
 MU_4 = LOG(THETA(4))
 MU_5 = LOG(THETA(5))

 K    = EXP(MU_1+ETA(1))
 KA   = EXP(MU_2+ETA(2))
 K23  = EXP(MU_3+ETA(3))
 K32  = EXP(MU_4+ETA(4))
 V2   = EXP(MU_5+ETA(5))
 S2   =  V2

$ERROR

 IPRED = F
 Y     = IPRED * (1+ EPS(1)) + EPS(2)

$THETA  (0,0.02) ; Ke
$THETA  (0,1) ; Ka
$THETA  (0,0.06) ; K12
$THETA  (0,0.06) ; K21
$THETA  (0,8) ; V
$OMEGA  0.1
$OMEGA  0.0225  FIX
$OMEGA  0.0225  FIX
$OMEGA  0.0225  FIX
$OMEGA  0.0225  FIX
;PK
$SIGMA  0.01  ; 3Prop error
$SIGMA  0  FIX  ; 4Add error
$ESTIMATION METHOD=SAEM AUTO=1
$ESTIMATION METH=1 MAX=0 INTER ; FOCEI

NM-TRAN MESSAGES
 WARNINGS AND ERRORS (IF ANY) FOR PROBLEM    1
 (WARNING  2) NM-TRAN INFERS THAT THE DATA ARE POPULATION.
 (WARNING  121) INTERACTION IS IMPLIED WITH EM/BAYES ESTIMATION METHODS

1NONLINEAR MIXED EFFECTS MODEL PROGRAM (NONMEM) VERSION 7.3.0
 ORIGINALLY DEVELOPED BY STUART BEAL, LEWIS SHEINER, AND ALISON BOECKMANN
 CURRENT DEVELOPERS ARE ROBERT BAUER, ICON DEVELOPMENT SOLUTIONS,
 AND ALISON BOECKMANN. IMPLEMENTATION, EFFICIENCY, AND STANDARDIZATION
 PERFORMED BY NOUS INFOSYSTEMS.
 PROBLEM NO.:         1
 SAEM,No misspec,15%CV
 TOT. NO. OF OBS RECS:      256
 TOT. NO. OF INDIVIDUALS:     32
 TWO COMPARTMENT MODEL WITH FIRST-ORDER ABSORPTION (ADVAN4)
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 #TBLN:      1
 #METH: Stochastic Approximation Expectation-Maximization (No Prior)
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
 #TERM:
 STOCHASTIC PORTION WAS COMPLETED
 REDUCED STOCHASTIC PORTION WAS COMPLETED

 ETABAR IS THE ARITHMETIC MEAN OF THE ETA-ESTIMATES,
 AND THE P-VALUE IS GIVEN FOR THE NULL HYPOTHESIS THAT THE TRUE MEAN IS 0.

 ETABAR:        -3.3987E-06  9.4745E-07  5.5112E-07 -1.1998E-05  6.6374E-06
 SE:             5.0594E-02  1.1857E-02  6.6691E-03  8.5258E-03  5.7602E-03
 N:                      32          32          32          32          32

 P VAL.:         9.9995E-01  9.9994E-01  9.9993E-01  9.9888E-01  9.9908E-01

 ETAshrink(%):   5.4919E+00  5.4570E+01  7.4447E+01  6.7333E+01  7.7929E+01
 EBVshrink(%):   5.4925E+00  2.3845E+01  5.6912E+01  5.5272E+01  8.5621E+00
 EPSshrink(%):   1.8406E+01  1.0000E+02

 #TERE:
 Elapsed estimation time in seconds:    66.65

 ********************           STOCHASTIC APPROXIMATION EXPECTATION-MAXIMIZATION (NO PRIOR)         ********************
 #OBJT:**************                        FINAL VALUE OF LIKELIHOOD FUNCTION                      ********************
 #OBJV:********************************************    -1427.016       **************************************************

 ********************           STOCHASTIC APPROXIMATION EXPECTATION-MAXIMIZATION (NO PRIOR)         ********************
 ********************                             FINAL PARAMETER ESTIMATE                           ********************

 THETA - VECTOR OF FIXED EFFECTS PARAMETERS   *********
         TH 1      TH 2      TH 3      TH 4      TH 5
         1.98E-02  1.03E+00  5.99E-02  6.28E-02  8.09E+00

 OMEGA - COV MATRIX FOR RANDOM EFFECTS - ETAS  ********
            ETA1      ETA2      ETA3      ETA4      ETA5
 ETA1
+        9.47E-02
 ETA2
+        0.00E+00  2.25E-02
 ETA3
+        0.00E+00  0.00E+00  2.25E-02
 ETA4
+        0.00E+00  0.00E+00  0.00E+00  2.25E-02
 ETA5
+        0.00E+00  0.00E+00  0.00E+00  0.00E+00  2.25E-02

 SIGMA - COV MATRIX FOR RANDOM EFFECTS - EPSILONS  ****
            EPS1      EPS2
 EPS1
+        1.11E-02
 EPS2
+        0.00E+00  0.00E+00

 OMEGA - CORR MATRIX FOR RANDOM EFFECTS - ETAS  *******
            ETA1      ETA2      ETA3      ETA4      ETA5
 ETA1
+        3.08E-01
 ETA2
+        0.00E+00  1.50E-01
 ETA3
+        0.00E+00  0.00E+00  1.50E-01
 ETA4
+        0.00E+00  0.00E+00  0.00E+00  1.50E-01
 ETA5
+        0.00E+00  0.00E+00  0.00E+00  0.00E+00  1.50E-01

 SIGMA - CORR MATRIX FOR RANDOM EFFECTS - EPSILONS  ***
            EPS1      EPS2
 EPS1
+        1.05E-01
 EPS2
+        0.00E+00  0.00E+00
 #TBLN:      2
 #METH: First Order Conditional Estimation with Interaction (Evaluation)
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
 ********************         FIRST ORDER CONDITIONAL ESTIMATION WITH INTERACTION (EVALUATION)       ********************
 #OBJT:**************                       MINIMUM VALUE OF OBJECTIVE FUNCTION                      ********************
 #OBJV:********************************************     -757.430       **************************************************

 ********************         FIRST ORDER CONDITIONAL ESTIMATION WITH INTERACTION (EVALUATION)       ********************
 ********************                             FINAL PARAMETER ESTIMATE                           ********************

 THETA - VECTOR OF FIXED EFFECTS PARAMETERS   *********
         TH 1      TH 2      TH 3      TH 4      TH 5
         1.98E-02  1.03E+00  5.99E-02  6.28E-02  8.09E+00

 OMEGA - COV MATRIX FOR RANDOM EFFECTS - ETAS  ********
            ETA1      ETA2      ETA3      ETA4      ETA5
 ETA1
+        9.47E-02
 ETA2
+        0.00E+00  2.25E-02
 ETA3
+        0.00E+00  0.00E+00  2.25E-02
 ETA4
+        0.00E+00  0.00E+00  0.00E+00  2.25E-02
 ETA5
+        0.00E+00  0.00E+00  0.00E+00  0.00E+00  2.25E-02

 SIGMA - COV MATRIX FOR RANDOM EFFECTS - EPSILONS  ****
            EPS1      EPS2
 EPS1
+        1.11E-02
 EPS2
+        0.00E+00  0.00E+00

 OMEGA - CORR MATRIX FOR RANDOM EFFECTS - ETAS  *******
            ETA1      ETA2      ETA3      ETA4      ETA5
 ETA1
+        3.08E-01
 ETA2
+        0.00E+00  1.50E-01
 ETA3
+        0.00E+00  0.00E+00  1.50E-01
 ETA4
+        0.00E+00  0.00E+00  0.00E+00  1.50E-01
 ETA5
+        0.00E+00  0.00E+00  0.00E+00  0.00E+00  1.50E-01

 SIGMA - CORR MATRIX FOR RANDOM EFFECTS - EPSILONS  ***
            EPS1      EPS2
 EPS1
+        1.05E-01
 EPS2
+        0.00E+00  0.00E+00
 #CPUT: Total CPU Time in Seconds,       66.674
