Mon Jan 12 11:36:34 CET 2015
$PROBLEM    PHENOBARB SIMPLE MODEL
$INPUT      ID TIME AMT WGT APGR DV
$DATA      pheno.dta IGNORE=@
$SUBROUTINE ADVAN1 TRANS2
$PK

      TVCL=THETA(1)
      TVV=THETA(2)
      CL=TVCL*EXP(ETA(1))* ( 1 + THETA(3)*(WGT - 1.30))
      V=TVV*EXP(ETA(2))
      S1=V
$ERROR

      W=F
      Y=F+W*EPS(1)

      IPRED=F         ;  individual-specific prediction
      IRES=DV-IPRED   ;  individual-specific residual
      IWRES=IRES/W    ;  individual-specific weighted residual

$THETA  (0,0.0105)
$THETA  (0,1.0500)
$THETA  (-0.434,1.12,1.428) ; CLWGT
$OMEGA  .4  ;       IVCL
 .25  ;        IVV
$SIGMA  .04
$ESTIMATION MAXEVALS=9997 SIGDIGITS=4 POSTHOC MSFO=phenomsf
$COVARIANCE PRINT=E
$TABLE      ID TVCL TVV APGR NOPRINT ONEHEADER FILE=patab1

NM-TRAN MESSAGES
 WARNINGS AND ERRORS (IF ANY) FOR PROBLEM    1
 (WARNING  2) NM-TRAN INFERS THAT THE DATA ARE POPULATION.

1NONLINEAR MIXED EFFECTS MODEL PROGRAM (NONMEM) VERSION 7.3.0
 ORIGINALLY DEVELOPED BY STUART BEAL, LEWIS SHEINER, AND ALISON BOECKMANN
 CURRENT DEVELOPERS ARE ROBERT BAUER, ICON DEVELOPMENT SOLUTIONS,
 AND ALISON BOECKMANN. IMPLEMENTATION, EFFICIENCY, AND STANDARDIZATION
 PERFORMED BY NOUS INFOSYSTEMS.
 PROBLEM NO.:         1
 PHENOBARB SIMPLE MODEL
 TOT. NO. OF OBS RECS:      155
 TOT. NO. OF INDIVIDUALS:     59
 ONE COMPARTMENT MODEL (ADVAN1)
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 #TBLN:      1
 #METH: First Order
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
 #TERM:
0MINIMIZATION SUCCESSFUL
 NO. OF FUNCTION EVALUATIONS USED:      118
 NO. OF SIG. DIGITS IN FINAL EST.:  4.2

 #TERE:
 Elapsed estimation time in seconds:     0.07
 Elapsed covariance time in seconds:     0.04

 ********************                                   FIRST ORDER                                  ********************
 #OBJT:**************                       MINIMUM VALUE OF OBJECTIVE FUNCTION                      ********************
 #OBJV:********************************************      697.928       **************************************************

 ********************                                   FIRST ORDER                                  ********************
 ********************                             FINAL PARAMETER ESTIMATE                           ********************

 THETA - VECTOR OF FIXED EFFECTS PARAMETERS   *********
         TH 1      TH 2      TH 3
         6.57E-03  1.29E+00  1.12E+00

 OMEGA - COV MATRIX FOR RANDOM EFFECTS - ETAS  ********
            ETA1      ETA2
 ETA1
+        5.12E-02
 ETA2
+        0.00E+00  1.05E-01

 SIGMA - COV MATRIX FOR RANDOM EFFECTS - EPSILONS  ****
            EPS1
 EPS1
+        1.96E-02

 OMEGA - CORR MATRIX FOR RANDOM EFFECTS - ETAS  *******
            ETA1      ETA2
 ETA1
+        2.26E-01
 ETA2
+        0.00E+00  3.23E-01

 SIGMA - CORR MATRIX FOR RANDOM EFFECTS - EPSILONS  ***
            EPS1
 EPS1
+        1.40E-01

 ********************                                   FIRST ORDER                                  ********************
 ********************                            STANDARD ERROR OF ESTIMATE                          ********************

 THETA - VECTOR OF FIXED EFFECTS PARAMETERS   *********
         TH 1      TH 2      TH 3
         3.70E-04  6.60E-02  1.99E-01

 OMEGA - COV MATRIX FOR RANDOM EFFECTS - ETAS  ********
            ETA1      ETA2
 ETA1
+        2.03E-02
 ETA2
+       .........  2.45E-02

 SIGMA - COV MATRIX FOR RANDOM EFFECTS - EPSILONS  ****
            EPS1
 EPS1
+        4.41E-03

 OMEGA - CORR MATRIX FOR RANDOM EFFECTS - ETAS  *******
            ETA1      ETA2
 ETA1
+        4.48E-02
 ETA2
+       .........  3.78E-02

 SIGMA - CORR MATRIX FOR RANDOM EFFECTS - EPSILONS  ***
            EPS1
 EPS1
+        1.57E-02

 ********************                                   FIRST ORDER                                  ********************
 ********************                          COVARIANCE MATRIX OF ESTIMATE                         ********************

            TH 1      TH 2      TH 3      OM11      OM12      OM22      SG11
 TH 1
+        1.37E-07
 TH 2
+       -6.15E-06  4.36E-03
 TH 3
+       -3.31E-05  1.86E-03  3.98E-02
 OM11
+        5.58E-07  1.84E-04  3.63E-04  4.10E-04
 OM12
+       ......... ......... ......... ......... .........
 OM22
+        3.21E-06  5.87E-04 -8.63E-04  1.16E-04 .........  5.98E-04
 SG11
+        6.67E-07 -3.00E-05  2.56E-04  2.98E-06 .........  5.90E-06  1.95E-05

 ********************                                   FIRST ORDER                                  ********************
 ********************                          CORRELATION MATRIX OF ESTIMATE                        ********************

            TH 1      TH 2      TH 3      OM11      OM12      OM22      SG11
 TH 1
+        3.70E-04
 TH 2
+       -2.52E-01  6.60E-02
 TH 3
+       -4.49E-01  1.41E-01  1.99E-01
 OM11
+        7.45E-02  1.38E-01  8.99E-02  2.03E-02
 OM12
+       ......... ......... ......... ......... .........
 OM22
+        3.54E-01  3.63E-01 -1.77E-01  2.35E-01 .........  2.45E-02
 SG11
+        4.09E-01 -1.03E-01  2.91E-01  3.33E-02 .........  5.47E-02  4.41E-03
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
 ********************                                   FIRST ORDER                                  ********************
 ********************                      EIGENVALUES OF COR MATRIX OF ESTIMATE                     ********************

             1         2         3         4         5         6
         2.01E-01  4.23E-01  8.54E-01  1.31E+00  1.48E+00  1.73E+00
 #CPUT: Total CPU Time in Seconds,        0.150
