Wed Jan 17 09:23:19 CET 2018
$PROBLEM    MOXONIDINE PK ANALYSIS
$INPUT      ID VISI DROP DGRP DOSE DROP DROP DROP DROP NEUY SCR AGE
            SEX DROP WT DROP ACE DIG DIU DROP TAD TIME DROP CRCL AMT
            SS II DROP DROP DROP DV DROP DROP MDV FREMTYPE
$DATA      ../../frem_dataset.dta IGNORE=@
$ABBREVIATED DERIV2=NO COMRES=6
$SUBROUTINE ADVAN2 TRANS1
$PK

;----------IOV--------------------

   KPLAG = 0

   TVCL  = THETA(1)
   TVV   = THETA(2)
   TVKA  = THETA(3)

   CL    = TVCL*EXP(ETA(1))
   V     = TVV*EXP(ETA(2))
   KA    = TVKA*EXP(ETA(3))
   LAG   = THETA(4)
   PHI   = LOG(LAG/(1-LAG))
   ALAG1 = EXP(PHI+KPLAG)/(1+EXP(PHI+KPLAG))
   K     = CL/V
   S2    = V

     SDC4 = 15.8063999898
     SDC5 = 0.471317247899
     SDC6 = 0.480651168826
$ERROR

     IPRED = LOG(.025)
     W     = THETA(5)
     IF(F.GT.0) IPRED = LOG(F)
     IRES  = IPRED-DV
     IWRES = IRES/W
     Y     = IPRED+ERR(1)*W

;;;FREM CODE BEGIN COMPACT
;;;DO NOT MODIFY
     IF (FREMTYPE.EQ.100) THEN
;       WT  15.8063999898
        Y = THETA(6) + ETA(4)*SDC4 + EPS(2)
        IPRED = THETA(6) + ETA(4)*SDC4
     END IF
     IF (FREMTYPE.EQ.200) THEN
;       DGRP_9  0.471317247899
        Y = THETA(7) + ETA(5)*SDC5 + EPS(2)
        IPRED = THETA(7) + ETA(5)*SDC5
     END IF
     IF (FREMTYPE.EQ.300) THEN
;       DGRP_8  0.480651168826
        Y = THETA(8) + ETA(6)*SDC6 + EPS(2)
        IPRED = THETA(8) + ETA(6)*SDC6
     END IF
;;;FREM CODE END COMPACT
$THETA  (0,32.9048)
 (0,21.046)
 (0,0.283233)
$THETA  (0,0.0957544) ; LAG
$THETA  (0,0.334881) ; W
$THETA  78.5135135135 FIX ; TV_WT
 0.324324324324 FIX ; TV_DGRP_9
 0.351351351351 FIX ; TV_DGRP_8
$OMEGA  BLOCK(6)
 0.412434
 0.665041943232 1.11375
 0.00302527381415 0.00497142986222 0.221909  ;         KA
 -0.0364983152311 -0.100561337896 -0.0443296219553 1  ;     BSV_WT
 0.0405309724187 0.0436506068639 0.0853822821749 -0.0723088584629 1  ; BSV_DGRP_9
 0.0296776674981 0.0371914741331 -0.0171684822216 0.138203435412 -0.509902099272 1  ; BSV_DGRP_8
$SIGMA  1  FIX
$SIGMA  1E-07  FIX  ;     EPSCOV
$ESTIMATION MAXEVALS=9990 PRINT=10 METHOD=CONDITIONAL NONINFETA=1
            MCETA=50
$COVARIANCE PRINT=E UNCONDITIONAL

NM-TRAN MESSAGES
 WARNINGS AND ERRORS (IF ANY) FOR PROBLEM    1
 (WARNING  2) NM-TRAN INFERS THAT THE DATA ARE POPULATION.
Note: The following floating-point exceptions are signalling: IEEE_INVALID_FLAG IEEE_DIVIDE_BY_ZERO

1NONLINEAR MIXED EFFECTS MODEL PROGRAM (NONMEM) VERSION 7.3.0
 ORIGINALLY DEVELOPED BY STUART BEAL, LEWIS SHEINER, AND ALISON BOECKMANN
 CURRENT DEVELOPERS ARE ROBERT BAUER, ICON DEVELOPMENT SOLUTIONS,
 AND ALISON BOECKMANN. IMPLEMENTATION, EFFICIENCY, AND STANDARDIZATION
 PERFORMED BY NOUS INFOSYSTEMS.
 PROBLEM NO.:         1
 MOXONIDINE PK ANALYSIS
 TOT. NO. OF OBS RECS:     1244
 TOT. NO. OF INDIVIDUALS:     74
 ONE COMPARTMENT MODEL WITH FIRST-ORDER ABSORPTION (ADVAN2)
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 #TBLN:      1
 #METH: First Order Conditional Estimation
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
 #TERM:
0MINIMIZATION SUCCESSFUL
 NO. OF FUNCTION EVALUATIONS USED:      495
 NO. OF SIG. DIGITS IN FINAL EST.:  3.4

 ETABAR IS THE ARITHMETIC MEAN OF THE ETA-ESTIMATES,
 AND THE P-VALUE IS GIVEN FOR THE NULL HYPOTHESIS THAT THE TRUE MEAN IS 0.

 ETABAR:         7.1160E-04  2.2948E-02  1.3861E-02 -4.0538E-12  5.3627E-10 -6.5275E-10
 SE:             7.3854E-02  1.1985E-01  5.0806E-02  1.1546E-01  1.1546E-01  1.1546E-01
 N:                      74          74          74          74          74          74

 P VAL.:         9.9231E-01  8.4815E-01  7.8499E-01  1.0000E+00  1.0000E+00  1.0000E+00

 ETAshrink(%):   4.9213E-01  5.1898E+00  5.7831E+00  1.0000E-10  1.0000E-10  1.0000E-10
 EBVshrink(%):   1.1694E+00  4.8177E+00  5.1247E+00  2.0287E-08  2.2817E-05  2.1939E-05
 EPSshrink(%):   8.6388E+00  9.9935E+01

 #TERE:
 Elapsed estimation time in seconds:    27.39
 Elapsed covariance time in seconds:    12.86

 ********************                        FIRST ORDER CONDITIONAL ESTIMATION                      ********************
 #OBJT:**************                       MINIMUM VALUE OF OBJECTIVE FUNCTION                      ********************
 #OBJV:********************************************     -267.832       **************************************************

 ********************                        FIRST ORDER CONDITIONAL ESTIMATION                      ********************
 ********************                             FINAL PARAMETER ESTIMATE                           ********************

 THETA - VECTOR OF FIXED EFFECTS PARAMETERS   *********
         TH 1      TH 2      TH 3      TH 4      TH 5      TH 6      TH 7      TH 8
         3.29E+01  2.09E+01  2.84E-01  9.82E-02  3.35E-01  7.85E+01  3.24E-01  3.51E-01

 OMEGA - COV MATRIX FOR RANDOM EFFECTS - ETAS  ********
            ETA1      ETA2      ETA3      ETA4      ETA5      ETA6
 ETA1
+        4.13E-01
 ETA2
+        6.42E-01  1.20E+00
 ETA3
+        5.90E-02  7.75E-02  2.18E-01
 ETA4
+       -3.41E-02 -1.26E-01 -5.21E-02  9.86E-01
 ETA5
+        3.99E-02  3.43E-02  8.33E-02 -7.13E-02  9.86E-01
 ETA6
+        3.00E-02  2.97E-02 -1.97E-02  1.36E-01 -5.03E-01  9.86E-01

 SIGMA - COV MATRIX FOR RANDOM EFFECTS - EPSILONS  ****
            EPS1      EPS2
 EPS1
+        1.00E+00
 EPS2
+        0.00E+00  1.00E-07

 OMEGA - CORR MATRIX FOR RANDOM EFFECTS - ETAS  *******
            ETA1      ETA2      ETA3      ETA4      ETA5      ETA6
 ETA1
+        6.43E-01
 ETA2
+        9.12E-01  1.09E+00
 ETA3
+        1.97E-01  1.52E-01  4.67E-01
 ETA4
+       -5.35E-02 -1.16E-01 -1.12E-01  9.93E-01
 ETA5
+        6.25E-02  3.15E-02  1.80E-01 -7.23E-02  9.93E-01
 ETA6
+        4.69E-02  2.73E-02 -4.24E-02  1.38E-01 -5.10E-01  9.93E-01

 SIGMA - CORR MATRIX FOR RANDOM EFFECTS - EPSILONS  ***
            EPS1      EPS2
 EPS1
+        1.00E+00
 EPS2
+        0.00E+00  3.16E-04

 ********************                        FIRST ORDER CONDITIONAL ESTIMATION                      ********************
 ********************                            STANDARD ERROR OF ESTIMATE                          ********************

 THETA - VECTOR OF FIXED EFFECTS PARAMETERS   *********
         TH 1      TH 2      TH 3      TH 4      TH 5      TH 6      TH 7      TH 8
         2.36E+00  3.01E+00  1.70E-02  2.54E-02  8.77E-03 ......... ......... .........

 OMEGA - COV MATRIX FOR RANDOM EFFECTS - ETAS  ********
            ETA1      ETA2      ETA3      ETA4      ETA5      ETA6
 ETA1
+        6.95E-02
 ETA2
+        1.21E-01  2.86E-01
 ETA3
+        3.87E-02  7.02E-02  4.42E-02
 ETA4
+        7.76E-02  1.50E-01  4.64E-02  1.65E-01
 ETA5
+        7.67E-02  1.41E-01  5.66E-02  1.07E-01  8.61E-02
 ETA6
+        6.86E-02  1.35E-01  6.00E-02  1.20E-01  8.12E-02  7.14E-02

 SIGMA - COV MATRIX FOR RANDOM EFFECTS - EPSILONS  ****
            EPS1      EPS2
 EPS1
+       .........
 EPS2
+       ......... .........

 OMEGA - CORR MATRIX FOR RANDOM EFFECTS - ETAS  *******
            ETA1      ETA2      ETA3      ETA4      ETA5      ETA6
 ETA1
+        5.41E-02
 ETA2
+        3.88E-02  1.31E-01
 ETA3
+        1.30E-01  1.29E-01  4.74E-02
 ETA4
+        1.21E-01  1.35E-01  9.54E-02  8.31E-02
 ETA5
+        1.18E-01  1.30E-01  1.16E-01  1.07E-01  4.33E-02
 ETA6
+        1.07E-01  1.24E-01  1.28E-01  1.18E-01  6.21E-02  3.60E-02

 SIGMA - CORR MATRIX FOR RANDOM EFFECTS - EPSILONS  ***
            EPS1      EPS2
 EPS1
+       .........
 EPS2
+       ......... .........
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
 ********************                        FIRST ORDER CONDITIONAL ESTIMATION                      ********************
 ********************                      EIGENVALUES OF COR MATRIX OF ESTIMATE                     ********************

             1         2         3         4         5         6         7         8         9        10        11        12
             13        14        15        16        17        18        19        20        21        22        23        24
            25        26
         3.45E-13  1.11E-02  4.33E-02  9.31E-02  1.19E-01  1.26E-01  2.01E-01  2.89E-01  3.22E-01  4.03E-01  4.24E-01  5.06E-01
          5.98E-01  6.15E-01  9.16E-01  9.39E-01  1.07E+00  1.24E+00  1.30E+00  1.54E+00  1.61E+00  1.94E+00  2.28E+00  2.71E+00
         3.15E+00  3.54E+00
 #CPUT: Total CPU Time in Seconds,       40.272
