$PROBLEM    MOXONIDINE PK ANALYSIS
$INPUT      ID VISI DROP DGRP DOSE DROP DROP DROP DROP NEUY SCR AGE
            SEX DROP WT DROP ACE DIG DIU DROP TAD TIME DROP CRCL AMT
            SS II DROP DROP DROP DV DROP DROP MDV FREMTYPE
$DATA      ../frem_dataset.dta IGNORE=@
$ABBREVIATED DERIV2=NO COMRES=6
$SUBROUTINE ADVAN2 TRANS1
$PK


;----------IOV--------------------

   KPLAG = 0

   TVCL  = THETA(1)
   TVV   = THETA(2)
   TVKA  = THETA(3)

   CL    = TVCL*EXP(ETA(1))
   V     = TVV*EXP(ETA(2))
   KA    = TVKA*EXP(ETA(3))
   LAG   = THETA(4)
   PHI   = LOG(LAG/(1-LAG))
   ALAG1 = EXP(PHI+KPLAG)/(1+EXP(PHI+KPLAG))
   K     = CL/V
   S2    = V

     SDC4 = 15.8063999898
     SDC5 = 0.471317247899
     SDC6 = 0.480651168826
$ERROR


     IPRED = LOG(.025)
     W     = THETA(5)
     IF(F.GT.0) IPRED = LOG(F)
     IRES  = IPRED-DV
     IWRES = IRES/W
     Y     = IPRED+ERR(1)*W

;;;FREM CODE BEGIN COMPACT
;;;DO NOT MODIFY
     IF (FREMTYPE.EQ.100) THEN
;       WT  15.8063999898
        Y = THETA(6) + ETA(4)*SDC4 + EPS(2)
        IPRED = THETA(6) + ETA(4)*SDC4
     END IF
     IF (FREMTYPE.EQ.200) THEN
;       DGRP_9  0.471317247899
        Y = THETA(7) + ETA(5)*SDC5 + EPS(2)
        IPRED = THETA(7) + ETA(5)*SDC5
     END IF
     IF (FREMTYPE.EQ.300) THEN
;       DGRP_8  0.480651168826
        Y = THETA(8) + ETA(6)*SDC6 + EPS(2)
        IPRED = THETA(8) + ETA(6)*SDC6
     END IF
;;;FREM CODE END COMPACT
$THETA  (0,32.9048)
 (0,21.046)
 (0,0.283233)
$THETA  (0,0.0957544) ; LAG
$THETA  (0,0.334881) ; W
$THETA  78.5135135135 FIX ; TV_WT
 0.324324324324 FIX ; TV_DGRP_9
 0.351351351351 FIX ; TV_DGRP_8
$OMEGA  BLOCK(6)
 0.412434
 0.665041943232 1.11375
 0.00302527381415 0.00497142986222 0.221909  ;         KA
 -0.0364983152311 -0.100561337896 -0.0443296219553 1  ;     BSV_WT
 0.0405309724187 0.0436506068639 0.0853822821749 -0.0723088584629 1  ; BSV_DGRP_9
 0.0296776674981 0.0371914741331 -0.0171684822216 0.138203435412 -0.509902099272 1  ; BSV_DGRP_8
$SIGMA  1  FIX
$SIGMA  1E-07  FIX  ;     EPSCOV
$ESTIMATION MAXEVALS=9990 PRINT=10 METHOD=CONDITIONAL NONINFETA=1
            MCETA=50
$COVARIANCE PRINT=E UNCONDITIONAL
