Thu Aug 25 14:20:56 CEST 2016
$PROBLEM    PHENOBARB SIMPLE MODEL
$INPUT      ID TIME AMT WGT APGR DV
$DATA      ../../m1/pheno.dta IGNORE=@
$SUBROUTINE ADVAN1 TRANS2
$PK

      TVCL=THETA(1)
      TVV=THETA(2)
      CL=TVCL*EXP(ETA(1))
      V=TVV*EXP(ETA(2))
      S1=V
$ERROR

      W=F
      Y=F+W*EPS(1)

      IPRED=F         ;  individual-specific prediction
      IRES=DV-IPRED   ;  individual-specific residual
      IWRES=IRES/W    ;  individual-specific weighted residual

$THETA  (0,0.00534888) ; CL
$THETA  (0,1.42034) ; V
$OMEGA  0.130796  ;       IVCL
 0.177433  ;        IVV
$SIGMA  0.0188207
$ESTIMATION METHOD=COND MAXEVALS=9997
$COVARIANCE PRINT=E
$TABLE      ID CL V ETA1 ETA2 NOPRINT ONEHEADER FILE=patab1
$TABLE      ID TIME IPRED IWRES CWRES NOPRINT ONEHEADER FILE=sdtab1
$TABLE      ID WGT APGR NOPRINT ONEHEADER FILE=cotab1
$TABLE      ID TIME AMT WGT APGR DV IPRED PRED NOPRINT NOAPPEND
            ONEHEADER FILE=orig_pred.dta
$TABLE      ID DV MDV TIME CWRES IPRED PRED IWRES NOPRINT NOAPPEND
            ONEHEADER FILE=original_res_table.dta

NM-TRAN MESSAGES
 WARNINGS AND ERRORS (IF ANY) FOR PROBLEM    1
 (WARNING  2) NM-TRAN INFERS THAT THE DATA ARE POPULATION.

1NONLINEAR MIXED EFFECTS MODEL PROGRAM (NONMEM) VERSION 7.3.0
 ORIGINALLY DEVELOPED BY STUART BEAL, LEWIS SHEINER, AND ALISON BOECKMANN
 CURRENT DEVELOPERS ARE ROBERT BAUER, ICON DEVELOPMENT SOLUTIONS,
 AND ALISON BOECKMANN. IMPLEMENTATION, EFFICIENCY, AND STANDARDIZATION
 PERFORMED BY NOUS INFOSYSTEMS.
 PROBLEM NO.:         1
 PHENOBARB SIMPLE MODEL
 TOT. NO. OF OBS RECS:      155
 TOT. NO. OF INDIVIDUALS:     59
 ONE COMPARTMENT MODEL (ADVAN1)
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 #TBLN:      1
 #METH: First Order Conditional Estimation
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
 #TERM:
0MINIMIZATION SUCCESSFUL
 HOWEVER, PROBLEMS OCCURRED WITH THE MINIMIZATION.
 REGARD THE RESULTS OF THE ESTIMATION STEP CAREFULLY, AND ACCEPT THEM ONLY
 AFTER CHECKING THAT THE COVARIANCE STEP PRODUCES REASONABLE OUTPUT.
 NO. OF FUNCTION EVALUATIONS USED:       34
 NO. OF SIG. DIGITS IN FINAL EST.:  3.5

 ETABAR IS THE ARITHMETIC MEAN OF THE ETA-ESTIMATES,
 AND THE P-VALUE IS GIVEN FOR THE NULL HYPOTHESIS THAT THE TRUE MEAN IS 0.

 ETABAR:         5.5412E-03 -1.3064E-02
 SE:             2.8607E-02  5.1845E-02
 N:                      59          59

 P VAL.:         8.4641E-01  8.0106E-01

 ETAshrink(%):   3.8721E+01  4.6490E+00
 EBVshrink(%):   3.8428E+01  4.4592E+00
 EPSshrink(%):   2.7971E+01

 #TERE:
 Elapsed estimation time in seconds:     0.50
 Elapsed covariance time in seconds:     0.71

 ********************                        FIRST ORDER CONDITIONAL ESTIMATION                      ********************
 #OBJT:**************                       MINIMUM VALUE OF OBJECTIVE FUNCTION                      ********************
 #OBJV:********************************************      740.278       **************************************************

 ********************                        FIRST ORDER CONDITIONAL ESTIMATION                      ********************
 ********************                             FINAL PARAMETER ESTIMATE                           ********************

 THETA - VECTOR OF FIXED EFFECTS PARAMETERS   *********
         TH 1      TH 2
         5.35E-03  1.42E+00

 OMEGA - COV MATRIX FOR RANDOM EFFECTS - ETAS  ********
            ETA1      ETA2
 ETA1
+        1.31E-01
 ETA2
+        0.00E+00  1.77E-01

 SIGMA - COV MATRIX FOR RANDOM EFFECTS - EPSILONS  ****
            EPS1
 EPS1
+        1.88E-02

 OMEGA - CORR MATRIX FOR RANDOM EFFECTS - ETAS  *******
            ETA1      ETA2
 ETA1
+        3.62E-01
 ETA2
+        0.00E+00  4.21E-01

 SIGMA - CORR MATRIX FOR RANDOM EFFECTS - EPSILONS  ***
            EPS1
 EPS1
+        1.37E-01

 ********************                        FIRST ORDER CONDITIONAL ESTIMATION                      ********************
 ********************                            STANDARD ERROR OF ESTIMATE                          ********************

 THETA - VECTOR OF FIXED EFFECTS PARAMETERS   *********
         TH 1      TH 2
         3.78E-04  8.65E-02

 OMEGA - COV MATRIX FOR RANDOM EFFECTS - ETAS  ********
            ETA1      ETA2
 ETA1
+        8.76E-02
 ETA2
+       .........  4.71E-02

 SIGMA - COV MATRIX FOR RANDOM EFFECTS - EPSILONS  ****
            EPS1
 EPS1
+        3.83E-03

 OMEGA - CORR MATRIX FOR RANDOM EFFECTS - ETAS  *******
            ETA1      ETA2
 ETA1
+        1.21E-01
 ETA2
+       .........  5.59E-02

 SIGMA - CORR MATRIX FOR RANDOM EFFECTS - EPSILONS  ***
            EPS1
 EPS1
+        1.40E-02

 ********************                        FIRST ORDER CONDITIONAL ESTIMATION                      ********************
 ********************                          COVARIANCE MATRIX OF ESTIMATE                         ********************

            TH 1      TH 2      OM11      OM12      OM22      SG11
 TH 1
+        1.43E-07
 TH 2
+        6.91E-06  7.48E-03
 OM11
+       -1.88E-05 -7.76E-04  7.68E-03
 OM12
+       ......... ......... ......... .........
 OM22
+        1.82E-07  2.43E-03 -5.18E-04 .........  2.22E-03
 SG11
+       -4.65E-07  3.51E-05  1.82E-04 .........  3.92E-06  1.47E-05

 ********************                        FIRST ORDER CONDITIONAL ESTIMATION                      ********************
 ********************                          CORRELATION MATRIX OF ESTIMATE                        ********************

            TH 1      TH 2      OM11      OM12      OM22      SG11
 TH 1
+        3.78E-04
 TH 2
+        2.12E-01  8.65E-02
 OM11
+       -5.69E-01 -1.02E-01  8.76E-02
 OM12
+       ......... ......... ......... .........
 OM22
+        1.02E-02  5.96E-01 -1.26E-01 .........  4.71E-02
 SG11
+       -3.22E-01  1.06E-01  5.41E-01 .........  2.17E-02  3.83E-03
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
 ********************                        FIRST ORDER CONDITIONAL ESTIMATION                      ********************
 ********************                      EIGENVALUES OF COR MATRIX OF ESTIMATE                     ********************

             1         2         3         4         5
         2.98E-01  3.91E-01  7.12E-01  1.59E+00  2.01E+00
 #CPUT: Total CPU Time in Seconds,        1.432
