Fri May 22 11:56:39 CEST 2015
$PROBLEM    mixed-effect Ordered Categorical,baseline model
$INPUT      ID TIME ODV DOSE ICL IV IKA TYPE SMAX DV=SMXH THR CAV CAVH
            CON
;CNT CNT2 CNT3 HC HC2 HC3

;ETA1 ETA2 ETA3 ETA4
$DATA      data.csv IGNORE=@ ACCEPT=(THR.GT.0)
$PRED
  ;Baseline values
  B1   =THETA(1)
  B2   =THETA(2)
  B3   =THETA(3)

  ;Logits for Y>=1, Y>=2, Y>=3
  LGE1 =B1+ETA(1)
  LGE2 =B1+B2+ETA(1)
  LGE3 =B1+B2+B3+ETA(1)

  ;Probabilities for Y>=2, Y>=3
  PGE1   =EXP(LGE1)/(1+EXP(LGE1))
  PGE2   =EXP(LGE2)/(1+EXP(LGE2))
  PGE3   =EXP(LGE3)/(1+EXP(LGE3))

  ;Probabilities for Y=0, Y=1, Y=2, Y=3
  P0   =(1-PGE1)
  P1   =(PGE1-PGE2)
  P2   =(PGE2-PGE3)
  P3   = PGE3

  ;Select appropriate P(Y=m)
  IF(DV.EQ.0) Y=P0
  IF(DV.EQ.1) Y=P1
  IF(DV.EQ.2) Y=P2
  IF(DV.EQ.3) Y=P3

;Sim_start
;  ;Simulations
;  IF (ICALL.EQ.4) THEN
;    CALL RANDOM (2,R)
;    DV=0
;    IF(R.LE.PGE1) DV=1
;    IF(R.LE.PGE2) DV=2
;    IF(R.LE.PGE3) DV=3
;  ENDIF
;Sim_end

$THETA  0.63 ; B1
$THETA  (-1000000,-.1,0) ; B2
$THETA  (-1000000,-.1,0) ; B3
$OMEGA  .1
;Sim_start
;$SIM (12345) (678910 UNI) ONLYSIM NOPREDICTION NSUB=100
$ESTIMATION MAXEVAL=9990 METHOD=COND LAPLACE LIKE PRINT=1 MSFO=msfb45
$COVARIANCE PRINT=E
;Sim_end
$TABLE      ID TIME NOPRINT ONEHEADER FILE=sdtab45
$TABLE      ID CAV CAVH CON NOPRINT ONEHEADER FILE=cotab45
$TABLE      ID DOSE NOPRINT ONEHEADER FILE=catab45
$TABLE      ID ICL IV IKA NOPRINT ONEHEADER FILE=patab45

NM-TRAN MESSAGES
 WARNINGS AND ERRORS (IF ANY) FOR PROBLEM    1
 (WARNING  2) NM-TRAN INFERS THAT THE DATA ARE POPULATION.
 (WARNING  3) THERE MAY BE AN ERROR IN THE ABBREVIATED CODE. THE FOLLOWING
 ONE OR MORE RANDOM VARIABLES ARE DEFINED WITH "IF" STATEMENTS THAT DO NOT
 PROVIDE DEFINITIONS FOR BOTH THE "THEN" AND "ELSE" CASES. IF ALL
 CONDITIONS FAIL, THE VALUES OF THESE VARIABLES WILL BE ZERO.
   Y
 (WARNING  13) WITH USER-WRITTEN PRED OR $PRED, NM-TRAN CANNOT APPEND THE
 MDV DATA ITEM.

1NONLINEAR MIXED EFFECTS MODEL PROGRAM (NONMEM) VERSION 7.3.0
 ORIGINALLY DEVELOPED BY STUART BEAL, LEWIS SHEINER, AND ALISON BOECKMANN
 CURRENT DEVELOPERS ARE ROBERT BAUER, ICON DEVELOPMENT SOLUTIONS,
 AND ALISON BOECKMANN. IMPLEMENTATION, EFFICIENCY, AND STANDARDIZATION
 PERFORMED BY NOUS INFOSYSTEMS.
 PROBLEM NO.:         1
 mixed-effect Ordered Categorical,baseline model
 TOT. NO. OF OBS RECS:      384
 TOT. NO. OF INDIVIDUALS:     48
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 #TBLN:      1
 #METH: Laplacian Conditional Estimation
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
 #TERM:
0MINIMIZATION SUCCESSFUL
 HOWEVER, PROBLEMS OCCURRED WITH THE MINIMIZATION.
 REGARD THE RESULTS OF THE ESTIMATION STEP CAREFULLY, AND ACCEPT THEM ONLY
 AFTER CHECKING THAT THE COVARIANCE STEP PRODUCES REASONABLE OUTPUT.
 NO. OF FUNCTION EVALUATIONS USED:      142
 NO. OF SIG. DIGITS IN FINAL EST.:  3.5

 ETABAR IS THE ARITHMETIC MEAN OF THE ETA-ESTIMATES,
 AND THE P-VALUE IS GIVEN FOR THE NULL HYPOTHESIS THAT THE TRUE MEAN IS 0.

 ETABAR:         9.5907E-03
 SE:             1.0377E-01
 N:                      48

 P VAL.:         9.2636E-01

 ETAshrink(%):   2.0409E+01
 EBVshrink(%):   1.9393E+01
 EPSshrink(%):   1.0000E+02

 #TERE:
 Elapsed estimation time in seconds:     0.28
 Elapsed covariance time in seconds:     0.07

 ********************                         LAPLACIAN CONDITIONAL ESTIMATION                       ********************
 #OBJT:**************                       MINIMUM VALUE OF OBJECTIVE FUNCTION                      ********************
 #OBJV:********************************************      931.104       **************************************************

 ********************                         LAPLACIAN CONDITIONAL ESTIMATION                       ********************
 ********************                             FINAL PARAMETER ESTIMATE                           ********************

 THETA - VECTOR OF FIXED EFFECTS PARAMETERS   *********
         TH 1      TH 2      TH 3
         3.71E-01 -9.58E-01 -4.29E-01

 OMEGA - COV MATRIX FOR RANDOM EFFECTS - ETAS  ********
            ETA1
 ETA1
+        8.33E-01

 OMEGA - CORR MATRIX FOR RANDOM EFFECTS - ETAS  *******
            ETA1
 ETA1
+        9.13E-01

 ********************                         LAPLACIAN CONDITIONAL ESTIMATION                       ********************
 ********************                            STANDARD ERROR OF ESTIMATE                          ********************

 THETA - VECTOR OF FIXED EFFECTS PARAMETERS   *********
         TH 1      TH 2      TH 3
         1.75E-01  1.50E-01  7.67E-02

 OMEGA - COV MATRIX FOR RANDOM EFFECTS - ETAS  ********
            ETA1
 ETA1
+        3.15E-01

 OMEGA - CORR MATRIX FOR RANDOM EFFECTS - ETAS  *******
            ETA1
 ETA1
+        1.72E-01

 ********************                         LAPLACIAN CONDITIONAL ESTIMATION                       ********************
 ********************                          COVARIANCE MATRIX OF ESTIMATE                         ********************

            TH 1      TH 2      TH 3      OM11
 TH 1
+        3.06E-02
 TH 2
+       -8.13E-03  2.24E-02
 TH 3
+       -5.39E-04 -2.10E-04  5.89E-03
 OM11
+       -7.35E-04 -1.27E-02 -4.53E-03  9.91E-02

 ********************                         LAPLACIAN CONDITIONAL ESTIMATION                       ********************
 ********************                          CORRELATION MATRIX OF ESTIMATE                        ********************

            TH 1      TH 2      TH 3      OM11
 TH 1
+        1.75E-01
 TH 2
+       -3.10E-01  1.50E-01
 TH 3
+       -4.01E-02 -1.83E-02  7.67E-02
 OM11
+       -1.33E-02 -2.69E-01 -1.88E-01  3.15E-01
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
 ********************                         LAPLACIAN CONDITIONAL ESTIMATION                       ********************
 ********************                      EIGENVALUES OF COR MATRIX OF ESTIMATE                     ********************

             1         2         3         4
         5.47E-01  9.05E-01  1.12E+00  1.43E+00
 #CPUT: Total CPU Time in Seconds,        0.394
