$PROBLEM    PHENOBARB SIMPLE MODEL
$INPUT      ID TIME AMT WGT APGR DV
$DATA       pheno.dta IGNORE=@ IGNORE=(WGT.LT.1.3)
$SUBROUTINE ADVAN1 TRANS2
$OMEGA  .4  ;       IVCL
 .25  ;        IVV
$PK

      TVCL=THETA(1)
      TVV=THETA(2)
      CL=TVCL*EXP(ETA(1))
      V=TVV*EXP(ETA(2))
      S1=V
$ERROR

      W=F
      Y=F+W*EPS(1)

      IPRED=F         ;  individual-specific prediction
      IRES=DV-IPRED   ;  individual-specific residual
      IWRES=IRES/W    ;  individual-specific weighted residual

$THETA  (0,0.0105) ; CL
$THETA  (0,1.0500) ; V
$SIGMA  .04
$ESTIMATION MAXEVALS=9997 SIGDIGITS=4 POSTHOC
$COVARIANCE PRINT=E
$TABLE      ID TVCL TVV NOPRINT ONEHEADER FILE=patab1

1NONLINEAR MIXED EFFECTS MODEL PROGRAM (NONMEM)    DOUBLE PRECISION NONMEM    VERSION VI LEVEL 1.0
 DEVELOPED AND PROGRAMMED BY STUART BEAL AND LEWIS SHEINER
 PROBLEM NO.:         1
 PHENOBARB SIMPLE MODEL
 TOT. NO. OF OBS RECS:      84
 TOT. NO. OF INDIVIDUALS:   33
 ONE COMPARTMENT MODEL (ADVAN1)
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
0MINIMIZATION SUCCESSFUL
 NO. OF FUNCTION EVALUATIONS USED:   92
 NO. OF SIG. DIGITS IN FINAL EST.:  4.1

 ********************                           MINIMUM VALUE OF OBJECTIVE FUNCTION                  ********************

 **************************************************        357.765     **************************************************

 ********************                                  FINAL PARAMETER ESTIMATE                      ********************

 THETA - VECTOR OF FIXED EFFECTS PARAMETERS   *********
            TH 1      TH 2
         6.89E-03  1.79E+00

 OMEGA - COV MATRIX FOR RANDOM EFFECTS - ETAS  ********
            ETA1      ETA2
 ETA1
+        1.11E-01
 ETA2
+        0.00E+00  1.08E-01

 SIGMA - COV MATRIX FOR RANDOM EFFECTS - EPSILONS  ****
            EPS1
 EPS1
+        1.02E-02

 ********************                             STANDARD ERROR OF ESTIMATE                         ********************

 THETA - VECTOR OF FIXED EFFECTS PARAMETERS   *********
            TH 1      TH 2
         4.51E-04  1.31E-01

 OMEGA - COV MATRIX FOR RANDOM EFFECTS - ETAS  ********
            ETA1      ETA2
 ETA1
+        6.34E-02
 ETA2
+       .........  3.89E-02

 SIGMA - COV MATRIX FOR RANDOM EFFECTS - EPSILONS  ****
            EPS1
 EPS1
+        2.82E-03

 ********************                          COVARIANCE MATRIX OF ESTIMATE                         ********************

            TH 1      TH 2      OM11      OM12      OM22      SG11
 TH 1
+        2.04E-07
 TH 2
+        2.60E-05  1.73E-02
 OM11
+       -5.44E-06  1.26E-03  4.02E-03
 OM12
+       ......... ......... ......... .........
 OM22
+        5.45E-06  4.59E-03  3.75E-04 .........  1.51E-03
 SG11
+        1.92E-07  1.27E-04 -6.48E-05 .........  3.63E-05  7.96E-06

 ********************                         CORRELATION MATRIX OF ESTIMATE                         ********************

            TH 1      TH 2      OM11      OM12      OM22      SG11
 TH 1
+        1.00E+00
 TH 2
+        4.38E-01  1.00E+00
 OM11
+       -1.90E-01  1.51E-01  1.00E+00
 OM12
+       ......... ......... ......... .........
 OM22
+        3.10E-01  8.97E-01  1.52E-01 .........  1.00E+00
 SG11
+        1.51E-01  3.43E-01 -3.62E-01 .........  3.31E-01  1.00E+00
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
 ********************                  EIGENVALUES OF COR MATRIX OF ESTIMATE                         ********************

             1         2         3         4         5
         8.99E-02  3.92E-01  8.38E-01  1.35E+00  2.33E+00
