$PROBLEM    PHENOBARB SIMPLE MODEL
$INPUT      ID TIME AMT WGT APGR DV CV1 CV2 CV3 CVD1 CVD2 CVD3
$DATA       pheno_ch.csv IGNORE=@
$SUBROUTINE ADVAN1 TRANS2
$OMEGA  .4
 .25
$PK

DUM=1
;;;SCM-ANCHOR
      TVCL  = THETA(1)
      CL    = TVCL*EXP(ETA(1))

      TVV   = THETA(2)
      V     = TVV*EXP(ETA(2))

      S1    = V
$ERROR

      IPRED = F          ;  individual-specific prediction
      W     = THETA(3)*IPRED
      WP    = THETA(3)   ; for scm linearize

      IRES  = DV-IPRED   ;  individual-specific residual
      IWRES = IRES/W     ;  individual-specific weighted residual
      Y     = IPRED + W*EPS(1)

$THETA  (0,0.0105)
$THETA  (0,1.0500)
$THETA  (0,0.4)
$SIGMA  1  FIX
$ESTIMATION MAXEVAL=9999 SIGDIGITS=4 METHOD=CONDITIONAL INTERACTION
;$COVARIANCE PRINT=E

;$TABLE ID TIME AMT WGT APGR DV NOPRINT FILE=sdtab2

1NONLINEAR MIXED EFFECTS MODEL PROGRAM (NONMEM) VERSION 7.1.0
 ORIGINALLY DEVELOPED BY STUART BEAL, LEWIS SHEINER, AND ALISON BOECKMANN
 CURRENT DEVELOPERS ARE ROBERT BAUER, ICON DEVELOPMENT SOLUTIONS,
 AND ALISON BOECKMANN. IMPLEMENTATION, EFFICIENCY, AND STANDARDIZATION
 PERFORMED BY NOUS INFOSYSTEMS.
 PROBLEM NO.:         1
 PHENOBARB SIMPLE MODEL
 TOT. NO. OF OBS RECS:      155
 TOT. NO. OF INDIVIDUALS:     59
 ONE COMPARTMENT MODEL (ADVAN1)
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 #METH: First Order Conditional Estimation with Interaction
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 Elapsed estimation time in seconds:     4.28

 #TERM:
0MINIMIZATION SUCCESSFUL
 NO. OF FUNCTION EVALUATIONS USED:      131
 NO. OF SIG. DIGITS IN FINAL EST.:  4.7

 ETABAR IS THE ARITHMETIC MEAN OF THE ETA-ESTIMATES,
 AND THE P-VALUE IS GIVEN FOR THE NULL HYPOTHESIS THAT THE TRUE MEAN IS 0.

 ETABAR:         1.0232E-02 -4.4062E-03
 SE:             2.7284E-02  5.6804E-02

 P VAL.:         7.0765E-01  9.3817E-01

 ETAshrink(%):   3.6556E+01  1.9694E+00
 EPSshrink(%):   2.8946E+01

 #TERE:

 ********************               FIRST ORDER CONDITIONAL ESTIMATION WITH INTERACTION              ********************
 #OBJT:**************                       MINIMUM VALUE OF OBJECTIVE FUNCTION                      ********************
 #OBJV:********************************************      730.895       **************************************************

 ********************               FIRST ORDER CONDITIONAL ESTIMATION WITH INTERACTION              ********************
 ********************                             FINAL PARAMETER ESTIMATE                           ********************

 THETA - VECTOR OF FIXED EFFECTS PARAMETERS   *********
         TH 1      TH 2      TH 3
         5.82E-03  1.45E+00  1.28E-01

 OMEGA - COV MATRIX FOR RANDOM EFFECTS - ETAS  ********
            ETA1      ETA2
 ETA1
+        1.11E-01
 ETA2
+        0.00E+00  2.02E-01

 SIGMA - COV MATRIX FOR RANDOM EFFECTS - EPSILONS  ****
            EPS1
 EPS1
+        1.00E+00
