fre 10 nov 2017 13:32:22 CET
$PROBLEM    PHENOBARB SIMPLE MODEL
$INPUT      ID TIME AMT WGT APGR=DROP DV CV1=DROP CV2=DROP CV3
            CVD1=DROP CVD2 CVD3=DROP
$DATA      ../../../pheno_ch.csv IGNORE=@
$SUBROUTINE ADVAN1 TRANS2
$PK

;;; CLWGT-DEFINITION START
CLWGT = ( 1 + THETA(5)*(WGT - 1.3))
;;; CLWGT-DEFINITION END

;;; CL-RELATION START
CLCOV=CLWGT
;;; CL-RELATION END

;;; VWGT-DEFINITION START
VWGT = ( 1 + THETA(4)*(WGT - 1.3))
;;; VWGT-DEFINITION END

;;; V-RELATION START
VCOV=VWGT
;;; V-RELATION END

      TVCL  = THETA(1)

TVCL = CLCOV*TVCL
      CL    = TVCL*EXP(ETA(1))

      TVV   = THETA(2)

TVV = VCOV*TVV
      V     = TVV*EXP(ETA(2))

      S1    = V
$ERROR


      W     = THETA(3)
      Y     = F+W*EPS(1)

      IPRED = F          ;  individual-specific prediction
      IRES  = DV-IPRED   ;  individual-specific residual
      IWRES = IRES/W     ;  individual-specific weighted residual

$THETA  (0,0.00603751)
$THETA  (0,1.32074)
$THETA  (0,2.87637)
$THETA  (-0.435,0.770805,1.429) ; VWGT1
$THETA  (-0.435,-0.000435,1.429) ; CLWGT1
$OMEGA  0.177915
 0.0267252
$SIGMA  1  FIX
$ESTIMATION MAXEVAL=9999 SIGDIGITS=4 METHOD=CONDITIONAL
$COVARIANCE PRINT=E
;$TABLE ID TIME AMT WGT APGR DV NOPRINT FILE=sdtab2

NM-TRAN MESSAGES
 WARNINGS AND ERRORS (IF ANY) FOR PROBLEM    1
 (WARNING  2) NM-TRAN INFERS THAT THE DATA ARE POPULATION.

1NONLINEAR MIXED EFFECTS MODEL PROGRAM (NONMEM) VERSION 7.3.0
 ORIGINALLY DEVELOPED BY STUART BEAL, LEWIS SHEINER, AND ALISON BOECKMANN
 CURRENT DEVELOPERS ARE ROBERT BAUER, ICON DEVELOPMENT SOLUTIONS,
 AND ALISON BOECKMANN. IMPLEMENTATION, EFFICIENCY, AND STANDARDIZATION
 PERFORMED BY NOUS INFOSYSTEMS.
 PROBLEM NO.:         1
 PHENOBARB SIMPLE MODEL
 TOT. NO. OF OBS RECS:      155
 TOT. NO. OF INDIVIDUALS:     59
 ONE COMPARTMENT MODEL (ADVAN1)
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 #TBLN:      1
 #METH: First Order Conditional Estimation
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
 #TERM:
0MINIMIZATION SUCCESSFUL
 NO. OF FUNCTION EVALUATIONS USED:      164
 NO. OF SIG. DIGITS IN FINAL EST.:  4.8

 ETABAR IS THE ARITHMETIC MEAN OF THE ETA-ESTIMATES,
 AND THE P-VALUE IS GIVEN FOR THE NULL HYPOTHESIS THAT THE TRUE MEAN IS 0.

 ETABAR:         1.8690E-03 -6.8784E-03
 SE:             1.6096E-02  2.0243E-02
 N:                      59          59

 P VAL.:         9.0756E-01  7.3401E-01

 ETAshrink(%):   4.0496E+01  1.2731E+01
 EBVshrink(%):   4.0817E+01  1.3868E+01
 EPSshrink(%):   2.3715E+01

 #TERE:
 Elapsed estimation time in seconds:     1.78
 Elapsed covariance time in seconds:     1.51

 ********************                        FIRST ORDER CONDITIONAL ESTIMATION                      ********************
 #OBJT:**************                       MINIMUM VALUE OF OBJECTIVE FUNCTION                      ********************
 #OBJV:********************************************      590.060       **************************************************

 ********************                        FIRST ORDER CONDITIONAL ESTIMATION                      ********************
 ********************                             FINAL PARAMETER ESTIMATE                           ********************

 THETA - VECTOR OF FIXED EFFECTS PARAMETERS   *********
         TH 1      TH 2      TH 3      TH 4      TH 5
         6.04E-03  1.31E+00  2.70E+00  6.80E-01  8.60E-01

 OMEGA - COV MATRIX FOR RANDOM EFFECTS - ETAS  ********
            ETA1      ETA2
 ETA1
+        4.39E-02
 ETA2
+        0.00E+00  3.23E-02

 SIGMA - COV MATRIX FOR RANDOM EFFECTS - EPSILONS  ****
            EPS1
 EPS1
+        1.00E+00

 OMEGA - CORR MATRIX FOR RANDOM EFFECTS - ETAS  *******
            ETA1      ETA2
 ETA1
+        2.10E-01
 ETA2
+        0.00E+00  1.80E-01

 SIGMA - CORR MATRIX FOR RANDOM EFFECTS - EPSILONS  ***
            EPS1
 EPS1
+        1.00E+00

 ********************                        FIRST ORDER CONDITIONAL ESTIMATION                      ********************
 ********************                            STANDARD ERROR OF ESTIMATE                          ********************

 THETA - VECTOR OF FIXED EFFECTS PARAMETERS   *********
         TH 1      TH 2      TH 3      TH 4      TH 5
         2.80E-04  3.77E-02  2.24E-01  8.00E-02  1.45E-01

 OMEGA - COV MATRIX FOR RANDOM EFFECTS - ETAS  ********
            ETA1      ETA2
 ETA1
+        2.13E-02
 ETA2
+       .........  8.67E-03

 SIGMA - COV MATRIX FOR RANDOM EFFECTS - EPSILONS  ****
            EPS1
 EPS1
+       .........

 OMEGA - CORR MATRIX FOR RANDOM EFFECTS - ETAS  *******
            ETA1      ETA2
 ETA1
+        5.09E-02
 ETA2
+       .........  2.41E-02

 SIGMA - CORR MATRIX FOR RANDOM EFFECTS - EPSILONS  ***
            EPS1
 EPS1
+       .........

 ********************                        FIRST ORDER CONDITIONAL ESTIMATION                      ********************
 ********************                          COVARIANCE MATRIX OF ESTIMATE                         ********************

            TH 1      TH 2      TH 3      TH 4      TH 5      OM11      OM12      OM22      SG11
 TH 1
+        7.85E-08
 TH 2
+       -2.22E-06  1.42E-03
 TH 3
+        2.12E-05 -6.11E-04  5.00E-02
 TH 4
+       -8.60E-07  7.63E-04  7.17E-03  6.40E-03
 TH 5
+       -1.37E-05  1.89E-03 -7.63E-03 -2.10E-05  2.10E-02
 OM11
+       -1.54E-06  6.19E-05 -2.15E-04 -1.19E-05  2.07E-04  4.55E-04
 OM12
+       ......... ......... ......... ......... ......... ......... .........
 OM22
+       -3.89E-08  1.43E-04  3.11E-04  1.92E-04 -1.68E-05 -5.23E-05 .........  7.52E-05
 SG11
+       ......... ......... ......... ......... ......... ......... ......... ......... .........

 ********************                        FIRST ORDER CONDITIONAL ESTIMATION                      ********************
 ********************                          CORRELATION MATRIX OF ESTIMATE                        ********************

            TH 1      TH 2      TH 3      TH 4      TH 5      OM11      OM12      OM22      SG11
 TH 1
+        2.80E-04
 TH 2
+       -2.11E-01  3.77E-02
 TH 3
+        3.39E-01 -7.25E-02  2.24E-01
 TH 4
+       -3.84E-02  2.53E-01  4.01E-01  8.00E-02
 TH 5
+       -3.37E-01  3.46E-01 -2.35E-01 -1.81E-03  1.45E-01
 OM11
+       -2.59E-01  7.70E-02 -4.51E-02 -6.99E-03  6.68E-02  2.13E-02
 OM12
+       ......... ......... ......... ......... ......... ......... .........
 OM22
+       -1.60E-02  4.38E-01  1.60E-01  2.76E-01 -1.34E-02 -2.83E-01 .........  8.67E-03
 SG11
+       ......... ......... ......... ......... ......... ......... ......... ......... .........
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
 ********************                        FIRST ORDER CONDITIONAL ESTIMATION                      ********************
 ********************                      EIGENVALUES OF COR MATRIX OF ESTIMATE                     ********************

             1         2         3         4         5         6         7
         3.30E-01  4.78E-01  6.76E-01  7.35E-01  1.14E+00  1.79E+00  1.85E+00
 #CPUT: Total CPU Time in Seconds,        2.760
