fre 10 nov 2017 13:32:22 CET
$PROBLEM    PHENOBARB SIMPLE MODEL
$INPUT      ID TIME AMT WGT APGR DV CV1=DROP CV2=DROP CV3 CVD1=DROP
            CVD2 CVD3=DROP
$DATA      ../../../pheno_ch.csv IGNORE=@
$SUBROUTINE ADVAN1 TRANS2
$PK

;;; CLAPGR-DEFINITION START
IF(APGR.EQ.8) CLAPGR = 1  ; Most common
IF(APGR.EQ.7) CLAPGR = ( 1 + THETA(5))
IF(APGR.EQ.9) CLAPGR = ( 1 + THETA(6))
IF(APGR.EQ.6) CLAPGR = ( 1 + THETA(7))
IF(APGR.EQ.5) CLAPGR = ( 1 + THETA(8))
IF(APGR.EQ.1) CLAPGR = ( 1 + THETA(9))
IF(APGR.EQ.4) CLAPGR = ( 1 + THETA(10))
IF(APGR.EQ.3) CLAPGR = ( 1 + THETA(11))
IF(APGR.EQ.2) CLAPGR = ( 1 + THETA(12))
IF(APGR.EQ.10) CLAPGR = ( 1 + THETA(13))
;;; CLAPGR-DEFINITION END

;;; CL-RELATION START
CLCOV=CLAPGR
;;; CL-RELATION END

;;; VWGT-DEFINITION START
VWGT = ( 1 + THETA(4)*(WGT - 1.3))
;;; VWGT-DEFINITION END

;;; V-RELATION START
VCOV=VWGT
;;; V-RELATION END

      TVCL  = THETA(1)

TVCL = CLCOV*TVCL
      CL    = TVCL*EXP(ETA(1))

      TVV   = THETA(2)

TVV = VCOV*TVV
      V     = TVV*EXP(ETA(2))

      S1    = V
$ERROR


      W     = THETA(3)
      Y     = F+W*EPS(1)

      IPRED = F          ;  individual-specific prediction
      IRES  = DV-IPRED   ;  individual-specific residual
      IWRES = IRES/W     ;  individual-specific weighted residual

$THETA  (0,0.00603751)
$THETA  (0,1.32074)
$THETA  (0,2.87637)
$THETA  (-0.435,0.770805,1.429) ; VWGT1
$THETA  (-1,-0.001,5) ; CLAPGR1
 (-1,-0.001,5) ; CLAPGR2
 (-1,-0.001,5) ; CLAPGR3
 (-1,-0.001,5) ; CLAPGR4
 (-1,-0.001,5) ; CLAPGR5
 (-1,-0.001,5) ; CLAPGR6
 (-1,-0.001,5) ; CLAPGR7
 (-1,-0.001,5) ; CLAPGR8
 (-1,-0.001,5) ; CLAPGR9
$OMEGA  0.177915
 0.0267252
$SIGMA  1  FIX
$ESTIMATION MAXEVAL=9999 SIGDIGITS=4 METHOD=CONDITIONAL
$COVARIANCE PRINT=E
;$TABLE ID TIME AMT WGT APGR DV NOPRINT FILE=sdtab2

NM-TRAN MESSAGES
 WARNINGS AND ERRORS (IF ANY) FOR PROBLEM    1
 (WARNING  2) NM-TRAN INFERS THAT THE DATA ARE POPULATION.

1NONLINEAR MIXED EFFECTS MODEL PROGRAM (NONMEM) VERSION 7.3.0
 ORIGINALLY DEVELOPED BY STUART BEAL, LEWIS SHEINER, AND ALISON BOECKMANN
 CURRENT DEVELOPERS ARE ROBERT BAUER, ICON DEVELOPMENT SOLUTIONS,
 AND ALISON BOECKMANN. IMPLEMENTATION, EFFICIENCY, AND STANDARDIZATION
 PERFORMED BY NOUS INFOSYSTEMS.
 PROBLEM NO.:         1
 PHENOBARB SIMPLE MODEL
 TOT. NO. OF OBS RECS:      155
 TOT. NO. OF INDIVIDUALS:     59
 ONE COMPARTMENT MODEL (ADVAN1)
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 #TBLN:      1
 #METH: First Order Conditional Estimation
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
 #TERM:
0MINIMIZATION TERMINATED
 DUE TO ROUNDING ERRORS (ERROR=134)
 NO. OF FUNCTION EVALUATIONS USED:      709
 NO. OF SIG. DIGITS IN FINAL EST.:  3.8

 ETABAR IS THE ARITHMETIC MEAN OF THE ETA-ESTIMATES,
 AND THE P-VALUE IS GIVEN FOR THE NULL HYPOTHESIS THAT THE TRUE MEAN IS 0.

 ETABAR:         5.5580E-03 -8.8659E-03
 SE:             2.3488E-02  1.9117E-02
 N:                      59          59

 P VAL.:         8.1295E-01  6.4282E-01

 ETAshrink(%):   3.5123E+01  1.5486E+01
 EBVshrink(%):   3.5520E+01  1.6576E+01
 EPSshrink(%):   2.4230E+01

 #TERE:
 Elapsed estimation time in seconds:     4.64

 ********************                        FIRST ORDER CONDITIONAL ESTIMATION                      ********************
 #OBJT:**************                       MINIMUM VALUE OF OBJECTIVE FUNCTION                      ********************
 #OBJV:********************************************      610.695       **************************************************

 ********************                        FIRST ORDER CONDITIONAL ESTIMATION                      ********************
 ********************                             FINAL PARAMETER ESTIMATE                           ********************

 THETA - VECTOR OF FIXED EFFECTS PARAMETERS   *********
         TH 1      TH 2      TH 3      TH 4      TH 5      TH 6      TH 7      TH 8      TH 9      TH10      TH11      TH12
          TH13
         4.85E-03  1.32E+00  2.86E+00  7.88E-01  3.65E-01  7.04E-03  4.28E-02  2.32E-01 -8.66E-02  8.47E-01  2.71E+00  1.36E+00
          9.75E-01

 OMEGA - COV MATRIX FOR RANDOM EFFECTS - ETAS  ********
            ETA1      ETA2
 ETA1
+        7.87E-02
 ETA2
+        0.00E+00  3.07E-02

 SIGMA - COV MATRIX FOR RANDOM EFFECTS - EPSILONS  ****
            EPS1
 EPS1
+        1.00E+00

 OMEGA - CORR MATRIX FOR RANDOM EFFECTS - ETAS  *******
            ETA1      ETA2
 ETA1
+        2.80E-01
 ETA2
+        0.00E+00  1.75E-01

 SIGMA - CORR MATRIX FOR RANDOM EFFECTS - EPSILONS  ***
            EPS1
 EPS1
+        1.00E+00
 #CPUT: Total CPU Time in Seconds,        4.112
