mån 20 nov 2017 14:54:09 CET
$PROBLEM    PHENOBARB SIMPLE MODEL
$INPUT      ID TIME AMT WGT APGR DV CV1 CV2 CV3 CVD1 CVD2 CVD3
$DATA      pheno_ch.csv IGNORE=@
$SUBROUTINE ADVAN1 TRANS2
$PK

      TVCL  = THETA(1)
      CL    = TVCL*EXP(ETA(1))

      TVV   = THETA(2)
      V     = TVV*EXP(ETA(2))

      S1    = V
$ERROR


      W     = THETA(3)
      Y     = F+W*EPS(1)

      IPRED = F          ;  individual-specific prediction
      IRES  = DV-IPRED   ;  individual-specific residual
      IWRES = IRES/W     ;  individual-specific weighted residual

$THETA  (0,0.0105)
$THETA  (0,1.0500)
$THETA  (0,0.4)
$OMEGA  .4
 .25
$SIGMA  1  FIX
$ESTIMATION MAXEVAL=9999 SIGDIGITS=4 METHOD=CONDITIONAL

NM-TRAN MESSAGES
 WARNINGS AND ERRORS (IF ANY) FOR PROBLEM    1
 (WARNING  2) NM-TRAN INFERS THAT THE DATA ARE POPULATION.

1NONLINEAR MIXED EFFECTS MODEL PROGRAM (NONMEM) VERSION 7.3.0
 ORIGINALLY DEVELOPED BY STUART BEAL, LEWIS SHEINER, AND ALISON BOECKMANN
 CURRENT DEVELOPERS ARE ROBERT BAUER, ICON DEVELOPMENT SOLUTIONS,
 AND ALISON BOECKMANN. IMPLEMENTATION, EFFICIENCY, AND STANDARDIZATION
 PERFORMED BY NOUS INFOSYSTEMS.
 PROBLEM NO.:         1
 PHENOBARB SIMPLE MODEL
 TOT. NO. OF OBS RECS:      155
 TOT. NO. OF INDIVIDUALS:     59
 ONE COMPARTMENT MODEL (ADVAN1)
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 #TBLN:      1
 #METH: First Order Conditional Estimation
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
 #TERM:
0MINIMIZATION SUCCESSFUL
 NO. OF FUNCTION EVALUATIONS USED:      124
 NO. OF SIG. DIGITS IN FINAL EST.:  4.1

 ETABAR IS THE ARITHMETIC MEAN OF THE ETA-ESTIMATES,
 AND THE P-VALUE IS GIVEN FOR THE NULL HYPOTHESIS THAT THE TRUE MEAN IS 0.

 ETABAR:         1.9122E-02 -1.8312E-02
 SE:             4.1727E-02  5.6565E-02
 N:                      59          59

 P VAL.:         6.4676E-01  7.4613E-01

 ETAshrink(%):   2.7331E+01  2.3346E+00
 EBVshrink(%):   2.7829E+01  3.5214E+00
 EPSshrink(%):   3.3356E+01

 #TERE:
 Elapsed estimation time in seconds:     0.64

 ********************                        FIRST ORDER CONDITIONAL ESTIMATION                      ********************
 #OBJT:**************                       MINIMUM VALUE OF OBJECTIVE FUNCTION                      ********************
 #OBJV:********************************************      725.602       **************************************************

 ********************                        FIRST ORDER CONDITIONAL ESTIMATION                      ********************
 ********************                             FINAL PARAMETER ESTIMATE                           ********************

 THETA - VECTOR OF FIXED EFFECTS PARAMETERS   *********
         TH 1      TH 2      TH 3
         5.89E-03  1.44E+00  2.80E+00

 OMEGA - COV MATRIX FOR RANDOM EFFECTS - ETAS  ********
            ETA1      ETA2
 ETA1
+        1.98E-01
 ETA2
+        0.00E+00  2.01E-01

 SIGMA - COV MATRIX FOR RANDOM EFFECTS - EPSILONS  ****
            EPS1
 EPS1
+        1.00E+00

 OMEGA - CORR MATRIX FOR RANDOM EFFECTS - ETAS  *******
            ETA1      ETA2
 ETA1
+        4.45E-01
 ETA2
+        0.00E+00  4.49E-01

 SIGMA - CORR MATRIX FOR RANDOM EFFECTS - EPSILONS  ***
            EPS1
 EPS1
+        1.00E+00
 #CPUT: Total CPU Time in Seconds,        0.664
