tis 15 maj 2018 09:38:57 CEST
$PROBLEM    PHENOBARB SIMPLE MODEL
$INPUT      ID TIME AMT WGT APGR DV
$DATA      pheno.dta IGNORE=@ IGNORE(WGT.EQ.23)
$SUBROUTINE ADVAN1 TRANS2
$PK

    ETA_CL = ETA(1)
    ETA_V = ETA(2)

      TVCL=THETA(1)
      TVV=THETA(2)
      CL=TVCL*EXP(ETA(1))
      V=TVV*EXP(ETA(2))
      S1=V
      CENSOR=0
$ERROR

      W=F
      Y=F+W*EPS(1)

      IPRED=F         ;  individual-specific prediction
      IRES=DV-IPRED   ;  individual-specific residual
      IWRES=IRES/W    ;  individual-specific weighted residual

$THETA  (0,0.01050101010101) ; TVCL
$THETA  (0,1.0500) ; TVV
$OMEGA  .4  ;       IVCL
 .25  ;        IVV
$SIGMA  .04
$ESTIMATION METHOD=1 MAX=9999 SIGDIGITS=4 POSTHOC MSFO=phenomsf
$COVARIANCE PRINT=E
$TABLE      NOPRINT ID CL V ETA_CL ETA_V NOAPPEND FILE=patab
$TABLE      ID TIME CPRED CL DV MDV PRED IPRED RES IRES WRES IWRES
            CWRES NPDE NOPRINT NOAPPEND FILE=sdtab

NM-TRAN MESSAGES
 WARNINGS AND ERRORS (IF ANY) FOR PROBLEM    1
 (WARNING  2) NM-TRAN INFERS THAT THE DATA ARE POPULATION.

1NONLINEAR MIXED EFFECTS MODEL PROGRAM (NONMEM) VERSION 7.3.0
 ORIGINALLY DEVELOPED BY STUART BEAL, LEWIS SHEINER, AND ALISON BOECKMANN
 CURRENT DEVELOPERS ARE ROBERT BAUER, ICON DEVELOPMENT SOLUTIONS,
 AND ALISON BOECKMANN. IMPLEMENTATION, EFFICIENCY, AND STANDARDIZATION
 PERFORMED BY NOUS INFOSYSTEMS.
 PROBLEM NO.:         1
 PHENOBARB SIMPLE MODEL
 TOT. NO. OF OBS RECS:      155
 TOT. NO. OF INDIVIDUALS:     59
 ONE COMPARTMENT MODEL (ADVAN1)
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 #TBLN:      1
 #METH: First Order Conditional Estimation
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
 #TERM:
0MINIMIZATION SUCCESSFUL
 NO. OF FUNCTION EVALUATIONS USED:      110
 NO. OF SIG. DIGITS IN FINAL EST.:  4.5

 ETABAR IS THE ARITHMETIC MEAN OF THE ETA-ESTIMATES,
 AND THE P-VALUE IS GIVEN FOR THE NULL HYPOTHESIS THAT THE TRUE MEAN IS 0.

 ETABAR:         5.5409E-03 -1.3065E-02
 SE:             2.8607E-02  5.1845E-02
 N:                      59          59

 P VAL.:         8.4642E-01  8.0104E-01

 ETAshrink(%):   3.8721E+01  4.6507E+00
 EBVshrink(%):   3.8427E+01  4.4589E+00
 EPSshrink(%):   2.7970E+01

 #TERE:
 Elapsed estimation time in seconds:     0.54
 Elapsed covariance time in seconds:     0.31

 ********************                        FIRST ORDER CONDITIONAL ESTIMATION                      ********************
 #OBJT:**************                       MINIMUM VALUE OF OBJECTIVE FUNCTION                      ********************
 #OBJV:********************************************      740.278       **************************************************

 ********************                        FIRST ORDER CONDITIONAL ESTIMATION                      ********************
 ********************                             FINAL PARAMETER ESTIMATE                           ********************

 THETA - VECTOR OF FIXED EFFECTS PARAMETERS   *********
         TH 1      TH 2
         5.35E-03  1.42E+00

 OMEGA - COV MATRIX FOR RANDOM EFFECTS - ETAS  ********
            ETA1      ETA2
 ETA1
+        1.31E-01
 ETA2
+        0.00E+00  1.77E-01

 SIGMA - COV MATRIX FOR RANDOM EFFECTS - EPSILONS  ****
            EPS1
 EPS1
+        1.88E-02

 OMEGA - CORR MATRIX FOR RANDOM EFFECTS - ETAS  *******
            ETA1      ETA2
 ETA1
+        3.62E-01
 ETA2
+        0.00E+00  4.21E-01

 SIGMA - CORR MATRIX FOR RANDOM EFFECTS - EPSILONS  ***
            EPS1
 EPS1
+        1.37E-01

 ********************                        FIRST ORDER CONDITIONAL ESTIMATION                      ********************
 ********************                            STANDARD ERROR OF ESTIMATE                          ********************

 THETA - VECTOR OF FIXED EFFECTS PARAMETERS   *********
         TH 1      TH 2
         3.82E-04  9.82E-02

 OMEGA - COV MATRIX FOR RANDOM EFFECTS - ETAS  ********
            ETA1      ETA2
 ETA1
+        8.75E-02
 ETA2
+       .........  5.07E-02

 SIGMA - COV MATRIX FOR RANDOM EFFECTS - EPSILONS  ****
            EPS1
 EPS1
+        3.90E-03

 OMEGA - CORR MATRIX FOR RANDOM EFFECTS - ETAS  *******
            ETA1      ETA2
 ETA1
+        1.21E-01
 ETA2
+       .........  6.01E-02

 SIGMA - CORR MATRIX FOR RANDOM EFFECTS - EPSILONS  ***
            EPS1
 EPS1
+        1.42E-02

 ********************                        FIRST ORDER CONDITIONAL ESTIMATION                      ********************
 ********************                          COVARIANCE MATRIX OF ESTIMATE                         ********************

            TH 1      TH 2      OM11      OM12      OM22      SG11
 TH 1
+        1.46E-07
 TH 2
+        1.15E-05  9.64E-03
 OM11
+       -1.95E-05 -1.99E-03  7.66E-03
 OM12
+       ......... ......... ......... .........
 OM22
+        7.77E-07  3.39E-03 -4.80E-04 .........  2.57E-03
 SG11
+       -1.29E-07  1.45E-04  6.53E-05 .........  1.06E-04  1.52E-05

 ********************                        FIRST ORDER CONDITIONAL ESTIMATION                      ********************
 ********************                          CORRELATION MATRIX OF ESTIMATE                        ********************

            TH 1      TH 2      OM11      OM12      OM22      SG11
 TH 1
+        3.82E-04
 TH 2
+        3.07E-01  9.82E-02
 OM11
+       -5.84E-01 -2.31E-01  8.75E-02
 OM12
+       ......... ......... ......... .........
 OM22
+        4.02E-02  6.81E-01 -1.08E-01 .........  5.07E-02
 SG11
+       -8.66E-02  3.79E-01  1.91E-01 .........  5.38E-01  3.90E-03
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
 ********************                        FIRST ORDER CONDITIONAL ESTIMATION                      ********************
 ********************                      EIGENVALUES OF COR MATRIX OF ESTIMATE                     ********************

             1         2         3         4         5
         2.38E-01  4.30E-01  5.25E-01  1.66E+00  2.15E+00
 #CPUT: Total CPU Time in Seconds,        1.032
