Mon Mar 24 10:23:03 CET 2014
$PROBLEM    MOXONIDINE PK,FINAL ESTIMATES,ALL DATA
;;

;;
$INPUT      ID VISI XAT2=DROP DGRP=DROP DOSE=DROP FLAG=DROP ONO=DROP
            XIME=DROP DVO=DROP NEUY SCR AGE SEX NYHA WT DROP ACE DIG
            DIU NUMB=DROP TAD TIME VIDD=DROP CRCL AMT SS II DROP
            CMT=DROP CONO=DROP DV EVID=DROP OVID=DROP DROP SHR2=DROP
            NYHDI=DROP
$DATA       mx20.csv IGNORE=#
$SUBROUTINE ADVAN2 TRANS1
$PK

;-----------OCCASIONS----------
   VIS3               = 0
   IF(VISI.EQ.3) VIS3 = 1
   VIS8               = 0
   IF(VISI.EQ.8) VIS8 = 1

;----------IOV--------------------

   KPCL  = VIS3*ETA(4)+VIS8*ETA(5)
   KPKA  = VIS3*ETA(6)+VIS8*ETA(7)

;---------- PK model ------------------

   TVCL  = THETA(1)
   TVV   = THETA(2)

   CL    = TVCL*EXP(ETA(1)+KPCL)
   V     = TVV*EXP(ETA(2))
   KA    = THETA(3)*EXP(ETA(3)+KPKA)
   ALAG1 = THETA(4)
   K     = CL/V
   S2    = V

$ERROR

IPRED = LOG(.025)
IF(F.GT.0) IPRED = LOG(F)

W     = SQRT(SIGMA(1,1))
IRES  = IPRED-DV
IWRES = IRES/W

Y     = IPRED+EPS(1)

$THETA  (0,26.6815) ; CL
$THETA  (0,110.275) ; V
$THETA  (0,4.49465) ; KA
$THETA  (0,0.240122) ; TLAG
$OMEGA  BLOCK(2)
 0.0444  ;     IIV CL
 0.027  ;   COV CL-V
 0.0241  ;      IIV V
$OMEGA  BLOCK(1)
 3.0  ;     IIV KA
$OMEGA  BLOCK(1)
 0.0165  ;     IOV CL
$OMEGA  BLOCK(1) SAME
$OMEGA  BLOCK(1)
 0.495  ;     IOV KA
$OMEGA  BLOCK(1) SAME
$SIGMA  0.1
$ESTIMATION METHOD=1 MAXEVALS=9999
 ;MATRIX=R PRINT=E
;$TABLE ID TIME DV MDV EVID IPRED IWRES ONEHEADER NOPRINT FILE=sdtab1correl
$COVARIANCE

NM-TRAN MESSAGES
 WARNINGS AND ERRORS (IF ANY) FOR PROBLEM    1
 (WARNING  2) NM-TRAN INFERS THAT THE DATA ARE POPULATION.
 (WARNING  79) SIGMA IS USED ON THE RIGHT. WITH A SUBSEQUENT RUN, IF AN
 INITIAL ESTIMATE OF A DIAGONAL BLOCK OF SIGMA IS TO BE COMPUTED BY
 NONMEM, THAT BLOCK WILL BE SET TO AN IDENTITY MATRIX DURING THAT
 COMPUTATION. THIS COULD LEAD TO AN ARITHMETIC EXCEPTION.*
 * THE MAXIMUM NUMBER OF WARNINGS OF ONE OR MORE TYPES WAS REACHED.
 IT IS POSSIBLE THAT SOME WARNING MESSAGES WERE SUPPRESSED.

1NONLINEAR MIXED EFFECTS MODEL PROGRAM (NONMEM) VERSION 7.3.0
 ORIGINALLY DEVELOPED BY STUART BEAL, LEWIS SHEINER, AND ALISON BOECKMANN
 CURRENT DEVELOPERS ARE ROBERT BAUER, ICON DEVELOPMENT SOLUTIONS,
 AND ALISON BOECKMANN. IMPLEMENTATION, EFFICIENCY, AND STANDARDIZATION
 PERFORMED BY NOUS INFOSYSTEMS.
 PROBLEM NO.:         1
 MOXONIDINE PK,FINAL ESTIMATES,ALL DATA
 TOT. NO. OF OBS RECS:     1021
 TOT. NO. OF INDIVIDUALS:     74
 ONE COMPARTMENT MODEL WITH FIRST-ORDER ABSORPTION (ADVAN2)
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 #TBLN:      1
 #METH: First Order Conditional Estimation
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
 #TERM:
0MINIMIZATION SUCCESSFUL
 NO. OF FUNCTION EVALUATIONS USED:      267
 NO. OF SIG. DIGITS IN FINAL EST.:  3.8

 ETABAR IS THE ARITHMETIC MEAN OF THE ETA-ESTIMATES,
 AND THE P-VALUE IS GIVEN FOR THE NULL HYPOTHESIS THAT THE TRUE MEAN IS 0.

 ETABAR:        -8.9468E-04 -2.8093E-02 -2.4252E-01  1.0534E-02 -1.4489E-03  4.6672E-02 -9.0238E-02
 SE:             2.8396E-02  2.2514E-02  1.5802E-01  6.6605E-03  8.6108E-03  3.7695E-02  3.8587E-02
 N:                      74          74          74          74          74          74          74

 P VAL.:         9.7486E-01  2.1212E-01  1.2486E-01  1.1377E-01  8.6637E-01  2.1566E-01  1.9359E-02

 ETAshrink(%):   1.0213E+01  1.7845E+01  1.8457E+01  5.2413E+01  3.8479E+01  5.4107E+01  5.3021E+01
 EBVshrink(%):   1.0180E+01  1.9070E+01  1.5415E+01  4.8517E+01  4.1788E+01  5.1530E+01  5.0510E+01
 EPSshrink(%):   1.1619E+01

 #TERE:
 Elapsed estimation time in seconds:    21.80
 Elapsed covariance time in seconds:    14.48

 ********************                        FIRST ORDER CONDITIONAL ESTIMATION                      ********************
 #OBJT:**************                       MINIMUM VALUE OF OBJECTIVE FUNCTION                      ********************
 #OBJV:********************************************     -692.343       **************************************************

 ********************                        FIRST ORDER CONDITIONAL ESTIMATION                      ********************
 ********************                             FINAL PARAMETER ESTIMATE                           ********************

 THETA - VECTOR OF FIXED EFFECTS PARAMETERS   *********
         TH 1      TH 2      TH 3      TH 4
         2.67E+01  1.10E+02  4.50E+00  2.40E-01

 OMEGA - COV MATRIX FOR RANDOM EFFECTS - ETAS  ********
            ETA1      ETA2      ETA3      ETA4      ETA5      ETA6      ETA7
 ETA1
+        7.50E-02
 ETA2
+        4.67E-02  5.63E-02
 ETA3
+        0.00E+00  0.00E+00  2.82E+00
 ETA4
+        0.00E+00  0.00E+00  0.00E+00  1.47E-02
 ETA5
+        0.00E+00  0.00E+00  0.00E+00  0.00E+00  1.47E-02
 ETA6
+        0.00E+00  0.00E+00  0.00E+00  0.00E+00  0.00E+00  5.06E-01
 ETA7
+        0.00E+00  0.00E+00  0.00E+00  0.00E+00  0.00E+00  0.00E+00  5.06E-01

 SIGMA - COV MATRIX FOR RANDOM EFFECTS - EPSILONS  ****
            EPS1
 EPS1
+        1.09E-01

 OMEGA - CORR MATRIX FOR RANDOM EFFECTS - ETAS  *******
            ETA1      ETA2      ETA3      ETA4      ETA5      ETA6      ETA7
 ETA1
+        2.74E-01
 ETA2
+        7.19E-01  2.37E-01
 ETA3
+        0.00E+00  0.00E+00  1.68E+00
 ETA4
+        0.00E+00  0.00E+00  0.00E+00  1.21E-01
 ETA5
+        0.00E+00  0.00E+00  0.00E+00  0.00E+00  1.21E-01
 ETA6
+        0.00E+00  0.00E+00  0.00E+00  0.00E+00  0.00E+00  7.11E-01
 ETA7
+        0.00E+00  0.00E+00  0.00E+00  0.00E+00  0.00E+00  0.00E+00  7.11E-01

 SIGMA - CORR MATRIX FOR RANDOM EFFECTS - EPSILONS  ***
            EPS1
 EPS1
+        3.31E-01

 ********************                        FIRST ORDER CONDITIONAL ESTIMATION                      ********************
 ********************                            STANDARD ERROR OF ESTIMATE                          ********************

 THETA - VECTOR OF FIXED EFFECTS PARAMETERS   *********
         TH 1      TH 2      TH 3      TH 4
         9.35E-01  3.94E+00  9.42E-01  5.57E-03

 OMEGA - COV MATRIX FOR RANDOM EFFECTS - ETAS  ********
            ETA1      ETA2      ETA3      ETA4      ETA5      ETA6      ETA7
 ETA1
+        1.24E-02
 ETA2
+        9.94E-03  1.23E-02
 ETA3
+       ......... .........  8.82E-01
 ETA4
+       ......... ......... .........  4.92E-03
 ETA5
+       ......... ......... ......... ......... .........
 ETA6
+       ......... ......... ......... ......... .........  2.59E-01
 ETA7
+       ......... ......... ......... ......... ......... ......... .........

 SIGMA - COV MATRIX FOR RANDOM EFFECTS - EPSILONS  ****
            EPS1
 EPS1
+        1.73E-02

 OMEGA - CORR MATRIX FOR RANDOM EFFECTS - ETAS  *******
            ETA1      ETA2      ETA3      ETA4      ETA5      ETA6      ETA7
 ETA1
+        2.27E-02
 ETA2
+        8.64E-02  2.59E-02
 ETA3
+       ......... .........  2.63E-01
 ETA4
+       ......... ......... .........  2.03E-02
 ETA5
+       ......... ......... ......... ......... .........
 ETA6
+       ......... ......... ......... ......... .........  1.82E-01
 ETA7
+       ......... ......... ......... ......... ......... ......... .........

 SIGMA - CORR MATRIX FOR RANDOM EFFECTS - EPSILONS  ***
            EPS1
 EPS1
+        2.62E-02
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 #CPUT: Total CPU Time in Seconds,       36.318
