Tue Mar 26 14:32:34 CET 2013
$PROBLEM    MOXONIDINE PK,FINAL ESTIMATES,ALL DATA
;;

;;
$INPUT      ID VISI XAT2=DROP DGRP=DROP DOSE=DROP FLAG=DROP ONO=DROP
            XIME=DROP DVO=DROP NEUY SCR AGE SEX NYHA WT DROP ACE DIG
            DIU NUMB=DROP TAD TIME VIDD=DROP CRCL AMT SS II DROP
            CMT=DROP CONO=DROP DV EVID=DROP OVID=DROP DROP SHR2=DROP
            NYHDI=DROP
$DATA       mx20.csv IGNORE=#
$SUBROUTINE ADVAN2 TRANS1
$PK

;-----------OCCASIONS----------
   VIS3               = 0
   IF(VISI.EQ.3) VIS3 = 1
   VIS8               = 0
   IF(VISI.EQ.8) VIS8 = 1

;----------IOV--------------------

   KPCL  = VIS3*ETA(4)+VIS8*ETA(5)
   KPKA  = VIS3*ETA(6)+VIS8*ETA(7)

; --------------- Remove block structure to be able fo fix variances/covariances within a block ----------------------

; ---- IIV ---

; Diagonal (Variance)
OM11   = THETA(6)
OM22   = THETA(7)

; Off-diagonal (Correlation)
COR12  = THETA(8)

; Off-diagonal (Covariance)
COV12  = SQRT(OM11*OM22)*COR12

; Random effect 1
P1     = SQRT(OM11)*ETA(1)

; Random effect 2
DP12   = COV12/SQRT(OM11)    ; = SQRT(OM22)*COR12
P2     = DP12*ETA(1) + SQRT(OM22-(DP12*DP12))*ETA(2)

;---------- PK model ------------------

   TVCL  = THETA(1)
   TVV   = THETA(2)

   CL    = TVCL*EXP(P1)*EXP(KPCL)
   V     = TVV*EXP(P2)
   KA    = THETA(3)*EXP(ETA(3)+KPKA)
   ALAG1 = THETA(4)
   K     = CL/V
   S2    = V

$ERROR

IPRED = LOG(.025)
IF(F.GT.0) IPRED = LOG(F)

W     = THETA(5)
IRES  = IPRED-DV
IWRES = IRES/W

Y     = IPRED+EPS(1)*W

$THETA  (0,26.6815) ; 1 TVCL
$THETA  (0,110.275) ; 2 TVV
$THETA  (0,4.49465) ; 3 TVKA
$THETA  (0,0.240122) ; 4 LAG
$THETA  (0,0.330604) ; 5 RES ERR
$THETA  (0,0.330604) ; 6 VAR IIV CL
$THETA  (0,0.330604) ; 7 VAR IIV V
$THETA  (0,0.7,1) ; 8 CORR IIV CL-V
$OMEGA  1  FIX  ;   1 IIV CL
$OMEGA  1  FIX  ;    2 IIV V
$OMEGA  2.81618  ;   3 IIV KA
$OMEGA  BLOCK(1)
 0.0147009  ; 4 IOV CL OCC1
$OMEGA  BLOCK(1) SAME

$OMEGA  BLOCK(1)
 0.506018  ; 6 IOV KA OCC1
$OMEGA  BLOCK(1) SAME

$SIGMA  1  FIX
$ESTIMATION METHOD=1 MAXEVALS=9999 MSFO=msfb1
 ;MATRIX=R PRINT=E
;$TABLE ID TIME DV MDV EVID IPRED IWRES ONEHEADER NOPRINT FILE=sdtab1correl
$COVARIANCE

NM-TRAN MESSAGES
 WARNINGS AND ERRORS (IF ANY) FOR PROBLEM    1
 (WARNING  2) NM-TRAN INFERS THAT THE DATA ARE POPULATION.

1NONLINEAR MIXED EFFECTS MODEL PROGRAM (NONMEM) VERSION 7.2.0
 ORIGINALLY DEVELOPED BY STUART BEAL, LEWIS SHEINER, AND ALISON BOECKMANN
 CURRENT DEVELOPERS ARE ROBERT BAUER, ICON DEVELOPMENT SOLUTIONS,
 AND ALISON BOECKMANN. IMPLEMENTATION, EFFICIENCY, AND STANDARDIZATION
 PERFORMED BY NOUS INFOSYSTEMS.
 PROBLEM NO.:         1
 MOXONIDINE PK,FINAL ESTIMATES,ALL DATA
 TOT. NO. OF OBS RECS:     1021
 TOT. NO. OF INDIVIDUALS:     74
 ONE COMPARTMENT MODEL WITH FIRST-ORDER ABSORPTION (ADVAN2)
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 #TBLN:      1
 #METH: First Order Conditional Estimation
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
 #TERM:
0MINIMIZATION SUCCESSFUL
 NO. OF FUNCTION EVALUATIONS USED:      387
 NO. OF SIG. DIGITS IN FINAL EST.:  3.3

 ETABAR IS THE ARITHMETIC MEAN OF THE ETA-ESTIMATES,
 AND THE P-VALUE IS GIVEN FOR THE NULL HYPOTHESIS THAT THE TRUE MEAN IS 0.

 ETABAR:        -3.2558E-03 -1.6690E-01 -2.4257E-01  1.0534E-02 -1.4480E-03  4.6670E-02 -9.0245E-02
 SE:             1.0367E-01  7.9657E-02  1.5803E-01  6.6606E-03  8.6110E-03  3.7696E-02  3.8588E-02

 P VAL.:         9.7495E-01  3.6152E-02  1.2478E-01  1.1375E-01  8.6646E-01  2.1569E-01  1.9351E-02

 ETAshrink(%):   1.0212E+01  3.1008E+01  1.8460E+01  5.2413E+01  3.8478E+01  5.4108E+01  5.3022E+01
 EPSshrink(%):   1.1618E+01

 #TERE:
 Elapsed estimation time in seconds:    10.93
 Elapsed covariance time in seconds:    11.75

 ********************                        FIRST ORDER CONDITIONAL ESTIMATION                      ********************
 #OBJT:**************                       MINIMUM VALUE OF OBJECTIVE FUNCTION                      ********************
 #OBJV:********************************************     -692.343       **************************************************

 ********************                        FIRST ORDER CONDITIONAL ESTIMATION                      ********************
 ********************                             FINAL PARAMETER ESTIMATE                           ********************

 THETA - VECTOR OF FIXED EFFECTS PARAMETERS   *********
         TH 1      TH 2      TH 3      TH 4      TH 5      TH 6      TH 7      TH 8
         2.67E+01  1.10E+02  4.50E+00  2.40E-01  3.31E-01  7.50E-02  5.63E-02  7.19E-01

 OMEGA - COV MATRIX FOR RANDOM EFFECTS - ETAS  ********
            ETA1      ETA2      ETA3      ETA4      ETA5      ETA6      ETA7
 ETA1
+        1.00E+00
 ETA2
+        0.00E+00  1.00E+00
 ETA3
+        0.00E+00  0.00E+00  2.82E+00
 ETA4
+        0.00E+00  0.00E+00  0.00E+00  1.47E-02
 ETA5
+        0.00E+00  0.00E+00  0.00E+00  0.00E+00  1.47E-02
 ETA6
+        0.00E+00  0.00E+00  0.00E+00  0.00E+00  0.00E+00  5.06E-01
 ETA7
+        0.00E+00  0.00E+00  0.00E+00  0.00E+00  0.00E+00  0.00E+00  5.06E-01

 SIGMA - COV MATRIX FOR RANDOM EFFECTS - EPSILONS  ****
            EPS1
 EPS1
+        1.00E+00

 OMEGA - CORR MATRIX FOR RANDOM EFFECTS - ETAS  *******
            ETA1      ETA2      ETA3      ETA4      ETA5      ETA6      ETA7
 ETA1
+        1.00E+00
 ETA2
+        0.00E+00  1.00E+00
 ETA3
+        0.00E+00  0.00E+00  1.68E+00
 ETA4
+        0.00E+00  0.00E+00  0.00E+00  1.21E-01
 ETA5
+        0.00E+00  0.00E+00  0.00E+00  0.00E+00  1.21E-01
 ETA6
+        0.00E+00  0.00E+00  0.00E+00  0.00E+00  0.00E+00  7.11E-01
 ETA7
+        0.00E+00  0.00E+00  0.00E+00  0.00E+00  0.00E+00  0.00E+00  7.11E-01

 SIGMA - CORR MATRIX FOR RANDOM EFFECTS - EPSILONS  ***
            EPS1
 EPS1
+        1.00E+00

 ********************                        FIRST ORDER CONDITIONAL ESTIMATION                      ********************
 ********************                            STANDARD ERROR OF ESTIMATE                          ********************

 THETA - VECTOR OF FIXED EFFECTS PARAMETERS   *********
         TH 1      TH 2      TH 3      TH 4      TH 5      TH 6      TH 7      TH 8
         9.63E-01  3.96E+00  1.37E+00  5.83E-03  2.66E-02  1.22E-02  1.20E-02  7.62E-02

 OMEGA - COV MATRIX FOR RANDOM EFFECTS - ETAS  ********
            ETA1      ETA2      ETA3      ETA4      ETA5      ETA6      ETA7
 ETA1
+       .........
 ETA2
+       ......... .........
 ETA3
+       ......... .........  9.41E-01
 ETA4
+       ......... ......... .........  4.87E-03
 ETA5
+       ......... ......... ......... ......... .........
 ETA6
+       ......... ......... ......... ......... .........  2.63E-01
 ETA7
+       ......... ......... ......... ......... ......... ......... .........

 SIGMA - COV MATRIX FOR RANDOM EFFECTS - EPSILONS  ****
            EPS1
 EPS1
+       .........

 OMEGA - CORR MATRIX FOR RANDOM EFFECTS - ETAS  *******
            ETA1      ETA2      ETA3      ETA4      ETA5      ETA6      ETA7
 ETA1
+       .........
 ETA2
+       ......... .........
 ETA3
+       ......... .........  2.80E-01
 ETA4
+       ......... ......... .........  2.01E-02
 ETA5
+       ......... ......... ......... ......... .........
 ETA6
+       ......... ......... ......... ......... .........  1.85E-01
 ETA7
+       ......... ......... ......... ......... ......... ......... .........

 SIGMA - CORR MATRIX FOR RANDOM EFFECTS - EPSILONS  ***
            EPS1
 EPS1
+       .........
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