$PROBLEM    STUDY DESIGN COURSE
$INPUT      ID DOSE TIME DV ARM CRCL MDV1 MDV2
$DATA       data_tnpri.csv IGNORE=@
$PRIOR TNPRI (PROBLEM 2) IVAR=0 PLEV=.999
$MSFI msf_tnpri ONLYREAD
$PRED

  BASELINE    = THETA(1)*EXP(ETA(1))
  PLACEBO_MAX = THETA(2)* (1+ETA(2))
  PLACEBO_HL  = THETA(3)
  SLP         = THETA(4)*EXP(ETA(3))
  PLACEBO     = PLACEBO_MAX*(1-EXP(-LOG(2)/PLACEBO_HL*TIME))
  IPRED       = BASELINE + PLACEBO + SLP*DOSE
  Y           = IPRED+EPS(1)
; Change from baseline (CFB) for diagnostics
   IF(TIME.EQ.0) BASE_DV=DV
   CFB         = DV - BASE_DV


$PROBLEM 2
$INPUT      ID DOSE TIME DV ARM CRCL MDV1 MDV2
$DATA       data_tnpri.csv IGNORE=@ REWIND
$THETA  98.7078  ; 1_BASELINE
$THETA  22.759   ; 2_PLACEBO_MAX
$THETA  0.745253 ; 3_PLACEBO_HL
$THETA  0.556133 ; 4_SLP
$OMEGA  BLOCK(2)
 0.232539  ; 1_OM_BASELINE
 -0.021345 0.113703  ; 2_OM_PLC_MAX
$OMEGA  0.107531  ;   3_OM_SLP
$SIGMA  127.891  ;    1_SIGMA
$SIML (98798) NSUB=100 ONLY TRUE=PRIOR
